<neuroml xmlns="http://www.neuroml.org/schema/neuroml2"  xmlns:xs="http://www.w3.org/2001/XMLSchema" xmlns:xsi="http://www.w3.org/2001/XMLSchema-instance" xsi:schemaLocation="http://www.neuroml.org/schema/neuroml2 https://raw.github.com/NeuroML/NeuroML2/development/Schemas/NeuroML2/NeuroML_v2beta4.xsd" id="GolgiV2010multi_vf_and_MFinput_gen_test2">
    <include href="Very_Simple_Golgi_test_morph.cell.nml"></include>
    <gapJunction id="gap_junction0" conductance="2232.032922pS"/>
    <gapJunction id="gap_junction1" conductance="2249.178416pS"/>
    <gapJunction id="gap_junction2" conductance="1671.355456pS"/>
    <gapJunction id="gap_junction3" conductance="5720.991436pS"/>
    <gapJunction id="gap_junction4" conductance="911.101655pS"/>
    <gapJunction id="gap_junction5" conductance="12826.737422pS"/>
    <gapJunction id="gap_junction6" conductance="1505.518468pS"/>
    <gapJunction id="gap_junction7" conductance="1252.124156pS"/>
    <gapJunction id="gap_junction8" conductance="6687.707145pS"/>
    <gapJunction id="gap_junction9" conductance="6748.015819pS"/>
    <gapJunction id="gap_junction10" conductance="1877.461938pS"/>
    <gapJunction id="gap_junction11" conductance="2563.060474pS"/>
    <gapJunction id="gap_junction12" conductance="3110.792456pS"/>
    <gapJunction id="gap_junction13" conductance="12244.350443pS"/>
    <gapJunction id="gap_junction14" conductance="1204.886345pS"/>
    <gapJunction id="gap_junction15" conductance="1345.184397pS"/>
    <gapJunction id="gap_junction16" conductance="5185.661004pS"/>
    <gapJunction id="gap_junction17" conductance="1661.360033pS"/>
    <gapJunction id="gap_junction18" conductance="3172.116126pS"/>
    <gapJunction id="gap_junction19" conductance="5122.553387pS"/>
    <gapJunction id="gap_junction20" conductance="716.938685pS"/>
    <gapJunction id="gap_junction21" conductance="1685.179585pS"/>
    <gapJunction id="gap_junction22" conductance="1815.574259pS"/>
    <gapJunction id="gap_junction23" conductance="3250.495812pS"/>
    <gapJunction id="gap_junction24" conductance="6380.714794pS"/>
    <gapJunction id="gap_junction25" conductance="1177.503034pS"/>
    <gapJunction id="gap_junction26" conductance="1326.195729pS"/>
    <gapJunction id="gap_junction27" conductance="7389.874054pS"/>
    <gapJunction id="gap_junction28" conductance="1163.590589pS"/>
    <gapJunction id="gap_junction29" conductance="2776.992907pS"/>
    <gapJunction id="gap_junction30" conductance="5599.626787pS"/>
    <gapJunction id="gap_junction31" conductance="1239.445092pS"/>
    <gapJunction id="gap_junction32" conductance="3004.327698pS"/>
    <gapJunction id="gap_junction33" conductance="1965.142645pS"/>
    <gapJunction id="gap_junction34" conductance="6461.299104pS"/>
    <gapJunction id="gap_junction35" conductance="863.331475pS"/>
    <gapJunction id="gap_junction36" conductance="923.392920pS"/>
    <gapJunction id="gap_junction37" conductance="3950.292906pS"/>
    <gapJunction id="gap_junction38" conductance="2395.228147pS"/>
    <gapJunction id="gap_junction39" conductance="1644.556898pS"/>
    <gapJunction id="gap_junction40" conductance="2475.059838pS"/>
    <gapJunction id="gap_junction41" conductance="1663.503418pS"/>
    <gapJunction id="gap_junction42" conductance="700.341246pS"/>
    <gapJunction id="gap_junction43" conductance="1595.564078pS"/>
    <gapJunction id="gap_junction44" conductance="2312.213869pS"/>
    <gapJunction id="gap_junction45" conductance="4608.702206pS"/>
    <gapJunction id="gap_junction46" conductance="2143.934242pS"/>
    <gapJunction id="gap_junction47" conductance="3415.682897pS"/>
    <gapJunction id="gap_junction48" conductance="5465.707616pS"/>
    <gapJunction id="gap_junction49" conductance="2223.604556pS"/>
    <gapJunction id="gap_junction50" conductance="1778.011089pS"/>
    <gapJunction id="gap_junction51" conductance="13309.730827pS"/>
    <gapJunction id="gap_junction52" conductance="3283.024206pS"/>
    <gapJunction id="gap_junction53" conductance="1951.788910pS"/>
    <gapJunction id="gap_junction54" conductance="1697.296329pS"/>
    <gapJunction id="gap_junction55" conductance="2475.389642pS"/>
    <gapJunction id="gap_junction56" conductance="5389.554304pS"/>
    <gapJunction id="gap_junction57" conductance="1950.620797pS"/>
    <gapJunction id="gap_junction58" conductance="4068.072439pS"/>
    <gapJunction id="gap_junction59" conductance="2611.800025pS"/>
    <gapJunction id="gap_junction60" conductance="5195.105536pS"/>
    <gapJunction id="gap_junction61" conductance="2208.296900pS"/>
    <gapJunction id="gap_junction62" conductance="12107.565017pS"/>
    <gapJunction id="gap_junction63" conductance="8145.937796pS"/>
    <gapJunction id="gap_junction64" conductance="2504.237051pS"/>
    <gapJunction id="gap_junction65" conductance="3003.197568pS"/>
    <gapJunction id="gap_junction66" conductance="1339.137282pS"/>
    <gapJunction id="gap_junction67" conductance="1082.911306pS"/>
    <gapJunction id="gap_junction68" conductance="1553.752176pS"/>
    <gapJunction id="gap_junction69" conductance="9410.337576pS"/>
    <gapJunction id="gap_junction70" conductance="5346.263836pS"/>
    <gapJunction id="gap_junction71" conductance="2290.364322pS"/>
    <gapJunction id="gap_junction72" conductance="2220.295418pS"/>
    <gapJunction id="gap_junction73" conductance="1739.592552pS"/>
    <gapJunction id="gap_junction74" conductance="1350.790060pS"/>
    <gapJunction id="gap_junction75" conductance="10186.078371pS"/>
    <gapJunction id="gap_junction76" conductance="962.718546pS"/>
    <gapJunction id="gap_junction77" conductance="904.151694pS"/>
    <gapJunction id="gap_junction78" conductance="7985.090163pS"/>
    <gapJunction id="gap_junction79" conductance="2230.295734pS"/>
    <gapJunction id="gap_junction80" conductance="2124.758898pS"/>
    <gapJunction id="gap_junction81" conductance="1971.628237pS"/>
    <gapJunction id="gap_junction82" conductance="18811.703564pS"/>
    <gapJunction id="gap_junction83" conductance="1600.973846pS"/>
    <gapJunction id="gap_junction84" conductance="3920.865706pS"/>
    <gapJunction id="gap_junction85" conductance="2258.766560pS"/>
    <gapJunction id="gap_junction86" conductance="3895.397430pS"/>
    <gapJunction id="gap_junction87" conductance="5339.398947pS"/>
    <gapJunction id="gap_junction88" conductance="743.292070pS"/>
    <gapJunction id="gap_junction89" conductance="3195.275943pS"/>
    <gapJunction id="gap_junction90" conductance="1698.844410pS"/>
    <gapJunction id="gap_junction91" conductance="4283.051003pS"/>
    <gapJunction id="gap_junction92" conductance="4064.636706pS"/>
    <gapJunction id="gap_junction93" conductance="1925.993929pS"/>
    <gapJunction id="gap_junction94" conductance="5467.329372pS"/>
    <gapJunction id="gap_junction95" conductance="3540.649821pS"/>
    <gapJunction id="gap_junction96" conductance="5278.749986pS"/>
    <gapJunction id="gap_junction97" conductance="4500.934180pS"/>
    <gapJunction id="gap_junction98" conductance="1074.579458pS"/>
    <gapJunction id="gap_junction99" conductance="2156.400360pS"/>
    <gapJunction id="gap_junction100" conductance="1566.881708pS"/>
    <gapJunction id="gap_junction101" conductance="2155.056207pS"/>
    <gapJunction id="gap_junction102" conductance="11357.585172pS"/>
    <gapJunction id="gap_junction103" conductance="844.485957pS"/>
    <gapJunction id="gap_junction104" conductance="1614.687328pS"/>
    <gapJunction id="gap_junction105" conductance="4431.896679pS"/>
    <gapJunction id="gap_junction106" conductance="1452.415551pS"/>
    <gapJunction id="gap_junction107" conductance="6250.153942pS"/>
    <gapJunction id="gap_junction108" conductance="1555.514703pS"/>
    <gapJunction id="gap_junction109" conductance="1862.139041pS"/>
    <pulseGenerator id="Input_0" delay="20.0ms" duration="200.0ms" amplitude="4E-5uA"/>
    <pulseGenerator id="Input_1" delay="220.0ms" duration="200.0ms" amplitude="-0.5E-5uA"/>
    <network id="GolgiV2010multi_vf_and_MFinput_gen_test2_network" type="networkWithTemperature" temperature="23 degC">
        <population id="Golgi_pop0" type="populationList" component="Very_Simple_Golgi_test_morph" size="10">
            <instance id="0">
                <location y="1.016916945706836" x="41.661987254534118" z="82.520650925374312"/>
            </instance>
            <instance id="1">
                <location y="36.841168948847567" x="29.863985519959279" z="19.366134904507426"/>
            </instance>
            <instance id="2">
                <location y="16.168782392936819" x="56.600816872886128" z="12.426688428353017"/>
            </instance>
            <instance id="3">
                <location y="56.207848807584291" x="43.293626800991589" z="17.434356072373181"/>
            </instance>
            <instance id="4">
                <location y="35.490138633659875" x="55.322108556932982" z="95.806478509954857"/>
            </instance>
            <instance id="5">
                <location y="97.863999557040998" x="9.129409887673512" z="41.211939293930101"/>
            </instance>
            <instance id="6">
                <location y="14.814616893018917" x="50.393536811003749" z="71.896714030088503"/>
            </instance>
            <instance id="7">
                <location y="34.156042577355215" x="18.997137872182034" z="2.352121814220054"/>
            </instance>
            <instance id="8">
                <location y="96.748245887987139" x="33.951777239792072" z="97.879845418565679"/>
            </instance>
            <instance id="9">
                <location y="0.345461075509557" x="74.45300401410347" z="94.023850309774275"/>
            </instance>
        </population>
        <population id="Golgi_pop1" type="populationList" component="Very_Simple_Golgi_test_morph" size="10">
            <instance id="0">
                <location y="77.083433851681079" x="87.076696875547626" z="17.887376462351511"/>
            </instance>
            <instance id="1">
                <location y="41.453246851185774" x="9.949963280961139" z="88.553646714547952"/>
            </instance>
            <instance id="2">
                <location y="73.658221494408224" x="57.808602736632317" z="23.262110322840769"/>
            </instance>
            <instance id="3">
                <location y="70.93864374841317" x="52.35975801646584" z="82.483394689778066"/>
            </instance>
            <instance id="4">
                <location y="23.230811297746211" x="80.712453305908298" z="87.318996711987921"/>
            </instance>
            <instance id="5">
                <location y="80.189923760331425" x="21.638043029004471" z="55.508529893837746"/>
            </instance>
            <instance id="6">
                <location y="58.860861833151603" x="18.582835985521594" z="51.82393857540837"/>
            </instance>
            <instance id="7">
                <location y="4.153922185136183" x="95.866250343523205" z="16.413828210030999"/>
            </instance>
            <instance id="8">
                <location y="83.220488585052294" x="98.329265314751126" z="15.027246598161915"/>
            </instance>
            <instance id="9">
                <location y="53.913827495252242" x="22.911297045444933" z="15.698083032677356"/>
            </instance>
        </population>
        <electricalProjection id="proj0" postsynapticPopulation="Golgi_pop0" presynapticPopulation="Golgi_pop0">
            <electricalConnection id="0" synapse="gap_junction0" preFractionAlong="0.772406" preSegment="5" postFractionAlong="0.367752" postSegment="5" postCell="../Golgi_pop0/1/Very_Simple_Golgi_test_morph" preCell="../Golgi_pop0/0/Very_Simple_Golgi_test_morph"/>
            <electricalConnection id="1" synapse="gap_junction1" preFractionAlong="0.420828" preSegment="1" postFractionAlong="0.952531" postSegment="2" postCell="../Golgi_pop0/2/Very_Simple_Golgi_test_morph" preCell="../Golgi_pop0/0/Very_Simple_Golgi_test_morph"/>
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        </electricalProjection>
        <electricalProjection id="proj1" postsynapticPopulation="Golgi_pop1" presynapticPopulation="Golgi_pop0">
            <electricalConnection id="0" synapse="gap_junction36" preFractionAlong="0.936760" preSegment="5" postFractionAlong="0.912687" postSegment="1" postCell="../Golgi_pop1/0/Very_Simple_Golgi_test_morph" preCell="../Golgi_pop0/0/Very_Simple_Golgi_test_morph"/>
            <electricalConnection id="1" synapse="gap_junction37" preFractionAlong="0.579557" preSegment="1" postFractionAlong="0.024652" postSegment="2" postCell="../Golgi_pop1/1/Very_Simple_Golgi_test_morph" preCell="../Golgi_pop0/0/Very_Simple_Golgi_test_morph"/>
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        </electricalProjection>
        <electricalProjection id="proj2" postsynapticPopulation="Golgi_pop1" presynapticPopulation="Golgi_pop1">
            <electricalConnection id="0" synapse="gap_junction77" preFractionAlong="0.600977" preSegment="5" postFractionAlong="0.654105" postSegment="2" postCell="../Golgi_pop1/1/Very_Simple_Golgi_test_morph" preCell="../Golgi_pop1/0/Very_Simple_Golgi_test_morph"/>
            <electricalConnection id="1" synapse="gap_junction78" preFractionAlong="0.327964" preSegment="5" postFractionAlong="0.455611" postSegment="1" postCell="../Golgi_pop1/2/Very_Simple_Golgi_test_morph" preCell="../Golgi_pop1/0/Very_Simple_Golgi_test_morph"/>
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        </electricalProjection>
        <inputList id="Input_list0" component="Input_0">
            <input destination="synapses" id="8" target="../Golgi_pop0/8/Very_Simple_Golgi_test_morph"/>
            <input destination="synapses" id="5" target="../Golgi_pop0/5/Very_Simple_Golgi_test_morph"/>
            <input destination="synapses" id="7" target="../Golgi_pop0/7/Very_Simple_Golgi_test_morph"/>
            <input destination="synapses" id="9" target="../Golgi_pop0/9/Very_Simple_Golgi_test_morph"/>
            <input destination="synapses" id="1" target="../Golgi_pop0/1/Very_Simple_Golgi_test_morph"/>
            <input destination="synapses" id="7" target="../Golgi_pop1/7/Very_Simple_Golgi_test_morph"/>
            <input destination="synapses" id="0" target="../Golgi_pop1/0/Very_Simple_Golgi_test_morph"/>
            <input destination="synapses" id="6" target="../Golgi_pop1/6/Very_Simple_Golgi_test_morph"/>
            <input destination="synapses" id="2" target="../Golgi_pop1/2/Very_Simple_Golgi_test_morph"/>
            <input destination="synapses" id="5" target="../Golgi_pop1/5/Very_Simple_Golgi_test_morph"/>
        </inputList>
        <inputList id="Input_list1" component="Input_1">
            <input destination="synapses" id="8" target="../Golgi_pop0/8/Very_Simple_Golgi_test_morph"/>
            <input destination="synapses" id="5" target="../Golgi_pop0/5/Very_Simple_Golgi_test_morph"/>
            <input destination="synapses" id="7" target="../Golgi_pop0/7/Very_Simple_Golgi_test_morph"/>
            <input destination="synapses" id="9" target="../Golgi_pop0/9/Very_Simple_Golgi_test_morph"/>
            <input destination="synapses" id="1" target="../Golgi_pop0/1/Very_Simple_Golgi_test_morph"/>
            <input destination="synapses" id="7" target="../Golgi_pop1/7/Very_Simple_Golgi_test_morph"/>
            <input destination="synapses" id="0" target="../Golgi_pop1/0/Very_Simple_Golgi_test_morph"/>
            <input destination="synapses" id="6" target="../Golgi_pop1/6/Very_Simple_Golgi_test_morph"/>
            <input destination="synapses" id="2" target="../Golgi_pop1/2/Very_Simple_Golgi_test_morph"/>
            <input destination="synapses" id="5" target="../Golgi_pop1/5/Very_Simple_Golgi_test_morph"/>
        </inputList>
    </network>
</neuroml>
