<neuroml xmlns="http://www.neuroml.org/schema/neuroml2"  xmlns:xs="http://www.w3.org/2001/XMLSchema" xmlns:xsi="http://www.w3.org/2001/XMLSchema-instance" xsi:schemaLocation="http://www.neuroml.org/schema/neuroml2 https://raw.github.com/NeuroML/NeuroML2/development/Schemas/NeuroML2/NeuroML_v2beta4.xsd" id="Golgitest_not_a_list">
    <include href="Very_Simple_Golgi_test_morph.cell.nml"></include>
    <gapJunction id="gap_junction0" conductance="2232.032922pS"/>
    <gapJunction id="gap_junction1" conductance="2249.178416pS"/>
    <gapJunction id="gap_junction2" conductance="1671.355456pS"/>
    <gapJunction id="gap_junction3" conductance="911.101655pS"/>
    <gapJunction id="gap_junction4" conductance="12826.737422pS"/>
    <gapJunction id="gap_junction5" conductance="1252.124156pS"/>
    <gapJunction id="gap_junction6" conductance="6687.707145pS"/>
    <gapJunction id="gap_junction7" conductance="6748.015819pS"/>
    <gapJunction id="gap_junction8" conductance="10430.270059pS"/>
    <gapJunction id="gap_junction9" conductance="1877.461938pS"/>
    <gapJunction id="gap_junction10" conductance="2563.060474pS"/>
    <gapJunction id="gap_junction11" conductance="3110.792456pS"/>
    <gapJunction id="gap_junction12" conductance="12244.350443pS"/>
    <gapJunction id="gap_junction13" conductance="1345.184397pS"/>
    <gapJunction id="gap_junction14" conductance="5122.553387pS"/>
    <gapJunction id="gap_junction15" conductance="716.938685pS"/>
    <gapJunction id="gap_junction16" conductance="1815.574259pS"/>
    <gapJunction id="gap_junction17" conductance="3250.495812pS"/>
    <gapJunction id="gap_junction18" conductance="2516.517387pS"/>
    <gapJunction id="gap_junction19" conductance="6380.714794pS"/>
    <gapJunction id="gap_junction20" conductance="1472.813399pS"/>
    <gapJunction id="gap_junction21" conductance="1177.503034pS"/>
    <gapJunction id="gap_junction22" conductance="1326.195729pS"/>
    <gapJunction id="gap_junction23" conductance="7389.874054pS"/>
    <gapJunction id="gap_junction24" conductance="1163.590589pS"/>
    <gapJunction id="gap_junction25" conductance="2776.992907pS"/>
    <gapJunction id="gap_junction26" conductance="1239.445092pS"/>
    <gapJunction id="gap_junction27" conductance="2139.116597pS"/>
    <gapJunction id="gap_junction28" conductance="3004.327698pS"/>
    <gapJunction id="gap_junction29" conductance="1965.142645pS"/>
    <gapJunction id="gap_junction30" conductance="1585.928658pS"/>
    <gapJunction id="gap_junction31" conductance="803.581397pS"/>
    <gapJunction id="gap_junction32" conductance="863.331475pS"/>
    <gapJunction id="gap_junction33" conductance="1045.748146pS"/>
    <gapJunction id="gap_junction34" conductance="923.392920pS"/>
    <gapJunction id="gap_junction35" conductance="3950.292906pS"/>
    <gapJunction id="gap_junction36" conductance="1318.732184pS"/>
    <gapJunction id="gap_junction37" conductance="1644.556898pS"/>
    <gapJunction id="gap_junction38" conductance="700.341246pS"/>
    <gapJunction id="gap_junction39" conductance="1595.564078pS"/>
    <gapJunction id="gap_junction40" conductance="2312.213869pS"/>
    <gapJunction id="gap_junction41" conductance="4608.702206pS"/>
    <gapJunction id="gap_junction42" conductance="2143.934242pS"/>
    <gapJunction id="gap_junction43" conductance="1647.014898pS"/>
    <gapJunction id="gap_junction44" conductance="3415.682897pS"/>
    <gapJunction id="gap_junction45" conductance="5465.707616pS"/>
    <gapJunction id="gap_junction46" conductance="2223.604556pS"/>
    <gapJunction id="gap_junction47" conductance="1778.011089pS"/>
    <gapJunction id="gap_junction48" conductance="13309.730827pS"/>
    <gapJunction id="gap_junction49" conductance="3283.024206pS"/>
    <gapJunction id="gap_junction50" conductance="1528.813500pS"/>
    <gapJunction id="gap_junction51" conductance="1951.788910pS"/>
    <gapJunction id="gap_junction52" conductance="1697.296329pS"/>
    <gapJunction id="gap_junction53" conductance="2475.389642pS"/>
    <gapJunction id="gap_junction54" conductance="5389.554304pS"/>
    <gapJunction id="gap_junction55" conductance="1950.620797pS"/>
    <gapJunction id="gap_junction56" conductance="2611.800025pS"/>
    <gapJunction id="gap_junction57" conductance="1650.949585pS"/>
    <gapJunction id="gap_junction58" conductance="2208.296900pS"/>
    <gapJunction id="gap_junction59" conductance="12107.565017pS"/>
    <gapJunction id="gap_junction60" conductance="8145.937796pS"/>
    <gapJunction id="gap_junction61" conductance="3003.197568pS"/>
    <gapJunction id="gap_junction62" conductance="1339.137282pS"/>
    <gapJunction id="gap_junction63" conductance="1082.911306pS"/>
    <gapJunction id="gap_junction64" conductance="1553.752176pS"/>
    <gapJunction id="gap_junction65" conductance="9410.337576pS"/>
    <gapJunction id="gap_junction66" conductance="5346.263836pS"/>
    <gapJunction id="gap_junction67" conductance="3850.715559pS"/>
    <gapJunction id="gap_junction68" conductance="2290.364322pS"/>
    <gapJunction id="gap_junction69" conductance="1141.749137pS"/>
    <gapJunction id="gap_junction70" conductance="2220.295418pS"/>
    <gapJunction id="gap_junction71" conductance="1350.790060pS"/>
    <gapJunction id="gap_junction72" conductance="10186.078371pS"/>
    <gapJunction id="gap_junction73" conductance="1016.395334pS"/>
    <gapJunction id="gap_junction74" conductance="1377.426978pS"/>
    <gapJunction id="gap_junction75" conductance="904.151694pS"/>
    <gapJunction id="gap_junction76" conductance="7985.090163pS"/>
    <gapJunction id="gap_junction77" conductance="2124.758898pS"/>
    <gapJunction id="gap_junction78" conductance="1971.628237pS"/>
    <gapJunction id="gap_junction79" conductance="2236.917281pS"/>
    <gapJunction id="gap_junction80" conductance="18811.703564pS"/>
    <gapJunction id="gap_junction81" conductance="2549.806571pS"/>
    <gapJunction id="gap_junction82" conductance="3920.865706pS"/>
    <gapJunction id="gap_junction83" conductance="2258.766560pS"/>
    <gapJunction id="gap_junction84" conductance="3895.397430pS"/>
    <gapJunction id="gap_junction85" conductance="5339.398947pS"/>
    <gapJunction id="gap_junction86" conductance="743.292070pS"/>
    <gapJunction id="gap_junction87" conductance="667.954889pS"/>
    <gapJunction id="gap_junction88" conductance="3195.275943pS"/>
    <gapJunction id="gap_junction89" conductance="4283.051003pS"/>
    <gapJunction id="gap_junction90" conductance="4064.636706pS"/>
    <gapJunction id="gap_junction91" conductance="1925.993929pS"/>
    <gapJunction id="gap_junction92" conductance="3540.649821pS"/>
    <gapJunction id="gap_junction93" conductance="5278.749986pS"/>
    <gapJunction id="gap_junction94" conductance="1789.313467pS"/>
    <gapJunction id="gap_junction95" conductance="2156.400360pS"/>
    <gapJunction id="gap_junction96" conductance="1304.357844pS"/>
    <gapJunction id="gap_junction97" conductance="11357.585172pS"/>
    <gapJunction id="gap_junction98" conductance="4431.896679pS"/>
    <gapJunction id="gap_junction99" conductance="1140.630086pS"/>
    <gapJunction id="gap_junction100" conductance="1452.415551pS"/>
    <gapJunction id="gap_junction101" conductance="6250.153942pS"/>
    <gapJunction id="gap_junction102" conductance="1945.921109pS"/>
    <gapJunction id="gap_junction103" conductance="1555.514703pS"/>
    <gapJunction id="gap_junction104" conductance="1862.139041pS"/>
    <pulseGenerator id="Input_0" delay="20.0ms" duration="200.0ms" amplitude="4E-5uA"/>
    <pulseGenerator id="Input_1" delay="220.0ms" duration="200.0ms" amplitude="-0.5E-5uA"/>
    <network id="Golgitest_not_a_list_network" type="networkWithTemperature" temperature="23 degC">
        <population id="Golgi_pop0" component="Very_Simple_Golgi_test_morph" size="10"/>
        <population id="Golgi_pop1" component="Very_Simple_Golgi_test_morph" size="10"/>
        <electricalProjection id="proj0" postsynapticPopulation="Golgi_pop0" presynapticPopulation="Golgi_pop0">
            <electricalConnection id="0" synapse="gap_junction0" preFractionAlong="0.768856" preSegment="2" postFractionAlong="0.698562" postSegment="2" postCell="1" preCell="0"/>
            <electricalConnection id="1" synapse="gap_junction1" preFractionAlong="0.003332" preSegment="1" postFractionAlong="0.003185" postSegment="1" postCell="2" preCell="0"/>
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        </electricalProjection>
        <electricalProjection id="proj1" postsynapticPopulation="Golgi_pop1" presynapticPopulation="Golgi_pop0">
            <electricalConnection id="0" synapse="gap_junction34" preFractionAlong="0.742179" preSegment="1" postFractionAlong="0.637075" postSegment="1" postCell="0" preCell="0"/>
            <electricalConnection id="1" synapse="gap_junction35" preFractionAlong="0.373540" preSegment="2" postFractionAlong="0.309739" postSegment="5" postCell="1" preCell="0"/>
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        </electricalProjection>
        <electricalProjection id="proj2" postsynapticPopulation="Golgi_pop1" presynapticPopulation="Golgi_pop1">
            <electricalConnection id="0" synapse="gap_junction75" preFractionAlong="0.735419" preSegment="1" postFractionAlong="0.297350" postSegment="1" postCell="1" preCell="0"/>
            <electricalConnection id="1" synapse="gap_junction76" preFractionAlong="0.810833" preSegment="5" postFractionAlong="0.128127" postSegment="1" postCell="2" preCell="0"/>
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        </electricalProjection>
        <explicitInput input="Input_0" destination="synapses" target="Golgi_pop0[3]"/>
        <explicitInput input="Input_1" destination="synapses" target="Golgi_pop0[3]"/>
        <explicitInput input="Input_0" destination="synapses" target="Golgi_pop0[0]"/>
        <explicitInput input="Input_1" destination="synapses" target="Golgi_pop0[0]"/>
        <explicitInput input="Input_0" destination="synapses" target="Golgi_pop0[5]"/>
        <explicitInput input="Input_1" destination="synapses" target="Golgi_pop0[5]"/>
        <explicitInput input="Input_0" destination="synapses" target="Golgi_pop0[8]"/>
        <explicitInput input="Input_1" destination="synapses" target="Golgi_pop0[8]"/>
        <explicitInput input="Input_0" destination="synapses" target="Golgi_pop0[7]"/>
        <explicitInput input="Input_1" destination="synapses" target="Golgi_pop0[7]"/>
        <explicitInput input="Input_0" destination="synapses" target="Golgi_pop1[9]"/>
        <explicitInput input="Input_1" destination="synapses" target="Golgi_pop1[9]"/>
        <explicitInput input="Input_0" destination="synapses" target="Golgi_pop1[7]"/>
        <explicitInput input="Input_1" destination="synapses" target="Golgi_pop1[7]"/>
        <explicitInput input="Input_0" destination="synapses" target="Golgi_pop1[6]"/>
        <explicitInput input="Input_1" destination="synapses" target="Golgi_pop1[6]"/>
        <explicitInput input="Input_0" destination="synapses" target="Golgi_pop1[2]"/>
        <explicitInput input="Input_1" destination="synapses" target="Golgi_pop1[2]"/>
        <explicitInput input="Input_0" destination="synapses" target="Golgi_pop1[4]"/>
        <explicitInput input="Input_1" destination="synapses" target="Golgi_pop1[4]"/>
    </network>
</neuroml>
