<Lems>

    <!--

        This LEMS file has been automatically generated using PyNeuroML v0.1.7 (libNeuroML v0.2.11)

     -->

    <!-- Specify which component to run -->
    <Target component="GolgiV2010multi1_2p4c4c_4inp"/>

    <!-- Include core NeuroML2 ComponentType definitions -->
    <Include file="Cells.xml"/>
    <Include file="Networks.xml"/>
    <Include file="Simulation.xml"/>

    <Include file="GolgiV2010multi1_2p4c4c_4inp.net.nml"/>
    <Include file="Very_Simple_Golgi_test_morph.cell.nml"/>
    <Include file="Golgi_Na.channel.nml"/>
    <Include file="Golgi_KV.channel.nml"/>
    <Include file="LeakCond.channel.nml"/>

    <Simulation id="GolgiV2010multi1_2p4c4c_4inp" length="450ms" step="0.005ms" target="GolgiV2010multi1_2p4c4c_4inp_network">

        <Display id="display_voltages0" title="Voltages Golgi_pop0" timeScale="1ms" xmin="-45.0" xmax="495.0" ymin="-75" ymax="50">
            <Line id="Golgi_pop0[0]: Vm" quantity="Golgi_pop0[0]/v" scale="1mV" color="#f56ae7" timeScale="1ms"/>
            <Line id="Golgi_pop0[1]: Vm" quantity="Golgi_pop0[1]/v" scale="1mV" color="#0aa250" timeScale="1ms"/>
        </Display>

        <Display id="display_voltages1" title="Voltages Golgi_pop1" timeScale="1ms" xmin="-45.0" xmax="495.0" ymin="-75" ymax="50">
            <Line id="Golgi_pop1[0]: Vm" quantity="Golgi_pop1[0]/v" scale="1mV" color="#2a04f7" timeScale="1ms"/>
            <Line id="Golgi_pop1[1]: Vm" quantity="Golgi_pop1[1]/v" scale="1mV" color="#fbb911" timeScale="1ms"/>
        </Display>

        <OutputFile id="Volts0_file0_0" fileName="simulations/V2010multi1_2p4c4c_4inp/sim0/Golgi_pop0_cell0.dat">
            <OutputColumn id="v0" quantity="Golgi_pop0[0]/v"/>
        </OutputFile>

        <OutputFile id="Volts0_file0_1" fileName="simulations/V2010multi1_2p4c4c_4inp/sim0/Golgi_pop0_cell1.dat">
            <OutputColumn id="v1" quantity="Golgi_pop0[1]/v"/>
        </OutputFile>

        <OutputFile id="Volts1_file0_0" fileName="simulations/V2010multi1_2p4c4c_4inp/sim0/Golgi_pop1_cell0.dat">
            <OutputColumn id="v0" quantity="Golgi_pop1[0]/v"/>
        </OutputFile>

        <OutputFile id="Volts1_file0_1" fileName="simulations/V2010multi1_2p4c4c_4inp/sim0/Golgi_pop1_cell1.dat">
            <OutputColumn id="v1" quantity="Golgi_pop1[1]/v"/>
        </OutputFile>

    </Simulation>

</Lems>
