<?xml version="1.0" encoding="ISO-8859-1"?>
<neuroml xmlns="http://www.neuroml.org/schema/neuroml2" xmlns:xsi="http://www.w3.org/2001/XMLSchema-instance" xsi:schemaLocation="http://www.neuroml.org/schema/neuroml2 https://raw.github.com/NeuroML/NeuroML2/development/Schemas/NeuroML2/NeuroML_v2beta4.xsd" id="MFSpikeSyn">

<expThreeSynapse id="MFSpikeSyn" gbase1="0.7nS" tauRise="0.1ms" tauDecay1="0.7ms" gbase2="0.2nS" tauDecay2="2.5ms"  erev="0mV">

<notes>Fast spiking synapse, used for Mossy Fibre inputs to Golgi cells</notes>
</expThreeSynapse>

</neuroml>
