<?xml version="1.0" encoding="ISO-8859-1"?>
<neuroml xmlns="http://www.neuroml.org/schema/neuroml2" xmlns:xsi="http://www.w3.org/2001/XMLSchema-instance" xsi:schemaLocation="http://www.neuroml.org/schema/neuroml2 https://raw.github.com/NeuroML/NeuroML2/development/Schemas/NeuroML2/NeuroML_v2beta4.xsd" id="MF_PF_SpikeSynNMDA">

<blockingSynapse id="MF_PF_SpikeSynNMDA" gbase="0.3nS" tauRise="3.4ms" tauDecay="44ms" erev="0mV">

    <blockMechanism type="voltageConcDepBlockMechanism" species="mg"
		      blockConcentration="1.0 mM"
		      scalingConc="0.5128 mM" scalingVolt="65.33 mV"/>

<notes> NMDA component for parallel fiber and mossy fiber to Golgi cell synapse.</notes>
</blockingSynapse>

</neuroml>
