<neuroml xmlns="http://www.neuroml.org/schema/neuroml2"  xmlns:xs="http://www.w3.org/2001/XMLSchema" xmlns:xsi="http://www.w3.org/2001/XMLSchema-instance" xsi:schemaLocation="http://www.neuroml.org/schema/neuroml2 https://raw.github.com/NeuroML/NeuroML2/development/Schemas/NeuroML2/NeuroML_v2beta4.xsd" id="Golgi_V2010_regional_from_left_to_right_100ms_trial0">
    <include href="../../../Golgi_10comp_13channels_2CaPools.cell.nml"></include>
    <include href="../../../MF.synapse.nml"></include>
    <include href="../../../PF.synapse.nml"></include>
    <gapJunction id="gap_junction00" conductance="0.421795nS"/>
    <gapJunction id="gap_junction01" conductance="1.443730nS"/>
    <gapJunction id="gap_junction02" conductance="0.550301nS"/>
    <gapJunction id="gap_junction03" conductance="0.694234nS"/>
    <gapJunction id="gap_junction04" conductance="0.678424nS"/>
    <gapJunction id="gap_junction05" conductance="0.263508nS"/>
    <gapJunction id="gap_junction06" conductance="0.541488nS"/>
    <gapJunction id="gap_junction07" conductance="0.469764nS"/>
    <gapJunction id="gap_junction08" conductance="0.209638nS"/>
    <gapJunction id="gap_junction09" conductance="0.453258nS"/>
    <gapJunction id="gap_junction010" conductance="0.186702nS"/>
    <gapJunction id="gap_junction011" conductance="0.319805nS"/>
    <gapJunction id="gap_junction012" conductance="0.351674nS"/>
    <gapJunction id="gap_junction013" conductance="0.103020nS"/>
    <gapJunction id="gap_junction014" conductance="0.207402nS"/>
    <gapJunction id="gap_junction015" conductance="0.183142nS"/>
    <gapJunction id="gap_junction016" conductance="0.246867nS"/>
    <gapJunction id="gap_junction017" conductance="0.664714nS"/>
    <gapJunction id="gap_junction018" conductance="0.223557nS"/>
    <gapJunction id="gap_junction019" conductance="0.660968nS"/>
    <gapJunction id="gap_junction020" conductance="0.274664nS"/>
    <gapJunction id="gap_junction021" conductance="0.463080nS"/>
    <gapJunction id="gap_junction022" conductance="1.073994nS"/>
    <gapJunction id="gap_junction023" conductance="0.571247nS"/>
    <gapJunction id="gap_junction024" conductance="0.515128nS"/>
    <gapJunction id="gap_junction025" conductance="0.118780nS"/>
    <gapJunction id="gap_junction026" conductance="0.317415nS"/>
    <gapJunction id="gap_junction027" conductance="3.800654nS"/>
    <gapJunction id="gap_junction028" conductance="0.423587nS"/>
    <gapJunction id="gap_junction029" conductance="0.281850nS"/>
    <gapJunction id="gap_junction030" conductance="0.765549nS"/>
    <gapJunction id="gap_junction031" conductance="0.229213nS"/>
    <gapJunction id="gap_junction032" conductance="0.438697nS"/>
    <gapJunction id="gap_junction033" conductance="0.828857nS"/>
    <gapJunction id="gap_junction034" conductance="0.254334nS"/>
    <gapJunction id="gap_junction035" conductance="0.404506nS"/>
    <gapJunction id="gap_junction036" conductance="0.469953nS"/>
    <gapJunction id="gap_junction037" conductance="1.158935nS"/>
    <gapJunction id="gap_junction038" conductance="1.403929nS"/>
    <gapJunction id="gap_junction039" conductance="0.566058nS"/>
    <gapJunction id="gap_junction040" conductance="0.897887nS"/>
    <gapJunction id="gap_junction041" conductance="0.575097nS"/>
    <gapJunction id="gap_junction042" conductance="0.386449nS"/>
    <gapJunction id="gap_junction043" conductance="0.401319nS"/>
    <gapJunction id="gap_junction044" conductance="0.661973nS"/>
    <gapJunction id="gap_junction045" conductance="0.772201nS"/>
    <gapJunction id="gap_junction046" conductance="1.464677nS"/>
    <gapJunction id="gap_junction047" conductance="0.740782nS"/>
    <gapJunction id="gap_junction048" conductance="0.839938nS"/>
    <gapJunction id="gap_junction049" conductance="0.800329nS"/>
    <gapJunction id="gap_junction050" conductance="0.590440nS"/>
    <gapJunction id="gap_junction051" conductance="0.721813nS"/>
    <gapJunction id="gap_junction052" conductance="0.499621nS"/>
    <gapJunction id="gap_junction053" conductance="0.342599nS"/>
    <gapJunction id="gap_junction054" conductance="0.189894nS"/>
    <gapJunction id="gap_junction055" conductance="0.127799nS"/>
    <gapJunction id="gap_junction056" conductance="0.378703nS"/>
    <gapJunction id="gap_junction057" conductance="1.300648nS"/>
    <gapJunction id="gap_junction058" conductance="0.962180nS"/>
    <gapJunction id="gap_junction059" conductance="0.144889nS"/>
    <gapJunction id="gap_junction060" conductance="0.934453nS"/>
    <gapJunction id="gap_junction061" conductance="0.373799nS"/>
    <gapJunction id="gap_junction062" conductance="0.353650nS"/>
    <gapJunction id="gap_junction063" conductance="0.242902nS"/>
    <gapJunction id="gap_junction064" conductance="3.554385nS"/>
    <gapJunction id="gap_junction065" conductance="0.111860nS"/>
    <gapJunction id="gap_junction066" conductance="0.147390nS"/>
    <gapJunction id="gap_junction067" conductance="0.143491nS"/>
    <gapJunction id="gap_junction068" conductance="0.364208nS"/>
    <gapJunction id="gap_junction069" conductance="0.188887nS"/>
    <gapJunction id="gap_junction070" conductance="0.106219nS"/>
    <gapJunction id="gap_junction071" conductance="0.376994nS"/>
    <gapJunction id="gap_junction072" conductance="0.538059nS"/>
    <gapJunction id="gap_junction073" conductance="1.513288nS"/>
    <gapJunction id="gap_junction074" conductance="1.205972nS"/>
    <gapJunction id="gap_junction075" conductance="0.782722nS"/>
    <gapJunction id="gap_junction076" conductance="0.089112nS"/>
    <gapJunction id="gap_junction077" conductance="0.302534nS"/>
    <gapJunction id="gap_junction078" conductance="0.112891nS"/>
    <gapJunction id="gap_junction079" conductance="1.011079nS"/>
    <gapJunction id="gap_junction080" conductance="1.181464nS"/>
    <gapJunction id="gap_junction081" conductance="0.168014nS"/>
    <gapJunction id="gap_junction082" conductance="0.704966nS"/>
    <gapJunction id="gap_junction083" conductance="0.479995nS"/>
    <gapJunction id="gap_junction084" conductance="0.924856nS"/>
    <gapJunction id="gap_junction085" conductance="0.999528nS"/>
    <gapJunction id="gap_junction086" conductance="0.091569nS"/>
    <gapJunction id="gap_junction087" conductance="1.609540nS"/>
    <gapJunction id="gap_junction088" conductance="0.334049nS"/>
    <gapJunction id="gap_junction089" conductance="0.362686nS"/>
    <gapJunction id="gap_junction090" conductance="1.049645nS"/>
    <gapJunction id="gap_junction091" conductance="1.047284nS"/>
    <gapJunction id="gap_junction092" conductance="0.319806nS"/>
    <gapJunction id="gap_junction093" conductance="0.574915nS"/>
    <gapJunction id="gap_junction094" conductance="0.461608nS"/>
    <gapJunction id="gap_junction095" conductance="0.238475nS"/>
    <gapJunction id="gap_junction096" conductance="0.418835nS"/>
    <gapJunction id="gap_junction097" conductance="0.563322nS"/>
    <gapJunction id="gap_junction098" conductance="0.527339nS"/>
    <gapJunction id="gap_junction099" conductance="0.180645nS"/>
    <gapJunction id="gap_junction0100" conductance="0.378173nS"/>
    <gapJunction id="gap_junction0101" conductance="0.576976nS"/>
    <gapJunction id="gap_junction0102" conductance="0.462055nS"/>
    <gapJunction id="gap_junction0103" conductance="0.190325nS"/>
    <gapJunction id="gap_junction0104" conductance="0.636756nS"/>
    <gapJunction id="gap_junction0105" conductance="1.989504nS"/>
    <gapJunction id="gap_junction0106" conductance="1.269669nS"/>
    <gapJunction id="gap_junction0107" conductance="0.533466nS"/>
    <gapJunction id="gap_junction0108" conductance="0.390574nS"/>
    <gapJunction id="gap_junction0109" conductance="0.346768nS"/>
    <gapJunction id="gap_junction0110" conductance="0.729812nS"/>
    <gapJunction id="gap_junction0111" conductance="0.623198nS"/>
    <gapJunction id="gap_junction0112" conductance="1.127828nS"/>
    <gapJunction id="gap_junction0113" conductance="0.372058nS"/>
    <gapJunction id="gap_junction0114" conductance="0.375489nS"/>
    <gapJunction id="gap_junction0115" conductance="0.548300nS"/>
    <gapJunction id="gap_junction0116" conductance="0.736859nS"/>
    <gapJunction id="gap_junction0117" conductance="0.095986nS"/>
    <gapJunction id="gap_junction0118" conductance="0.242813nS"/>
    <gapJunction id="gap_junction0119" conductance="0.342483nS"/>
    <gapJunction id="gap_junction0120" conductance="0.463753nS"/>
    <gapJunction id="gap_junction0121" conductance="0.107371nS"/>
    <gapJunction id="gap_junction0122" conductance="0.799169nS"/>
    <gapJunction id="gap_junction0123" conductance="0.425993nS"/>
    <gapJunction id="gap_junction0124" conductance="0.903439nS"/>
    <gapJunction id="gap_junction0125" conductance="0.201789nS"/>
    <gapJunction id="gap_junction0126" conductance="0.255491nS"/>
    <gapJunction id="gap_junction0127" conductance="0.438810nS"/>
    <gapJunction id="gap_junction0128" conductance="0.185703nS"/>
    <gapJunction id="gap_junction0129" conductance="0.495938nS"/>
    <gapJunction id="gap_junction0130" conductance="0.212606nS"/>
    <gapJunction id="gap_junction0131" conductance="0.171410nS"/>
    <gapJunction id="gap_junction0132" conductance="1.092339nS"/>
    <gapJunction id="gap_junction0133" conductance="0.709649nS"/>
    <gapJunction id="gap_junction0134" conductance="0.270262nS"/>
    <gapJunction id="gap_junction0135" conductance="0.387390nS"/>
    <gapJunction id="gap_junction0136" conductance="0.894549nS"/>
    <gapJunction id="gap_junction0137" conductance="0.515309nS"/>
    <gapJunction id="gap_junction0138" conductance="0.423748nS"/>
    <gapJunction id="gap_junction0139" conductance="0.178848nS"/>
    <gapJunction id="gap_junction0140" conductance="0.666254nS"/>
    <gapJunction id="gap_junction0141" conductance="0.799515nS"/>
    <gapJunction id="gap_junction0142" conductance="1.191369nS"/>
    <gapJunction id="gap_junction0143" conductance="0.356028nS"/>
    <gapJunction id="gap_junction0144" conductance="3.694054nS"/>
    <gapJunction id="gap_junction0145" conductance="0.322952nS"/>
    <gapJunction id="gap_junction0146" conductance="0.479648nS"/>
    <gapJunction id="gap_junction0147" conductance="0.450806nS"/>
    <gapJunction id="gap_junction0148" conductance="0.738297nS"/>
    <gapJunction id="gap_junction0149" conductance="0.116062nS"/>
    <gapJunction id="gap_junction0150" conductance="0.193082nS"/>
    <gapJunction id="gap_junction0151" conductance="1.543030nS"/>
    <gapJunction id="gap_junction0152" conductance="0.282174nS"/>
    <gapJunction id="gap_junction0153" conductance="0.241602nS"/>
    <gapJunction id="gap_junction0154" conductance="1.909002nS"/>
    <gapJunction id="gap_junction0155" conductance="0.193640nS"/>
    <gapJunction id="gap_junction0156" conductance="0.366296nS"/>
    <gapJunction id="gap_junction0157" conductance="0.584210nS"/>
    <gapJunction id="gap_junction0158" conductance="0.929047nS"/>
    <gapJunction id="gap_junction0159" conductance="0.238863nS"/>
    <gapJunction id="gap_junction0160" conductance="0.291197nS"/>
    <gapJunction id="gap_junction0161" conductance="2.321860nS"/>
    <gapJunction id="gap_junction0162" conductance="0.086641nS"/>
    <gapJunction id="gap_junction0163" conductance="0.672556nS"/>
    <gapJunction id="gap_junction0164" conductance="0.336931nS"/>
    <gapJunction id="gap_junction0165" conductance="0.131745nS"/>
    <gapJunction id="gap_junction0166" conductance="0.214342nS"/>
    <gapJunction id="gap_junction0167" conductance="0.112531nS"/>
    <gapJunction id="gap_junction0168" conductance="0.313776nS"/>
    <gapJunction id="gap_junction0169" conductance="0.601059nS"/>
    <gapJunction id="gap_junction0170" conductance="0.822076nS"/>
    <gapJunction id="gap_junction0171" conductance="0.307889nS"/>
    <gapJunction id="gap_junction0172" conductance="0.241324nS"/>
    <gapJunction id="gap_junction0173" conductance="1.224330nS"/>
    <gapJunction id="gap_junction0174" conductance="0.572106nS"/>
    <gapJunction id="gap_junction0175" conductance="1.027745nS"/>
    <gapJunction id="gap_junction0176" conductance="0.694122nS"/>
    <gapJunction id="gap_junction0177" conductance="0.997504nS"/>
    <gapJunction id="gap_junction0178" conductance="0.881149nS"/>
    <gapJunction id="gap_junction0179" conductance="0.433030nS"/>
    <gapJunction id="gap_junction0180" conductance="0.391690nS"/>
    <gapJunction id="gap_junction0181" conductance="0.655572nS"/>
    <gapJunction id="gap_junction0182" conductance="1.121756nS"/>
    <gapJunction id="gap_junction0183" conductance="0.412862nS"/>
    <gapJunction id="gap_junction0184" conductance="0.233011nS"/>
    <gapJunction id="gap_junction0185" conductance="2.887602nS"/>
    <gapJunction id="gap_junction0186" conductance="0.190907nS"/>
    <gapJunction id="gap_junction0187" conductance="3.195430nS"/>
    <gapJunction id="gap_junction0188" conductance="0.588828nS"/>
    <gapJunction id="gap_junction0189" conductance="0.923668nS"/>
    <gapJunction id="gap_junction0190" conductance="0.539036nS"/>
    <gapJunction id="gap_junction0191" conductance="0.558020nS"/>
    <gapJunction id="gap_junction0192" conductance="0.296178nS"/>
    <gapJunction id="gap_junction0193" conductance="3.168378nS"/>
    <gapJunction id="gap_junction0194" conductance="1.739535nS"/>
    <gapJunction id="gap_junction0195" conductance="0.500152nS"/>
    <gapJunction id="gap_junction0196" conductance="0.640578nS"/>
    <gapJunction id="gap_junction0197" conductance="0.931887nS"/>
    <gapJunction id="gap_junction0198" conductance="0.254710nS"/>
    <gapJunction id="gap_junction0199" conductance="0.143050nS"/>
    <gapJunction id="gap_junction0200" conductance="0.259982nS"/>
    <gapJunction id="gap_junction0201" conductance="3.397036nS"/>
    <gapJunction id="gap_junction0202" conductance="0.636245nS"/>
    <gapJunction id="gap_junction0203" conductance="1.997239nS"/>
    <gapJunction id="gap_junction0204" conductance="0.748123nS"/>
    <gapJunction id="gap_junction0205" conductance="0.299332nS"/>
    <gapJunction id="gap_junction0206" conductance="0.343094nS"/>
    <gapJunction id="gap_junction0207" conductance="1.759372nS"/>
    <gapJunction id="gap_junction0208" conductance="0.705430nS"/>
    <gapJunction id="gap_junction0209" conductance="0.692209nS"/>
    <gapJunction id="gap_junction0210" conductance="2.829550nS"/>
    <gapJunction id="gap_junction0211" conductance="2.609666nS"/>
    <gapJunction id="gap_junction0212" conductance="1.565682nS"/>
    <gapJunction id="gap_junction0213" conductance="0.666224nS"/>
    <gapJunction id="gap_junction0214" conductance="0.305149nS"/>
    <gapJunction id="gap_junction0215" conductance="4.679580nS"/>
    <gapJunction id="gap_junction0216" conductance="1.002384nS"/>
    <gapJunction id="gap_junction0217" conductance="1.702481nS"/>
    <gapJunction id="gap_junction0218" conductance="0.898042nS"/>
    <gapJunction id="gap_junction0219" conductance="0.753014nS"/>
    <gapJunction id="gap_junction0220" conductance="0.307533nS"/>
    <gapJunction id="gap_junction0221" conductance="7.089948nS"/>
    <gapJunction id="gap_junction0222" conductance="0.240843nS"/>
    <gapJunction id="gap_junction0223" conductance="1.077487nS"/>
    <gapJunction id="gap_junction0224" conductance="0.087190nS"/>
    <gapJunction id="gap_junction0225" conductance="0.236065nS"/>
    <gapJunction id="gap_junction0226" conductance="0.992037nS"/>
    <gapJunction id="gap_junction0227" conductance="0.512410nS"/>
    <gapJunction id="gap_junction0228" conductance="0.632220nS"/>
    <gapJunction id="gap_junction0229" conductance="0.219191nS"/>
    <gapJunction id="gap_junction0230" conductance="0.752163nS"/>
    <gapJunction id="gap_junction0231" conductance="1.486948nS"/>
    <gapJunction id="gap_junction0232" conductance="0.822022nS"/>
    <gapJunction id="gap_junction0233" conductance="0.896380nS"/>
    <gapJunction id="gap_junction0234" conductance="1.224513nS"/>
    <gapJunction id="gap_junction0235" conductance="0.235140nS"/>
    <gapJunction id="gap_junction0236" conductance="0.990148nS"/>
    <gapJunction id="gap_junction0237" conductance="0.075609nS"/>
    <gapJunction id="gap_junction0238" conductance="0.931090nS"/>
    <gapJunction id="gap_junction0239" conductance="0.398575nS"/>
    <gapJunction id="gap_junction0240" conductance="1.172786nS"/>
    <gapJunction id="gap_junction0241" conductance="2.037920nS"/>
    <gapJunction id="gap_junction0242" conductance="0.957898nS"/>
    <gapJunction id="gap_junction0243" conductance="0.623838nS"/>
    <gapJunction id="gap_junction0244" conductance="0.492212nS"/>
    <gapJunction id="gap_junction0245" conductance="1.177390nS"/>
    <gapJunction id="gap_junction0246" conductance="2.970964nS"/>
    <gapJunction id="gap_junction0247" conductance="1.271669nS"/>
    <gapJunction id="gap_junction0248" conductance="0.371886nS"/>
    <gapJunction id="gap_junction0249" conductance="2.455508nS"/>
    <gapJunction id="gap_junction0250" conductance="1.567349nS"/>
    <gapJunction id="gap_junction0251" conductance="0.905646nS"/>
    <gapJunction id="gap_junction0252" conductance="0.457615nS"/>
    <gapJunction id="gap_junction0253" conductance="0.788617nS"/>
    <gapJunction id="gap_junction0254" conductance="3.384789nS"/>
    <gapJunction id="gap_junction0255" conductance="0.832727nS"/>
    <gapJunction id="gap_junction0256" conductance="1.064795nS"/>
    <gapJunction id="gap_junction0257" conductance="0.656721nS"/>
    <gapJunction id="gap_junction0258" conductance="0.506961nS"/>
    <gapJunction id="gap_junction0259" conductance="1.266085nS"/>
    <gapJunction id="gap_junction0260" conductance="0.478746nS"/>
    <gapJunction id="gap_junction0261" conductance="0.200436nS"/>
    <gapJunction id="gap_junction0262" conductance="1.092333nS"/>
    <gapJunction id="gap_junction0263" conductance="0.272640nS"/>
    <gapJunction id="gap_junction0264" conductance="0.300467nS"/>
    <pulseGenerator id="Pulse_vrpop0_Golgi_pop0_0" delay="0.000000ms" duration="3000.000000ms" amplitude="8.368537pA"/>
    <pulseGenerator id="Pulse_vrpop0_Golgi_pop0_1" delay="0.000000ms" duration="3000.000000ms" amplitude="5.864622pA"/>
    <pulseGenerator id="Pulse_vrpop0_Golgi_pop0_2" delay="0.000000ms" duration="3000.000000ms" amplitude="25.424968pA"/>
    <pulseGenerator id="Pulse_vrpop0_Golgi_pop0_3" delay="0.000000ms" duration="3000.000000ms" amplitude="42.692035pA"/>
    <pulseGenerator id="Pulse_vrpop0_Golgi_pop0_4" delay="0.000000ms" duration="3000.000000ms" amplitude="9.275325pA"/>
    <pulseGenerator id="Pulse_vrpop0_Golgi_pop0_5" delay="0.000000ms" duration="3000.000000ms" amplitude="-22.116641pA"/>
    <pulseGenerator id="Pulse_vrpop0_Golgi_pop0_6" delay="0.000000ms" duration="3000.000000ms" amplitude="9.680447pA"/>
    <pulseGenerator id="Pulse_vrpop0_Golgi_pop0_7" delay="0.000000ms" duration="3000.000000ms" amplitude="21.930879pA"/>
    <pulseGenerator id="Pulse_vrpop0_Golgi_pop0_8" delay="0.000000ms" duration="3000.000000ms" amplitude="-16.411850pA"/>
    <pulseGenerator id="Pulse_vrpop0_Golgi_pop0_9" delay="0.000000ms" duration="3000.000000ms" amplitude="-18.138887pA"/>
    <pulseGenerator id="Pulse_vrpop0_Golgi_pop0_10" delay="0.000000ms" duration="3000.000000ms" amplitude="27.035014pA"/>
    <pulseGenerator id="Pulse_vrpop0_Golgi_pop0_11" delay="0.000000ms" duration="3000.000000ms" amplitude="59.632420pA"/>
    <pulseGenerator id="Pulse_vrpop0_Golgi_pop0_12" delay="0.000000ms" duration="3000.000000ms" amplitude="6.536559pA"/>
    <pulseGenerator id="Pulse_vrpop0_Golgi_pop0_13" delay="0.000000ms" duration="3000.000000ms" amplitude="-10.563000pA"/>
    <pulseGenerator id="Pulse_vrpop0_Golgi_pop0_14" delay="0.000000ms" duration="3000.000000ms" amplitude="-3.132693pA"/>
    <pulseGenerator id="Pulse_vrpop0_Golgi_pop0_15" delay="0.000000ms" duration="3000.000000ms" amplitude="1.384113pA"/>
    <pulseGenerator id="Pulse_vrpop0_Golgi_pop0_16" delay="0.000000ms" duration="3000.000000ms" amplitude="-6.495680pA"/>
    <pulseGenerator id="Pulse_vrpop0_Golgi_pop0_17" delay="0.000000ms" duration="3000.000000ms" amplitude="-18.017482pA"/>
    <pulseGenerator id="Pulse_vrpop0_Golgi_pop0_18" delay="0.000000ms" duration="3000.000000ms" amplitude="35.977971pA"/>
    <pulseGenerator id="Pulse_vrpop0_Golgi_pop0_19" delay="0.000000ms" duration="3000.000000ms" amplitude="39.888938pA"/>
    <pulseGenerator id="Pulse_vrpop0_Golgi_pop0_20" delay="0.000000ms" duration="3000.000000ms" amplitude="-39.317471pA"/>
    <pulseGenerator id="Pulse_vrpop0_Golgi_pop0_21" delay="0.000000ms" duration="3000.000000ms" amplitude="32.496363pA"/>
    <pulseGenerator id="Pulse_vrpop0_Golgi_pop0_22" delay="0.000000ms" duration="3000.000000ms" amplitude="8.097655pA"/>
    <pulseGenerator id="Pulse_vrpop0_Golgi_pop0_23" delay="0.000000ms" duration="3000.000000ms" amplitude="0.851498pA"/>
    <pulseGenerator id="Pulse_vrpop0_Golgi_pop0_24" delay="0.000000ms" duration="3000.000000ms" amplitude="-23.239822pA"/>
    <pulseGenerator id="Pulse_vrpop0_Golgi_pop0_25" delay="0.000000ms" duration="3000.000000ms" amplitude="10.701529pA"/>
    <pulseGenerator id="Pulse_vrpop0_Golgi_pop0_26" delay="0.000000ms" duration="3000.000000ms" amplitude="58.608591pA"/>
    <pulseGenerator id="Pulse_vrpop0_Golgi_pop0_27" delay="0.000000ms" duration="3000.000000ms" amplitude="15.213218pA"/>
    <pulseGenerator id="Pulse_vrpop0_Golgi_pop0_28" delay="0.000000ms" duration="3000.000000ms" amplitude="1.234941pA"/>
    <pulseGenerator id="Pulse_vrpop0_Golgi_pop0_29" delay="0.000000ms" duration="3000.000000ms" amplitude="25.849585pA"/>
    <pulseGenerator id="Pulse_vrpop0_Golgi_pop0_30" delay="0.000000ms" duration="3000.000000ms" amplitude="49.253741pA"/>
    <pulseGenerator id="Pulse_vrpop0_Golgi_pop0_31" delay="0.000000ms" duration="3000.000000ms" amplitude="20.576748pA"/>
    <pulseGenerator id="Pulse_vrpop0_Golgi_pop0_32" delay="0.000000ms" duration="3000.000000ms" amplitude="74.481261pA"/>
    <pulseGenerator id="Pulse_vrpop0_Golgi_pop0_33" delay="0.000000ms" duration="3000.000000ms" amplitude="-23.758331pA"/>
    <pulseGenerator id="Pulse_vrpop0_Golgi_pop0_34" delay="0.000000ms" duration="3000.000000ms" amplitude="37.811012pA"/>
    <pulseGenerator id="Pulse_vrpop0_Golgi_pop0_35" delay="0.000000ms" duration="3000.000000ms" amplitude="-59.750193pA"/>
    <pulseGenerator id="Pulse_vrpop0_Golgi_pop0_36" delay="0.000000ms" duration="3000.000000ms" amplitude="-2.734543pA"/>
    <pulseGenerator id="Pulse_vrpop0_Golgi_pop0_37" delay="0.000000ms" duration="3000.000000ms" amplitude="9.578799pA"/>
    <pulseGenerator id="Pulse_vrpop0_Golgi_pop0_38" delay="0.000000ms" duration="3000.000000ms" amplitude="18.678460pA"/>
    <pulseGenerator id="Pulse_vrpop0_Golgi_pop0_39" delay="0.000000ms" duration="3000.000000ms" amplitude="-45.900574pA"/>
    <pulseGenerator id="Pulse_vrpop0_Golgi_pop0_40" delay="0.000000ms" duration="3000.000000ms" amplitude="-6.800566pA"/>
    <pulseGenerator id="Pulse_vrpop0_Golgi_pop0_41" delay="0.000000ms" duration="3000.000000ms" amplitude="-25.862714pA"/>
    <pulseGenerator id="Pulse_vrpop0_Golgi_pop0_42" delay="0.000000ms" duration="3000.000000ms" amplitude="51.804078pA"/>
    <pulseGenerator id="Pulse_vrpop0_Golgi_pop0_43" delay="0.000000ms" duration="3000.000000ms" amplitude="23.022718pA"/>
    <pulseGenerator id="Pulse_vrpop0_Golgi_pop0_44" delay="0.000000ms" duration="3000.000000ms" amplitude="-23.050932pA"/>
    <pulseGenerator id="Pulse_vrpop0_Golgi_pop0_45" delay="0.000000ms" duration="3000.000000ms" amplitude="31.246259pA"/>
    <pulseGenerator id="Pulse_vrpop0_Golgi_pop0_46" delay="0.000000ms" duration="3000.000000ms" amplitude="5.115305pA"/>
    <pulseGenerator id="Pulse_vrpop0_Golgi_pop0_47" delay="0.000000ms" duration="3000.000000ms" amplitude="-12.734153pA"/>
    <pulseGenerator id="Pulse_vrpop0_Golgi_pop0_48" delay="0.000000ms" duration="3000.000000ms" amplitude="-1.748751pA"/>
    <pulseGenerator id="Pulse_vrpop0_Golgi_pop0_49" delay="0.000000ms" duration="3000.000000ms" amplitude="-9.754039pA"/>
    <pulseGenerator id="Pulse_vrpop0_Golgi_pop0_50" delay="0.000000ms" duration="3000.000000ms" amplitude="-34.952701pA"/>
    <pulseGenerator id="Pulse_vrpop0_Golgi_pop0_51" delay="0.000000ms" duration="3000.000000ms" amplitude="46.045133pA"/>
    <pulseGenerator id="Pulse_vrpop0_Golgi_pop0_52" delay="0.000000ms" duration="3000.000000ms" amplitude="-38.708847pA"/>
    <pulseGenerator id="Pulse_vrpop0_Golgi_pop0_53" delay="0.000000ms" duration="3000.000000ms" amplitude="40.832483pA"/>
    <pulseGenerator id="Pulse_vrpop0_Golgi_pop0_54" delay="0.000000ms" duration="3000.000000ms" amplitude="91.459685pA"/>
    <pulseGenerator id="Pulse_vrpop0_Golgi_pop0_55" delay="0.000000ms" duration="3000.000000ms" amplitude="-8.561249pA"/>
    <pulseGenerator id="Pulse_vrpop0_Golgi_pop0_56" delay="0.000000ms" duration="3000.000000ms" amplitude="-39.636408pA"/>
    <pulseGenerator id="Pulse_vrpop0_Golgi_pop0_57" delay="0.000000ms" duration="3000.000000ms" amplitude="21.614288pA"/>
    <pulseGenerator id="Pulse_vrpop0_Golgi_pop0_58" delay="0.000000ms" duration="3000.000000ms" amplitude="1.841377pA"/>
    <pulseGenerator id="Pulse_vrpop0_Golgi_pop0_59" delay="0.000000ms" duration="3000.000000ms" amplitude="10.302029pA"/>
    <pulseGenerator id="Pulse_vrpop0_Golgi_pop0_60" delay="0.000000ms" duration="3000.000000ms" amplitude="2.088282pA"/>
    <pulseGenerator id="Pulse_vrpop0_Golgi_pop0_61" delay="0.000000ms" duration="3000.000000ms" amplitude="-4.631300pA"/>
    <pulseGenerator id="Pulse_vrpop0_Golgi_pop0_62" delay="0.000000ms" duration="3000.000000ms" amplitude="9.406929pA"/>
    <pulseGenerator id="Pulse_vrpop0_Golgi_pop0_63" delay="0.000000ms" duration="3000.000000ms" amplitude="-32.750811pA"/>
    <pulseGenerator id="Pulse_vrpop0_Golgi_pop0_64" delay="0.000000ms" duration="3000.000000ms" amplitude="-24.020943pA"/>
    <pulseGenerator id="Pulse_vrpop0_Golgi_pop0_65" delay="0.000000ms" duration="3000.000000ms" amplitude="62.636501pA"/>
    <pulseGenerator id="Pulse_vrpop0_Golgi_pop0_66" delay="0.000000ms" duration="3000.000000ms" amplitude="2.004207pA"/>
    <pulseGenerator id="Pulse_vrpop0_Golgi_pop0_67" delay="0.000000ms" duration="3000.000000ms" amplitude="11.334685pA"/>
    <pulseGenerator id="Pulse_vrpop0_Golgi_pop0_68" delay="0.000000ms" duration="3000.000000ms" amplitude="-8.595732pA"/>
    <pulseGenerator id="Pulse_vrpop0_Golgi_pop0_69" delay="0.000000ms" duration="3000.000000ms" amplitude="9.843069pA"/>
    <pulseGenerator id="Pulse_vrpop0_Golgi_pop0_70" delay="0.000000ms" duration="3000.000000ms" amplitude="3.476605pA"/>
    <pulseGenerator id="Pulse_vrpop0_Golgi_pop0_71" delay="0.000000ms" duration="3000.000000ms" amplitude="-1.669076pA"/>
    <pulseGenerator id="Pulse_vrpop0_Golgi_pop0_72" delay="0.000000ms" duration="3000.000000ms" amplitude="-2.773306pA"/>
    <pulseGenerator id="Pulse_vrpop0_Golgi_pop0_73" delay="0.000000ms" duration="3000.000000ms" amplitude="4.242073pA"/>
    <pulseGenerator id="Pulse_vrpop0_Golgi_pop0_74" delay="0.000000ms" duration="3000.000000ms" amplitude="-22.693499pA"/>
    <pulseGenerator id="Pulse_vrpop0_Golgi_pop0_75" delay="0.000000ms" duration="3000.000000ms" amplitude="-78.009727pA"/>
    <pulseGenerator id="Pulse_vrpop0_Golgi_pop0_76" delay="0.000000ms" duration="3000.000000ms" amplitude="31.225124pA"/>
    <pulseGenerator id="Pulse_vrpop0_Golgi_pop0_77" delay="0.000000ms" duration="3000.000000ms" amplitude="-6.083972pA"/>
    <pulseGenerator id="Pulse_vrpop0_Golgi_pop0_78" delay="0.000000ms" duration="3000.000000ms" amplitude="-25.527810pA"/>
    <pulseGenerator id="Pulse_vrpop0_Golgi_pop0_79" delay="0.000000ms" duration="3000.000000ms" amplitude="5.358444pA"/>
    <pulseGenerator id="Pulse_vrpop0_Golgi_pop0_80" delay="0.000000ms" duration="3000.000000ms" amplitude="-38.382456pA"/>
    <pulseGenerator id="Pulse_vrpop0_Golgi_pop0_81" delay="0.000000ms" duration="3000.000000ms" amplitude="58.063158pA"/>
    <pulseGenerator id="Pulse_vrpop0_Golgi_pop0_82" delay="0.000000ms" duration="3000.000000ms" amplitude="-61.788816pA"/>
    <pulseGenerator id="Pulse_vrpop0_Golgi_pop0_83" delay="0.000000ms" duration="3000.000000ms" amplitude="-49.024052pA"/>
    <pulseGenerator id="Pulse_vrpop0_Golgi_pop0_84" delay="0.000000ms" duration="3000.000000ms" amplitude="-14.690906pA"/>
    <pulseGenerator id="Pulse_vrpop0_Golgi_pop0_85" delay="0.000000ms" duration="3000.000000ms" amplitude="-2.779991pA"/>
    <poissonFiringSynapse id="XFpop0b_MF_Golgi_pop0_syn0" averageRate="2.000000 per_s" synapse="MF" spikeTarget="./MF"/>
    <poissonFiringSynapse id="XFpop0b_PF_Golgi_pop0_syn1" averageRate="0.500000 per_s" synapse="PF" spikeTarget="./PF"/>
    <transientPoissonFiringSynapse id="XFpop0l_MF_Golgi_pop0_syn0" averageRate="200.000000 per_s" delay="600.000000ms" duration="10.000000ms" synapse="MF" spikeTarget="./MF"/>
    <transientPoissonFiringSynapse id="XFpop0l_PF_Golgi_pop0_syn1" averageRate="350.000000 per_s" delay="610.000000ms" duration="15.000000ms" synapse="PF" spikeTarget="./PF"/>
    <transientPoissonFiringSynapse id="XFpop0m_MF_Golgi_pop0_syn0" averageRate="200.000000 per_s" delay="725.000000ms" duration="10.000000ms" synapse="MF" spikeTarget="./MF"/>
    <transientPoissonFiringSynapse id="XFpop0m_PF_Golgi_pop0_syn1" averageRate="350.000000 per_s" delay="735.000000ms" duration="15.000000ms" synapse="PF" spikeTarget="./PF"/>
    <transientPoissonFiringSynapse id="XFpop0r_MF_Golgi_pop0_syn0" averageRate="200.000000 per_s" delay="850.000000ms" duration="10.000000ms" synapse="MF" spikeTarget="./MF"/>
    <transientPoissonFiringSynapse id="XFpop0r_PF_Golgi_pop0_syn1" averageRate="350.000000 per_s" delay="860.000000ms" duration="15.000000ms" synapse="PF" spikeTarget="./PF"/>
    <network id="Golgi_V2010_regional_from_left_to_right_100ms_trial0_network" type="networkWithTemperature" temperature="23 degC">
        <notes>Parameter arrays for building this network are listed below:
Cell distribution parameters:
{'densityFilePath': '/home/rokas/Golgi_data/Pure NeuG density matrix of shape 69 630.txt', 'dim3': 'z', 'distributionModel': 'density_profile', 'distanceModel': 'random', 'planeDimensions': {'dim2': 'y', 'dim1': 'x'}, 'dim2CoordinateVector': [0, 110], 'dim3Boundary': 100, 'popID': 'Golgi_pop0', 'dim1CoordinateVector': [0, 3000], 'canonicalVolumeBaseAreainMicrons': 25.0318596439065}
Cell population parameters:
Cell population parameters for Golgi_pop0:
{'NeuroML2CellType': 'cell2CaPools', 'popID': 'Golgi_pop0', 'cellType': 'Golgi_10comp_13channels_2CaPools', 'size': 86}
Cell connectivity parameters:
{'testingConductanceScale': 1, 'electricalConnModel': 'Vervaeke_2010_based', 'postPoptargetGroup': {'segmentGroupList': ['apical_dendrite_group', 'basal_dendrite_group'], 'segmentGroupProbabilities': {'basal_dendrite_group': 0.5, 'apical_dendrite_group': 0.5}}, 'units': 'nS', 'normalizeConductances': False, 'spatialScale': 1.0, 'prePopID': 'Golgi_pop0', 'postPopID': 'Golgi_pop0', 'prePoptargetGroup': {'segmentGroupList': ['apical_dendrite_group', 'basal_dendrite_group'], 'segmentGroupProbabilities': {'basal_dendrite_group': 0.5, 'apical_dendrite_group': 0.5}}}
Input parameters for a list of populations:
Input group parameters for Golgi_pop0:
{'stDevAmp': 32, 'inputModel': 'variable_basal_firing_rate', 'ampUnits': 'pA', 'amplitudeDistribution': 'gaussian', 'averageAmp': 0, 'valueOffset': 0, 'inputLabel': 'vrpop0', 'offsetDistribution': 'constant', 'offsetUnits': 'ms'}
{'synapseList': [{'noInputs': 8, 'synapseMode': 'transient', 'segmentGroupProbabilities': {'basal_dendrite_group': 1}, 'synapseType': 'MF', 'duration': 10, 'segmentGroupList': ['basal_dendrite_group'], 'targetingModel': 'segment groups and segments', 'averageRate': 200, 'delay': 600, 'units': 'ms', 'numberModel': 'constant number of inputs per cell'}, {'noInputs': 50, 'synapseMode': 'transient', 'segmentGroupProbabilities': {'apical_dendrite_group': 1}, 'synapseType': 'PF', 'duration': 15, 'segmentGroupList': ['apical_dendrite_group'], 'targetingModel': 'segment groups and segments', 'averageRate': 350, 'delay': 610, 'units': 'ms', 'numberModel': 'constant number of inputs per cell'}], 'inputLabel': 'XFpop0l', 'inputModel': 'XF', 'fractionToTarget': 0.22, 'targetingRegime': '3D_region_specific', 'colocalizeSynapses': False, 'regionList': [{'zVector': [0, 100], 'xVector': [0, 1000], 'yVector': [0, 110]}]}
{'synapseList': [{'noInputs': 8, 'synapseMode': 'transient', 'segmentGroupProbabilities': {'basal_dendrite_group': 1}, 'synapseType': 'MF', 'duration': 10, 'segmentGroupList': ['basal_dendrite_group'], 'targetingModel': 'segment groups and segments', 'averageRate': 200, 'delay': 725, 'units': 'ms', 'numberModel': 'constant number of inputs per cell'}, {'noInputs': 50, 'synapseMode': 'transient', 'segmentGroupProbabilities': {'apical_dendrite_group': 1}, 'synapseType': 'PF', 'duration': 15, 'segmentGroupList': ['apical_dendrite_group'], 'targetingModel': 'segment groups and segments', 'averageRate': 350, 'delay': 735, 'units': 'ms', 'numberModel': 'constant number of inputs per cell'}], 'inputLabel': 'XFpop0m', 'inputModel': 'XF', 'fractionToTarget': 0.22, 'targetingRegime': '3D_region_specific', 'colocalizeSynapses': False, 'regionList': [{'zVector': [0, 100], 'xVector': [1000, 2000], 'yVector': [0, 110]}]}
{'synapseList': [{'noInputs': 8, 'synapseMode': 'transient', 'segmentGroupProbabilities': {'basal_dendrite_group': 1}, 'synapseType': 'MF', 'duration': 10, 'segmentGroupList': ['basal_dendrite_group'], 'targetingModel': 'segment groups and segments', 'averageRate': 200, 'delay': 850, 'units': 'ms', 'numberModel': 'constant number of inputs per cell'}, {'noInputs': 50, 'synapseMode': 'transient', 'segmentGroupProbabilities': {'apical_dendrite_group': 1}, 'synapseType': 'PF', 'duration': 15, 'segmentGroupList': ['apical_dendrite_group'], 'targetingModel': 'segment groups and segments', 'averageRate': 350, 'delay': 860, 'units': 'ms', 'numberModel': 'constant number of inputs per cell'}], 'inputLabel': 'XFpop0r', 'inputModel': 'XF', 'fractionToTarget': 0.22, 'targetingRegime': '3D_region_specific', 'colocalizeSynapses': False, 'regionList': [{'zVector': [0, 100], 'xVector': [2000, 3000], 'yVector': [0, 110]}]}
{'synapseList': [{'segmentGroupList': ['basal_dendrite_group'], 'targetingModel': 'segment groups and segments', 'synapseMode': 'persistent', 'averageRate': 2, 'noInputs': 20, 'synapseType': 'MF', 'numberModel': 'constant number of inputs per cell', 'segmentGroupProbabilities': {'basal_dendrite_group': 1}}, {'segmentGroupList': ['apical_dendrite_group'], 'targetingModel': 'segment groups and segments', 'synapseMode': 'persistent', 'averageRate': 0.5, 'noInputs': 100, 'synapseType': 'PF', 'numberModel': 'constant number of inputs per cell', 'segmentGroupProbabilities': {'apical_dendrite_group': 1}}], 'inputLabel': 'XFpop0b', 'inputModel': 'XF', 'fractionToTarget': 1, 'targetingRegime': 'uniform', 'colocalizeSynapses': False}
</notes>
        <population id="Golgi_pop0" component="Golgi_10comp_13channels_2CaPools" size="86" type="populationList">
            <instance id="0">
                <location x="1649.241533329226741" y="3.045577683399815" z="44.862610512824773"/>
            </instance>
            <instance id="1">
                <location x="1733.544405091238787" y="1.648002071565327" z="55.34864704557576"/>
            </instance>
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        </population>
        <electricalProjection id="proj0" presynapticPopulation="Golgi_pop0" postsynapticPopulation="Golgi_pop0">
            <electricalConnectionInstance id="0" preCell="../Golgi_pop0/0/Golgi_10comp_13channels_2CaPools" preSegment="7" preFractionAlong="0.813201" postCell="../Golgi_pop0/1/Golgi_10comp_13channels_2CaPools" postSegment="4" postFractionAlong="0.632949" synapse="gap_junction00"/>
            <electricalConnectionInstance id="1" preCell="../Golgi_pop0/0/Golgi_10comp_13channels_2CaPools" preSegment="5" preFractionAlong="0.273586" postCell="../Golgi_pop0/10/Golgi_10comp_13channels_2CaPools" postSegment="3" postFractionAlong="0.751242" synapse="gap_junction01"/>
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        </electricalProjection>
        <inputList id="vrpop0_Golgi_pop0_0" population="Golgi_pop0" component="Pulse_vrpop0_Golgi_pop0_0">
            <input id="0" target="../Golgi_pop0/0/Golgi_10comp_13channels_2CaPools" destination="synapses"/>
        </inputList>
        <inputList id="vrpop0_Golgi_pop0_1" population="Golgi_pop0" component="Pulse_vrpop0_Golgi_pop0_1">
            <input id="1" target="../Golgi_pop0/1/Golgi_10comp_13channels_2CaPools" destination="synapses"/>
        </inputList>
        <inputList id="vrpop0_Golgi_pop0_2" population="Golgi_pop0" component="Pulse_vrpop0_Golgi_pop0_2">
            <input id="2" target="../Golgi_pop0/2/Golgi_10comp_13channels_2CaPools" destination="synapses"/>
        </inputList>
        <inputList id="vrpop0_Golgi_pop0_3" population="Golgi_pop0" component="Pulse_vrpop0_Golgi_pop0_3">
            <input id="3" target="../Golgi_pop0/3/Golgi_10comp_13channels_2CaPools" destination="synapses"/>
        </inputList>
        <inputList id="vrpop0_Golgi_pop0_4" population="Golgi_pop0" component="Pulse_vrpop0_Golgi_pop0_4">
            <input id="4" target="../Golgi_pop0/4/Golgi_10comp_13channels_2CaPools" destination="synapses"/>
        </inputList>
        <inputList id="vrpop0_Golgi_pop0_5" population="Golgi_pop0" component="Pulse_vrpop0_Golgi_pop0_5">
            <input id="5" target="../Golgi_pop0/5/Golgi_10comp_13channels_2CaPools" destination="synapses"/>
        </inputList>
        <inputList id="vrpop0_Golgi_pop0_6" population="Golgi_pop0" component="Pulse_vrpop0_Golgi_pop0_6">
            <input id="6" target="../Golgi_pop0/6/Golgi_10comp_13channels_2CaPools" destination="synapses"/>
        </inputList>
        <inputList id="vrpop0_Golgi_pop0_7" population="Golgi_pop0" component="Pulse_vrpop0_Golgi_pop0_7">
            <input id="7" target="../Golgi_pop0/7/Golgi_10comp_13channels_2CaPools" destination="synapses"/>
        </inputList>
        <inputList id="vrpop0_Golgi_pop0_8" population="Golgi_pop0" component="Pulse_vrpop0_Golgi_pop0_8">
            <input id="8" target="../Golgi_pop0/8/Golgi_10comp_13channels_2CaPools" destination="synapses"/>
        </inputList>
        <inputList id="vrpop0_Golgi_pop0_9" population="Golgi_pop0" component="Pulse_vrpop0_Golgi_pop0_9">
            <input id="9" target="../Golgi_pop0/9/Golgi_10comp_13channels_2CaPools" destination="synapses"/>
        </inputList>
        <inputList id="vrpop0_Golgi_pop0_10" population="Golgi_pop0" component="Pulse_vrpop0_Golgi_pop0_10">
            <input id="10" target="../Golgi_pop0/10/Golgi_10comp_13channels_2CaPools" destination="synapses"/>
        </inputList>
        <inputList id="vrpop0_Golgi_pop0_11" population="Golgi_pop0" component="Pulse_vrpop0_Golgi_pop0_11">
            <input id="11" target="../Golgi_pop0/11/Golgi_10comp_13channels_2CaPools" destination="synapses"/>
        </inputList>
        <inputList id="vrpop0_Golgi_pop0_12" population="Golgi_pop0" component="Pulse_vrpop0_Golgi_pop0_12">
            <input id="12" target="../Golgi_pop0/12/Golgi_10comp_13channels_2CaPools" destination="synapses"/>
        </inputList>
        <inputList id="vrpop0_Golgi_pop0_13" population="Golgi_pop0" component="Pulse_vrpop0_Golgi_pop0_13">
            <input id="13" target="../Golgi_pop0/13/Golgi_10comp_13channels_2CaPools" destination="synapses"/>
        </inputList>
        <inputList id="vrpop0_Golgi_pop0_14" population="Golgi_pop0" component="Pulse_vrpop0_Golgi_pop0_14">
            <input id="14" target="../Golgi_pop0/14/Golgi_10comp_13channels_2CaPools" destination="synapses"/>
        </inputList>
        <inputList id="vrpop0_Golgi_pop0_15" population="Golgi_pop0" component="Pulse_vrpop0_Golgi_pop0_15">
            <input id="15" target="../Golgi_pop0/15/Golgi_10comp_13channels_2CaPools" destination="synapses"/>
        </inputList>
        <inputList id="vrpop0_Golgi_pop0_16" population="Golgi_pop0" component="Pulse_vrpop0_Golgi_pop0_16">
            <input id="16" target="../Golgi_pop0/16/Golgi_10comp_13channels_2CaPools" destination="synapses"/>
        </inputList>
        <inputList id="vrpop0_Golgi_pop0_17" population="Golgi_pop0" component="Pulse_vrpop0_Golgi_pop0_17">
            <input id="17" target="../Golgi_pop0/17/Golgi_10comp_13channels_2CaPools" destination="synapses"/>
        </inputList>
        <inputList id="vrpop0_Golgi_pop0_18" population="Golgi_pop0" component="Pulse_vrpop0_Golgi_pop0_18">
            <input id="18" target="../Golgi_pop0/18/Golgi_10comp_13channels_2CaPools" destination="synapses"/>
        </inputList>
        <inputList id="vrpop0_Golgi_pop0_19" population="Golgi_pop0" component="Pulse_vrpop0_Golgi_pop0_19">
            <input id="19" target="../Golgi_pop0/19/Golgi_10comp_13channels_2CaPools" destination="synapses"/>
        </inputList>
        <inputList id="vrpop0_Golgi_pop0_20" population="Golgi_pop0" component="Pulse_vrpop0_Golgi_pop0_20">
            <input id="20" target="../Golgi_pop0/20/Golgi_10comp_13channels_2CaPools" destination="synapses"/>
        </inputList>
        <inputList id="vrpop0_Golgi_pop0_21" population="Golgi_pop0" component="Pulse_vrpop0_Golgi_pop0_21">
            <input id="21" target="../Golgi_pop0/21/Golgi_10comp_13channels_2CaPools" destination="synapses"/>
        </inputList>
        <inputList id="vrpop0_Golgi_pop0_22" population="Golgi_pop0" component="Pulse_vrpop0_Golgi_pop0_22">
            <input id="22" target="../Golgi_pop0/22/Golgi_10comp_13channels_2CaPools" destination="synapses"/>
        </inputList>
        <inputList id="vrpop0_Golgi_pop0_23" population="Golgi_pop0" component="Pulse_vrpop0_Golgi_pop0_23">
            <input id="23" target="../Golgi_pop0/23/Golgi_10comp_13channels_2CaPools" destination="synapses"/>
        </inputList>
        <inputList id="vrpop0_Golgi_pop0_24" population="Golgi_pop0" component="Pulse_vrpop0_Golgi_pop0_24">
            <input id="24" target="../Golgi_pop0/24/Golgi_10comp_13channels_2CaPools" destination="synapses"/>
        </inputList>
        <inputList id="vrpop0_Golgi_pop0_25" population="Golgi_pop0" component="Pulse_vrpop0_Golgi_pop0_25">
            <input id="25" target="../Golgi_pop0/25/Golgi_10comp_13channels_2CaPools" destination="synapses"/>
        </inputList>
        <inputList id="vrpop0_Golgi_pop0_26" population="Golgi_pop0" component="Pulse_vrpop0_Golgi_pop0_26">
            <input id="26" target="../Golgi_pop0/26/Golgi_10comp_13channels_2CaPools" destination="synapses"/>
        </inputList>
        <inputList id="vrpop0_Golgi_pop0_27" population="Golgi_pop0" component="Pulse_vrpop0_Golgi_pop0_27">
            <input id="27" target="../Golgi_pop0/27/Golgi_10comp_13channels_2CaPools" destination="synapses"/>
        </inputList>
        <inputList id="vrpop0_Golgi_pop0_28" population="Golgi_pop0" component="Pulse_vrpop0_Golgi_pop0_28">
            <input id="28" target="../Golgi_pop0/28/Golgi_10comp_13channels_2CaPools" destination="synapses"/>
        </inputList>
        <inputList id="vrpop0_Golgi_pop0_29" population="Golgi_pop0" component="Pulse_vrpop0_Golgi_pop0_29">
            <input id="29" target="../Golgi_pop0/29/Golgi_10comp_13channels_2CaPools" destination="synapses"/>
        </inputList>
        <inputList id="vrpop0_Golgi_pop0_30" population="Golgi_pop0" component="Pulse_vrpop0_Golgi_pop0_30">
            <input id="30" target="../Golgi_pop0/30/Golgi_10comp_13channels_2CaPools" destination="synapses"/>
        </inputList>
        <inputList id="vrpop0_Golgi_pop0_31" population="Golgi_pop0" component="Pulse_vrpop0_Golgi_pop0_31">
            <input id="31" target="../Golgi_pop0/31/Golgi_10comp_13channels_2CaPools" destination="synapses"/>
        </inputList>
        <inputList id="vrpop0_Golgi_pop0_32" population="Golgi_pop0" component="Pulse_vrpop0_Golgi_pop0_32">
            <input id="32" target="../Golgi_pop0/32/Golgi_10comp_13channels_2CaPools" destination="synapses"/>
        </inputList>
        <inputList id="vrpop0_Golgi_pop0_33" population="Golgi_pop0" component="Pulse_vrpop0_Golgi_pop0_33">
            <input id="33" target="../Golgi_pop0/33/Golgi_10comp_13channels_2CaPools" destination="synapses"/>
        </inputList>
        <inputList id="vrpop0_Golgi_pop0_34" population="Golgi_pop0" component="Pulse_vrpop0_Golgi_pop0_34">
            <input id="34" target="../Golgi_pop0/34/Golgi_10comp_13channels_2CaPools" destination="synapses"/>
        </inputList>
        <inputList id="vrpop0_Golgi_pop0_35" population="Golgi_pop0" component="Pulse_vrpop0_Golgi_pop0_35">
            <input id="35" target="../Golgi_pop0/35/Golgi_10comp_13channels_2CaPools" destination="synapses"/>
        </inputList>
        <inputList id="vrpop0_Golgi_pop0_36" population="Golgi_pop0" component="Pulse_vrpop0_Golgi_pop0_36">
            <input id="36" target="../Golgi_pop0/36/Golgi_10comp_13channels_2CaPools" destination="synapses"/>
        </inputList>
        <inputList id="vrpop0_Golgi_pop0_37" population="Golgi_pop0" component="Pulse_vrpop0_Golgi_pop0_37">
            <input id="37" target="../Golgi_pop0/37/Golgi_10comp_13channels_2CaPools" destination="synapses"/>
        </inputList>
        <inputList id="vrpop0_Golgi_pop0_38" population="Golgi_pop0" component="Pulse_vrpop0_Golgi_pop0_38">
            <input id="38" target="../Golgi_pop0/38/Golgi_10comp_13channels_2CaPools" destination="synapses"/>
        </inputList>
        <inputList id="vrpop0_Golgi_pop0_39" population="Golgi_pop0" component="Pulse_vrpop0_Golgi_pop0_39">
            <input id="39" target="../Golgi_pop0/39/Golgi_10comp_13channels_2CaPools" destination="synapses"/>
        </inputList>
        <inputList id="vrpop0_Golgi_pop0_40" population="Golgi_pop0" component="Pulse_vrpop0_Golgi_pop0_40">
            <input id="40" target="../Golgi_pop0/40/Golgi_10comp_13channels_2CaPools" destination="synapses"/>
        </inputList>
        <inputList id="vrpop0_Golgi_pop0_41" population="Golgi_pop0" component="Pulse_vrpop0_Golgi_pop0_41">
            <input id="41" target="../Golgi_pop0/41/Golgi_10comp_13channels_2CaPools" destination="synapses"/>
        </inputList>
        <inputList id="vrpop0_Golgi_pop0_42" population="Golgi_pop0" component="Pulse_vrpop0_Golgi_pop0_42">
            <input id="42" target="../Golgi_pop0/42/Golgi_10comp_13channels_2CaPools" destination="synapses"/>
        </inputList>
        <inputList id="vrpop0_Golgi_pop0_43" population="Golgi_pop0" component="Pulse_vrpop0_Golgi_pop0_43">
            <input id="43" target="../Golgi_pop0/43/Golgi_10comp_13channels_2CaPools" destination="synapses"/>
        </inputList>
        <inputList id="vrpop0_Golgi_pop0_44" population="Golgi_pop0" component="Pulse_vrpop0_Golgi_pop0_44">
            <input id="44" target="../Golgi_pop0/44/Golgi_10comp_13channels_2CaPools" destination="synapses"/>
        </inputList>
        <inputList id="vrpop0_Golgi_pop0_45" population="Golgi_pop0" component="Pulse_vrpop0_Golgi_pop0_45">
            <input id="45" target="../Golgi_pop0/45/Golgi_10comp_13channels_2CaPools" destination="synapses"/>
        </inputList>
        <inputList id="vrpop0_Golgi_pop0_46" population="Golgi_pop0" component="Pulse_vrpop0_Golgi_pop0_46">
            <input id="46" target="../Golgi_pop0/46/Golgi_10comp_13channels_2CaPools" destination="synapses"/>
        </inputList>
        <inputList id="vrpop0_Golgi_pop0_47" population="Golgi_pop0" component="Pulse_vrpop0_Golgi_pop0_47">
            <input id="47" target="../Golgi_pop0/47/Golgi_10comp_13channels_2CaPools" destination="synapses"/>
        </inputList>
        <inputList id="vrpop0_Golgi_pop0_48" population="Golgi_pop0" component="Pulse_vrpop0_Golgi_pop0_48">
            <input id="48" target="../Golgi_pop0/48/Golgi_10comp_13channels_2CaPools" destination="synapses"/>
        </inputList>
        <inputList id="vrpop0_Golgi_pop0_49" population="Golgi_pop0" component="Pulse_vrpop0_Golgi_pop0_49">
            <input id="49" target="../Golgi_pop0/49/Golgi_10comp_13channels_2CaPools" destination="synapses"/>
        </inputList>
        <inputList id="vrpop0_Golgi_pop0_50" population="Golgi_pop0" component="Pulse_vrpop0_Golgi_pop0_50">
            <input id="50" target="../Golgi_pop0/50/Golgi_10comp_13channels_2CaPools" destination="synapses"/>
        </inputList>
        <inputList id="vrpop0_Golgi_pop0_51" population="Golgi_pop0" component="Pulse_vrpop0_Golgi_pop0_51">
            <input id="51" target="../Golgi_pop0/51/Golgi_10comp_13channels_2CaPools" destination="synapses"/>
        </inputList>
        <inputList id="vrpop0_Golgi_pop0_52" population="Golgi_pop0" component="Pulse_vrpop0_Golgi_pop0_52">
            <input id="52" target="../Golgi_pop0/52/Golgi_10comp_13channels_2CaPools" destination="synapses"/>
        </inputList>
        <inputList id="vrpop0_Golgi_pop0_53" population="Golgi_pop0" component="Pulse_vrpop0_Golgi_pop0_53">
            <input id="53" target="../Golgi_pop0/53/Golgi_10comp_13channels_2CaPools" destination="synapses"/>
        </inputList>
        <inputList id="vrpop0_Golgi_pop0_54" population="Golgi_pop0" component="Pulse_vrpop0_Golgi_pop0_54">
            <input id="54" target="../Golgi_pop0/54/Golgi_10comp_13channels_2CaPools" destination="synapses"/>
        </inputList>
        <inputList id="vrpop0_Golgi_pop0_55" population="Golgi_pop0" component="Pulse_vrpop0_Golgi_pop0_55">
            <input id="55" target="../Golgi_pop0/55/Golgi_10comp_13channels_2CaPools" destination="synapses"/>
        </inputList>
        <inputList id="vrpop0_Golgi_pop0_56" population="Golgi_pop0" component="Pulse_vrpop0_Golgi_pop0_56">
            <input id="56" target="../Golgi_pop0/56/Golgi_10comp_13channels_2CaPools" destination="synapses"/>
        </inputList>
        <inputList id="vrpop0_Golgi_pop0_57" population="Golgi_pop0" component="Pulse_vrpop0_Golgi_pop0_57">
            <input id="57" target="../Golgi_pop0/57/Golgi_10comp_13channels_2CaPools" destination="synapses"/>
        </inputList>
        <inputList id="vrpop0_Golgi_pop0_58" population="Golgi_pop0" component="Pulse_vrpop0_Golgi_pop0_58">
            <input id="58" target="../Golgi_pop0/58/Golgi_10comp_13channels_2CaPools" destination="synapses"/>
        </inputList>
        <inputList id="vrpop0_Golgi_pop0_59" population="Golgi_pop0" component="Pulse_vrpop0_Golgi_pop0_59">
            <input id="59" target="../Golgi_pop0/59/Golgi_10comp_13channels_2CaPools" destination="synapses"/>
        </inputList>
        <inputList id="vrpop0_Golgi_pop0_60" population="Golgi_pop0" component="Pulse_vrpop0_Golgi_pop0_60">
            <input id="60" target="../Golgi_pop0/60/Golgi_10comp_13channels_2CaPools" destination="synapses"/>
        </inputList>
        <inputList id="vrpop0_Golgi_pop0_61" population="Golgi_pop0" component="Pulse_vrpop0_Golgi_pop0_61">
            <input id="61" target="../Golgi_pop0/61/Golgi_10comp_13channels_2CaPools" destination="synapses"/>
        </inputList>
        <inputList id="vrpop0_Golgi_pop0_62" population="Golgi_pop0" component="Pulse_vrpop0_Golgi_pop0_62">
            <input id="62" target="../Golgi_pop0/62/Golgi_10comp_13channels_2CaPools" destination="synapses"/>
        </inputList>
        <inputList id="vrpop0_Golgi_pop0_63" population="Golgi_pop0" component="Pulse_vrpop0_Golgi_pop0_63">
            <input id="63" target="../Golgi_pop0/63/Golgi_10comp_13channels_2CaPools" destination="synapses"/>
        </inputList>
        <inputList id="vrpop0_Golgi_pop0_64" population="Golgi_pop0" component="Pulse_vrpop0_Golgi_pop0_64">
            <input id="64" target="../Golgi_pop0/64/Golgi_10comp_13channels_2CaPools" destination="synapses"/>
        </inputList>
        <inputList id="vrpop0_Golgi_pop0_65" population="Golgi_pop0" component="Pulse_vrpop0_Golgi_pop0_65">
            <input id="65" target="../Golgi_pop0/65/Golgi_10comp_13channels_2CaPools" destination="synapses"/>
        </inputList>
        <inputList id="vrpop0_Golgi_pop0_66" population="Golgi_pop0" component="Pulse_vrpop0_Golgi_pop0_66">
            <input id="66" target="../Golgi_pop0/66/Golgi_10comp_13channels_2CaPools" destination="synapses"/>
        </inputList>
        <inputList id="vrpop0_Golgi_pop0_67" population="Golgi_pop0" component="Pulse_vrpop0_Golgi_pop0_67">
            <input id="67" target="../Golgi_pop0/67/Golgi_10comp_13channels_2CaPools" destination="synapses"/>
        </inputList>
        <inputList id="vrpop0_Golgi_pop0_68" population="Golgi_pop0" component="Pulse_vrpop0_Golgi_pop0_68">
            <input id="68" target="../Golgi_pop0/68/Golgi_10comp_13channels_2CaPools" destination="synapses"/>
        </inputList>
        <inputList id="vrpop0_Golgi_pop0_69" population="Golgi_pop0" component="Pulse_vrpop0_Golgi_pop0_69">
            <input id="69" target="../Golgi_pop0/69/Golgi_10comp_13channels_2CaPools" destination="synapses"/>
        </inputList>
        <inputList id="vrpop0_Golgi_pop0_70" population="Golgi_pop0" component="Pulse_vrpop0_Golgi_pop0_70">
            <input id="70" target="../Golgi_pop0/70/Golgi_10comp_13channels_2CaPools" destination="synapses"/>
        </inputList>
        <inputList id="vrpop0_Golgi_pop0_71" population="Golgi_pop0" component="Pulse_vrpop0_Golgi_pop0_71">
            <input id="71" target="../Golgi_pop0/71/Golgi_10comp_13channels_2CaPools" destination="synapses"/>
        </inputList>
        <inputList id="vrpop0_Golgi_pop0_72" population="Golgi_pop0" component="Pulse_vrpop0_Golgi_pop0_72">
            <input id="72" target="../Golgi_pop0/72/Golgi_10comp_13channels_2CaPools" destination="synapses"/>
        </inputList>
        <inputList id="vrpop0_Golgi_pop0_73" population="Golgi_pop0" component="Pulse_vrpop0_Golgi_pop0_73">
            <input id="73" target="../Golgi_pop0/73/Golgi_10comp_13channels_2CaPools" destination="synapses"/>
        </inputList>
        <inputList id="vrpop0_Golgi_pop0_74" population="Golgi_pop0" component="Pulse_vrpop0_Golgi_pop0_74">
            <input id="74" target="../Golgi_pop0/74/Golgi_10comp_13channels_2CaPools" destination="synapses"/>
        </inputList>
        <inputList id="vrpop0_Golgi_pop0_75" population="Golgi_pop0" component="Pulse_vrpop0_Golgi_pop0_75">
            <input id="75" target="../Golgi_pop0/75/Golgi_10comp_13channels_2CaPools" destination="synapses"/>
        </inputList>
        <inputList id="vrpop0_Golgi_pop0_76" population="Golgi_pop0" component="Pulse_vrpop0_Golgi_pop0_76">
            <input id="76" target="../Golgi_pop0/76/Golgi_10comp_13channels_2CaPools" destination="synapses"/>
        </inputList>
        <inputList id="vrpop0_Golgi_pop0_77" population="Golgi_pop0" component="Pulse_vrpop0_Golgi_pop0_77">
            <input id="77" target="../Golgi_pop0/77/Golgi_10comp_13channels_2CaPools" destination="synapses"/>
        </inputList>
        <inputList id="vrpop0_Golgi_pop0_78" population="Golgi_pop0" component="Pulse_vrpop0_Golgi_pop0_78">
            <input id="78" target="../Golgi_pop0/78/Golgi_10comp_13channels_2CaPools" destination="synapses"/>
        </inputList>
        <inputList id="vrpop0_Golgi_pop0_79" population="Golgi_pop0" component="Pulse_vrpop0_Golgi_pop0_79">
            <input id="79" target="../Golgi_pop0/79/Golgi_10comp_13channels_2CaPools" destination="synapses"/>
        </inputList>
        <inputList id="vrpop0_Golgi_pop0_80" population="Golgi_pop0" component="Pulse_vrpop0_Golgi_pop0_80">
            <input id="80" target="../Golgi_pop0/80/Golgi_10comp_13channels_2CaPools" destination="synapses"/>
        </inputList>
        <inputList id="vrpop0_Golgi_pop0_81" population="Golgi_pop0" component="Pulse_vrpop0_Golgi_pop0_81">
            <input id="81" target="../Golgi_pop0/81/Golgi_10comp_13channels_2CaPools" destination="synapses"/>
        </inputList>
        <inputList id="vrpop0_Golgi_pop0_82" population="Golgi_pop0" component="Pulse_vrpop0_Golgi_pop0_82">
            <input id="82" target="../Golgi_pop0/82/Golgi_10comp_13channels_2CaPools" destination="synapses"/>
        </inputList>
        <inputList id="vrpop0_Golgi_pop0_83" population="Golgi_pop0" component="Pulse_vrpop0_Golgi_pop0_83">
            <input id="83" target="../Golgi_pop0/83/Golgi_10comp_13channels_2CaPools" destination="synapses"/>
        </inputList>
        <inputList id="vrpop0_Golgi_pop0_84" population="Golgi_pop0" component="Pulse_vrpop0_Golgi_pop0_84">
            <input id="84" target="../Golgi_pop0/84/Golgi_10comp_13channels_2CaPools" destination="synapses"/>
        </inputList>
        <inputList id="vrpop0_Golgi_pop0_85" population="Golgi_pop0" component="Pulse_vrpop0_Golgi_pop0_85">
            <input id="85" target="../Golgi_pop0/85/Golgi_10comp_13channels_2CaPools" destination="synapses"/>
        </inputList>
        <inputList id="List_XFpop0l_MF_Golgi_pop0_syn0" population="Golgi_pop0" component="XFpop0l_MF_Golgi_pop0_syn0">
            <input id="0" target="../Golgi_pop0/16/Golgi_10comp_13channels_2CaPools" destination="synapses" segmentId="9" fractionAlong="0.244672"/>
            <input id="1" target="../Golgi_pop0/16/Golgi_10comp_13channels_2CaPools" destination="synapses" segmentId="9" fractionAlong="0.876711"/>
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        </inputList>
        <inputList id="List_XFpop0l_PF_Golgi_pop0_syn1" population="Golgi_pop0" component="XFpop0l_PF_Golgi_pop0_syn1">
            <input id="0" target="../Golgi_pop0/16/Golgi_10comp_13channels_2CaPools" destination="synapses" segmentId="8" fractionAlong="0.463827"/>
            <input id="1" target="../Golgi_pop0/16/Golgi_10comp_13channels_2CaPools" destination="synapses" segmentId="7" fractionAlong="0.948955"/>
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        </inputList>
        <inputList id="List_XFpop0m_MF_Golgi_pop0_syn0" population="Golgi_pop0" component="XFpop0m_MF_Golgi_pop0_syn0">
            <input id="0" target="../Golgi_pop0/11/Golgi_10comp_13channels_2CaPools" destination="synapses" segmentId="10" fractionAlong="0.838194"/>
            <input id="1" target="../Golgi_pop0/11/Golgi_10comp_13channels_2CaPools" destination="synapses" segmentId="9" fractionAlong="0.694930"/>
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        </inputList>
        <inputList id="List_XFpop0m_PF_Golgi_pop0_syn1" population="Golgi_pop0" component="XFpop0m_PF_Golgi_pop0_syn1">
            <input id="0" target="../Golgi_pop0/11/Golgi_10comp_13channels_2CaPools" destination="synapses" segmentId="6" fractionAlong="0.265014"/>
            <input id="1" target="../Golgi_pop0/11/Golgi_10comp_13channels_2CaPools" destination="synapses" segmentId="6" fractionAlong="0.560295"/>
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        </inputList>
        <inputList id="List_XFpop0r_MF_Golgi_pop0_syn0" population="Golgi_pop0" component="XFpop0r_MF_Golgi_pop0_syn0">
            <input id="0" target="../Golgi_pop0/5/Golgi_10comp_13channels_2CaPools" destination="synapses" segmentId="10" fractionAlong="0.253360"/>
            <input id="1" target="../Golgi_pop0/5/Golgi_10comp_13channels_2CaPools" destination="synapses" segmentId="10" fractionAlong="0.072575"/>
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        </inputList>
        <inputList id="List_XFpop0r_PF_Golgi_pop0_syn1" population="Golgi_pop0" component="XFpop0r_PF_Golgi_pop0_syn1">
            <input id="0" target="../Golgi_pop0/5/Golgi_10comp_13channels_2CaPools" destination="synapses" segmentId="8" fractionAlong="0.737355"/>
            <input id="1" target="../Golgi_pop0/5/Golgi_10comp_13channels_2CaPools" destination="synapses" segmentId="3" fractionAlong="0.658870"/>
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        </inputList>
        <inputList id="List_XFpop0b_MF_Golgi_pop0_syn0" population="Golgi_pop0" component="XFpop0b_MF_Golgi_pop0_syn0">
            <input id="0" target="../Golgi_pop0/8/Golgi_10comp_13channels_2CaPools" destination="synapses" segmentId="10" fractionAlong="0.238296"/>
            <input id="1" target="../Golgi_pop0/8/Golgi_10comp_13channels_2CaPools" destination="synapses" segmentId="10" fractionAlong="0.865318"/>
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        </inputList>
        <inputList id="List_XFpop0b_PF_Golgi_pop0_syn1" population="Golgi_pop0" component="XFpop0b_PF_Golgi_pop0_syn1">
            <input id="0" target="../Golgi_pop0/8/Golgi_10comp_13channels_2CaPools" destination="synapses" segmentId="5" fractionAlong="0.948588"/>
            <input id="1" target="../Golgi_pop0/8/Golgi_10comp_13channels_2CaPools" destination="synapses" segmentId="3" fractionAlong="0.493075"/>
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        </inputList>
    </network>
</neuroml>
