<Lems>

    <!--

        This LEMS file has been automatically generated using PyNeuroML v0.1.7 (libNeuroML v0.2.12)

     -->

    <!-- Specify which component to run -->
    <Target component="Golgi_V2010_regional_from_left_to_right_100ms_trial0"/>

    <!-- Include core NeuroML2 ComponentType definitions -->
    <Include file="Cells.xml"/>
    <Include file="Networks.xml"/>
    <Include file="Simulation.xml"/>

    <Include file="Golgi_V2010_regional_from_left_to_right_100ms_trial0.net.nml"/>
    <Include file="../../../Golgi_10comp_13channels_2CaPools.cell.nml"/>
    <Include file="Golgi_Ca_HVA.channel.nml"/>
    <Include file="Golgi_Ca_LVA.channel.nml"/>
    <Include file="Golgi_CALC.nml"/>
    <Include file="Golgi_CALC_ca2.nml"/>
    <Include file="Golgi_hcn1f.channel.nml"/>
    <Include file="Golgi_hcn1s.channel.nml"/>
    <Include file="Golgi_hcn2f.channel.nml"/>
    <Include file="Golgi_hcn2s.channel.nml"/>
    <Include file="Golgi_KA.channel.nml"/>
    <Include file="Golgi_KC.channel.nml"/>
    <Include file="Golgi_Kslow.channel.nml"/>
    <Include file="Golgi_KAHP.channel.nml"/>
    <Include file="Golgi_KV.channel.nml"/>
    <Include file="LeakCond.channel.nml"/>
    <Include file="Golgi_NaP.channel.nml"/>
    <Include file="Golgi_NaR.channel.nml"/>
    <Include file="Golgi_NaT.channel.nml"/>
    <Include file="../../../MF.synapse.nml"/>
    <Include file="../../../PF.synapse.nml"/>

    <Simulation id="Golgi_V2010_regional_from_left_to_right_100ms_trial0" length="3000ms" step="0.0005ms" target="Golgi_V2010_regional_from_left_to_right_100ms_trial0_network">

        <Display id="display_voltagesGolgi_pop0" title="Voltages Golgi_pop0" timeScale="1ms" xmin="-300.0" xmax="3300.0" ymin="-75" ymax="50">
            <Line id="../Golgi_pop0/43: Vm" quantity="Golgi_pop0/43/Golgi_10comp_13channels_2CaPools/v" scale="1mV" color="#9b7b1f" timeScale="1ms"/>
            <Line id="../Golgi_pop0/79: Vm" quantity="Golgi_pop0/79/Golgi_10comp_13channels_2CaPools/v" scale="1mV" color="#820b85" timeScale="1ms"/>
            <Line id="../Golgi_pop0/64: Vm" quantity="Golgi_pop0/64/Golgi_10comp_13channels_2CaPools/v" scale="1mV" color="#889dcc" timeScale="1ms"/>
            <Line id="../Golgi_pop0/60: Vm" quantity="Golgi_pop0/60/Golgi_10comp_13channels_2CaPools/v" scale="1mV" color="#5b8867" timeScale="1ms"/>
            <Line id="../Golgi_pop0/66: Vm" quantity="Golgi_pop0/66/Golgi_10comp_13channels_2CaPools/v" scale="1mV" color="#0704da" timeScale="1ms"/>
            <Line id="../Golgi_pop0/83: Vm" quantity="Golgi_pop0/83/Golgi_10comp_13channels_2CaPools/v" scale="1mV" color="#f1f5c5" timeScale="1ms"/>
            <Line id="../Golgi_pop0/75: Vm" quantity="Golgi_pop0/75/Golgi_10comp_13channels_2CaPools/v" scale="1mV" color="#33a266" timeScale="1ms"/>
            <Line id="../Golgi_pop0/17: Vm" quantity="Golgi_pop0/17/Golgi_10comp_13channels_2CaPools/v" scale="1mV" color="#6ab843" timeScale="1ms"/>
            <Line id="../Golgi_pop0/7: Vm" quantity="Golgi_pop0/7/Golgi_10comp_13channels_2CaPools/v" scale="1mV" color="#0fab7a" timeScale="1ms"/>
            <Line id="../Golgi_pop0/30: Vm" quantity="Golgi_pop0/30/Golgi_10comp_13channels_2CaPools/v" scale="1mV" color="#a645ed" timeScale="1ms"/>
            <Line id="../Golgi_pop0/49: Vm" quantity="Golgi_pop0/49/Golgi_10comp_13channels_2CaPools/v" scale="1mV" color="#f408f9" timeScale="1ms"/>
            <Line id="../Golgi_pop0/9: Vm" quantity="Golgi_pop0/9/Golgi_10comp_13channels_2CaPools/v" scale="1mV" color="#9f2199" timeScale="1ms"/>
            <Line id="../Golgi_pop0/28: Vm" quantity="Golgi_pop0/28/Golgi_10comp_13channels_2CaPools/v" scale="1mV" color="#4dc6c7" timeScale="1ms"/>
            <Line id="../Golgi_pop0/68: Vm" quantity="Golgi_pop0/68/Golgi_10comp_13channels_2CaPools/v" scale="1mV" color="#5e9199" timeScale="1ms"/>
            <Line id="../Golgi_pop0/13: Vm" quantity="Golgi_pop0/13/Golgi_10comp_13channels_2CaPools/v" scale="1mV" color="#6813f4" timeScale="1ms"/>
            <Line id="../Golgi_pop0/46: Vm" quantity="Golgi_pop0/46/Golgi_10comp_13channels_2CaPools/v" scale="1mV" color="#96f2b9" timeScale="1ms"/>
            <Line id="../Golgi_pop0/45: Vm" quantity="Golgi_pop0/45/Golgi_10comp_13channels_2CaPools/v" scale="1mV" color="#50d3d1" timeScale="1ms"/>
            <Line id="../Golgi_pop0/78: Vm" quantity="Golgi_pop0/78/Golgi_10comp_13channels_2CaPools/v" scale="1mV" color="#b8344e" timeScale="1ms"/>
            <Line id="../Golgi_pop0/48: Vm" quantity="Golgi_pop0/48/Golgi_10comp_13channels_2CaPools/v" scale="1mV" color="#8e6482" timeScale="1ms"/>
            <Line id="../Golgi_pop0/47: Vm" quantity="Golgi_pop0/47/Golgi_10comp_13channels_2CaPools/v" scale="1mV" color="#469a3d" timeScale="1ms"/>
        </Display>

        <OutputFile id="Volts0_file0_0" fileName="/home/rokas/Golgi_network_2016/PyExperiments/simulations/V2010_regional_from_left_to_right_100ms/sim0/0_cell0.dat">
            <OutputColumn id="v0" quantity="Golgi_pop0/0/Golgi_10comp_13channels_2CaPools/v"/>
        </OutputFile>

        <OutputFile id="Volts0_file0_1" fileName="/home/rokas/Golgi_network_2016/PyExperiments/simulations/V2010_regional_from_left_to_right_100ms/sim0/0_cell1.dat">
            <OutputColumn id="v1" quantity="Golgi_pop0/1/Golgi_10comp_13channels_2CaPools/v"/>
        </OutputFile>

        <OutputFile id="Volts0_file0_2" fileName="/home/rokas/Golgi_network_2016/PyExperiments/simulations/V2010_regional_from_left_to_right_100ms/sim0/0_cell2.dat">
            <OutputColumn id="v2" quantity="Golgi_pop0/2/Golgi_10comp_13channels_2CaPools/v"/>
        </OutputFile>

        <OutputFile id="Volts0_file0_3" fileName="/home/rokas/Golgi_network_2016/PyExperiments/simulations/V2010_regional_from_left_to_right_100ms/sim0/0_cell3.dat">
            <OutputColumn id="v3" quantity="Golgi_pop0/3/Golgi_10comp_13channels_2CaPools/v"/>
        </OutputFile>

        <OutputFile id="Volts0_file0_4" fileName="/home/rokas/Golgi_network_2016/PyExperiments/simulations/V2010_regional_from_left_to_right_100ms/sim0/0_cell4.dat">
            <OutputColumn id="v4" quantity="Golgi_pop0/4/Golgi_10comp_13channels_2CaPools/v"/>
        </OutputFile>

        <OutputFile id="Volts0_file0_5" fileName="/home/rokas/Golgi_network_2016/PyExperiments/simulations/V2010_regional_from_left_to_right_100ms/sim0/0_cell5.dat">
            <OutputColumn id="v5" quantity="Golgi_pop0/5/Golgi_10comp_13channels_2CaPools/v"/>
        </OutputFile>

        <OutputFile id="Volts0_file0_6" fileName="/home/rokas/Golgi_network_2016/PyExperiments/simulations/V2010_regional_from_left_to_right_100ms/sim0/0_cell6.dat">
            <OutputColumn id="v6" quantity="Golgi_pop0/6/Golgi_10comp_13channels_2CaPools/v"/>
        </OutputFile>

        <OutputFile id="Volts0_file0_7" fileName="/home/rokas/Golgi_network_2016/PyExperiments/simulations/V2010_regional_from_left_to_right_100ms/sim0/0_cell7.dat">
            <OutputColumn id="v7" quantity="Golgi_pop0/7/Golgi_10comp_13channels_2CaPools/v"/>
        </OutputFile>

        <OutputFile id="Volts0_file0_8" fileName="/home/rokas/Golgi_network_2016/PyExperiments/simulations/V2010_regional_from_left_to_right_100ms/sim0/0_cell8.dat">
            <OutputColumn id="v8" quantity="Golgi_pop0/8/Golgi_10comp_13channels_2CaPools/v"/>
        </OutputFile>

        <OutputFile id="Volts0_file0_9" fileName="/home/rokas/Golgi_network_2016/PyExperiments/simulations/V2010_regional_from_left_to_right_100ms/sim0/0_cell9.dat">
            <OutputColumn id="v9" quantity="Golgi_pop0/9/Golgi_10comp_13channels_2CaPools/v"/>
        </OutputFile>

        <OutputFile id="Volts0_file0_10" fileName="/home/rokas/Golgi_network_2016/PyExperiments/simulations/V2010_regional_from_left_to_right_100ms/sim0/0_cell10.dat">
            <OutputColumn id="v10" quantity="Golgi_pop0/10/Golgi_10comp_13channels_2CaPools/v"/>
        </OutputFile>

        <OutputFile id="Volts0_file0_11" fileName="/home/rokas/Golgi_network_2016/PyExperiments/simulations/V2010_regional_from_left_to_right_100ms/sim0/0_cell11.dat">
            <OutputColumn id="v11" quantity="Golgi_pop0/11/Golgi_10comp_13channels_2CaPools/v"/>
        </OutputFile>

        <OutputFile id="Volts0_file0_12" fileName="/home/rokas/Golgi_network_2016/PyExperiments/simulations/V2010_regional_from_left_to_right_100ms/sim0/0_cell12.dat">
            <OutputColumn id="v12" quantity="Golgi_pop0/12/Golgi_10comp_13channels_2CaPools/v"/>
        </OutputFile>

        <OutputFile id="Volts0_file0_13" fileName="/home/rokas/Golgi_network_2016/PyExperiments/simulations/V2010_regional_from_left_to_right_100ms/sim0/0_cell13.dat">
            <OutputColumn id="v13" quantity="Golgi_pop0/13/Golgi_10comp_13channels_2CaPools/v"/>
        </OutputFile>

        <OutputFile id="Volts0_file0_14" fileName="/home/rokas/Golgi_network_2016/PyExperiments/simulations/V2010_regional_from_left_to_right_100ms/sim0/0_cell14.dat">
            <OutputColumn id="v14" quantity="Golgi_pop0/14/Golgi_10comp_13channels_2CaPools/v"/>
        </OutputFile>

        <OutputFile id="Volts0_file0_15" fileName="/home/rokas/Golgi_network_2016/PyExperiments/simulations/V2010_regional_from_left_to_right_100ms/sim0/0_cell15.dat">
            <OutputColumn id="v15" quantity="Golgi_pop0/15/Golgi_10comp_13channels_2CaPools/v"/>
        </OutputFile>

        <OutputFile id="Volts0_file0_16" fileName="/home/rokas/Golgi_network_2016/PyExperiments/simulations/V2010_regional_from_left_to_right_100ms/sim0/0_cell16.dat">
            <OutputColumn id="v16" quantity="Golgi_pop0/16/Golgi_10comp_13channels_2CaPools/v"/>
        </OutputFile>

        <OutputFile id="Volts0_file0_17" fileName="/home/rokas/Golgi_network_2016/PyExperiments/simulations/V2010_regional_from_left_to_right_100ms/sim0/0_cell17.dat">
            <OutputColumn id="v17" quantity="Golgi_pop0/17/Golgi_10comp_13channels_2CaPools/v"/>
        </OutputFile>

        <OutputFile id="Volts0_file0_18" fileName="/home/rokas/Golgi_network_2016/PyExperiments/simulations/V2010_regional_from_left_to_right_100ms/sim0/0_cell18.dat">
            <OutputColumn id="v18" quantity="Golgi_pop0/18/Golgi_10comp_13channels_2CaPools/v"/>
        </OutputFile>

        <OutputFile id="Volts0_file0_19" fileName="/home/rokas/Golgi_network_2016/PyExperiments/simulations/V2010_regional_from_left_to_right_100ms/sim0/0_cell19.dat">
            <OutputColumn id="v19" quantity="Golgi_pop0/19/Golgi_10comp_13channels_2CaPools/v"/>
        </OutputFile>

        <OutputFile id="Volts0_file0_20" fileName="/home/rokas/Golgi_network_2016/PyExperiments/simulations/V2010_regional_from_left_to_right_100ms/sim0/0_cell20.dat">
            <OutputColumn id="v20" quantity="Golgi_pop0/20/Golgi_10comp_13channels_2CaPools/v"/>
        </OutputFile>

        <OutputFile id="Volts0_file0_21" fileName="/home/rokas/Golgi_network_2016/PyExperiments/simulations/V2010_regional_from_left_to_right_100ms/sim0/0_cell21.dat">
            <OutputColumn id="v21" quantity="Golgi_pop0/21/Golgi_10comp_13channels_2CaPools/v"/>
        </OutputFile>

        <OutputFile id="Volts0_file0_22" fileName="/home/rokas/Golgi_network_2016/PyExperiments/simulations/V2010_regional_from_left_to_right_100ms/sim0/0_cell22.dat">
            <OutputColumn id="v22" quantity="Golgi_pop0/22/Golgi_10comp_13channels_2CaPools/v"/>
        </OutputFile>

        <OutputFile id="Volts0_file0_23" fileName="/home/rokas/Golgi_network_2016/PyExperiments/simulations/V2010_regional_from_left_to_right_100ms/sim0/0_cell23.dat">
            <OutputColumn id="v23" quantity="Golgi_pop0/23/Golgi_10comp_13channels_2CaPools/v"/>
        </OutputFile>

        <OutputFile id="Volts0_file0_24" fileName="/home/rokas/Golgi_network_2016/PyExperiments/simulations/V2010_regional_from_left_to_right_100ms/sim0/0_cell24.dat">
            <OutputColumn id="v24" quantity="Golgi_pop0/24/Golgi_10comp_13channels_2CaPools/v"/>
        </OutputFile>

        <OutputFile id="Volts0_file0_25" fileName="/home/rokas/Golgi_network_2016/PyExperiments/simulations/V2010_regional_from_left_to_right_100ms/sim0/0_cell25.dat">
            <OutputColumn id="v25" quantity="Golgi_pop0/25/Golgi_10comp_13channels_2CaPools/v"/>
        </OutputFile>

        <OutputFile id="Volts0_file0_26" fileName="/home/rokas/Golgi_network_2016/PyExperiments/simulations/V2010_regional_from_left_to_right_100ms/sim0/0_cell26.dat">
            <OutputColumn id="v26" quantity="Golgi_pop0/26/Golgi_10comp_13channels_2CaPools/v"/>
        </OutputFile>

        <OutputFile id="Volts0_file0_27" fileName="/home/rokas/Golgi_network_2016/PyExperiments/simulations/V2010_regional_from_left_to_right_100ms/sim0/0_cell27.dat">
            <OutputColumn id="v27" quantity="Golgi_pop0/27/Golgi_10comp_13channels_2CaPools/v"/>
        </OutputFile>

        <OutputFile id="Volts0_file0_28" fileName="/home/rokas/Golgi_network_2016/PyExperiments/simulations/V2010_regional_from_left_to_right_100ms/sim0/0_cell28.dat">
            <OutputColumn id="v28" quantity="Golgi_pop0/28/Golgi_10comp_13channels_2CaPools/v"/>
        </OutputFile>

        <OutputFile id="Volts0_file0_29" fileName="/home/rokas/Golgi_network_2016/PyExperiments/simulations/V2010_regional_from_left_to_right_100ms/sim0/0_cell29.dat">
            <OutputColumn id="v29" quantity="Golgi_pop0/29/Golgi_10comp_13channels_2CaPools/v"/>
        </OutputFile>

        <OutputFile id="Volts0_file0_30" fileName="/home/rokas/Golgi_network_2016/PyExperiments/simulations/V2010_regional_from_left_to_right_100ms/sim0/0_cell30.dat">
            <OutputColumn id="v30" quantity="Golgi_pop0/30/Golgi_10comp_13channels_2CaPools/v"/>
        </OutputFile>

        <OutputFile id="Volts0_file0_31" fileName="/home/rokas/Golgi_network_2016/PyExperiments/simulations/V2010_regional_from_left_to_right_100ms/sim0/0_cell31.dat">
            <OutputColumn id="v31" quantity="Golgi_pop0/31/Golgi_10comp_13channels_2CaPools/v"/>
        </OutputFile>

        <OutputFile id="Volts0_file0_32" fileName="/home/rokas/Golgi_network_2016/PyExperiments/simulations/V2010_regional_from_left_to_right_100ms/sim0/0_cell32.dat">
            <OutputColumn id="v32" quantity="Golgi_pop0/32/Golgi_10comp_13channels_2CaPools/v"/>
        </OutputFile>

        <OutputFile id="Volts0_file0_33" fileName="/home/rokas/Golgi_network_2016/PyExperiments/simulations/V2010_regional_from_left_to_right_100ms/sim0/0_cell33.dat">
            <OutputColumn id="v33" quantity="Golgi_pop0/33/Golgi_10comp_13channels_2CaPools/v"/>
        </OutputFile>

        <OutputFile id="Volts0_file0_34" fileName="/home/rokas/Golgi_network_2016/PyExperiments/simulations/V2010_regional_from_left_to_right_100ms/sim0/0_cell34.dat">
            <OutputColumn id="v34" quantity="Golgi_pop0/34/Golgi_10comp_13channels_2CaPools/v"/>
        </OutputFile>

        <OutputFile id="Volts0_file0_35" fileName="/home/rokas/Golgi_network_2016/PyExperiments/simulations/V2010_regional_from_left_to_right_100ms/sim0/0_cell35.dat">
            <OutputColumn id="v35" quantity="Golgi_pop0/35/Golgi_10comp_13channels_2CaPools/v"/>
        </OutputFile>

        <OutputFile id="Volts0_file0_36" fileName="/home/rokas/Golgi_network_2016/PyExperiments/simulations/V2010_regional_from_left_to_right_100ms/sim0/0_cell36.dat">
            <OutputColumn id="v36" quantity="Golgi_pop0/36/Golgi_10comp_13channels_2CaPools/v"/>
        </OutputFile>

        <OutputFile id="Volts0_file0_37" fileName="/home/rokas/Golgi_network_2016/PyExperiments/simulations/V2010_regional_from_left_to_right_100ms/sim0/0_cell37.dat">
            <OutputColumn id="v37" quantity="Golgi_pop0/37/Golgi_10comp_13channels_2CaPools/v"/>
        </OutputFile>

        <OutputFile id="Volts0_file0_38" fileName="/home/rokas/Golgi_network_2016/PyExperiments/simulations/V2010_regional_from_left_to_right_100ms/sim0/0_cell38.dat">
            <OutputColumn id="v38" quantity="Golgi_pop0/38/Golgi_10comp_13channels_2CaPools/v"/>
        </OutputFile>

        <OutputFile id="Volts0_file0_39" fileName="/home/rokas/Golgi_network_2016/PyExperiments/simulations/V2010_regional_from_left_to_right_100ms/sim0/0_cell39.dat">
            <OutputColumn id="v39" quantity="Golgi_pop0/39/Golgi_10comp_13channels_2CaPools/v"/>
        </OutputFile>

        <OutputFile id="Volts0_file0_40" fileName="/home/rokas/Golgi_network_2016/PyExperiments/simulations/V2010_regional_from_left_to_right_100ms/sim0/0_cell40.dat">
            <OutputColumn id="v40" quantity="Golgi_pop0/40/Golgi_10comp_13channels_2CaPools/v"/>
        </OutputFile>

        <OutputFile id="Volts0_file0_41" fileName="/home/rokas/Golgi_network_2016/PyExperiments/simulations/V2010_regional_from_left_to_right_100ms/sim0/0_cell41.dat">
            <OutputColumn id="v41" quantity="Golgi_pop0/41/Golgi_10comp_13channels_2CaPools/v"/>
        </OutputFile>

        <OutputFile id="Volts0_file0_42" fileName="/home/rokas/Golgi_network_2016/PyExperiments/simulations/V2010_regional_from_left_to_right_100ms/sim0/0_cell42.dat">
            <OutputColumn id="v42" quantity="Golgi_pop0/42/Golgi_10comp_13channels_2CaPools/v"/>
        </OutputFile>

        <OutputFile id="Volts0_file0_43" fileName="/home/rokas/Golgi_network_2016/PyExperiments/simulations/V2010_regional_from_left_to_right_100ms/sim0/0_cell43.dat">
            <OutputColumn id="v43" quantity="Golgi_pop0/43/Golgi_10comp_13channels_2CaPools/v"/>
        </OutputFile>

        <OutputFile id="Volts0_file0_44" fileName="/home/rokas/Golgi_network_2016/PyExperiments/simulations/V2010_regional_from_left_to_right_100ms/sim0/0_cell44.dat">
            <OutputColumn id="v44" quantity="Golgi_pop0/44/Golgi_10comp_13channels_2CaPools/v"/>
        </OutputFile>

        <OutputFile id="Volts0_file0_45" fileName="/home/rokas/Golgi_network_2016/PyExperiments/simulations/V2010_regional_from_left_to_right_100ms/sim0/0_cell45.dat">
            <OutputColumn id="v45" quantity="Golgi_pop0/45/Golgi_10comp_13channels_2CaPools/v"/>
        </OutputFile>

        <OutputFile id="Volts0_file0_46" fileName="/home/rokas/Golgi_network_2016/PyExperiments/simulations/V2010_regional_from_left_to_right_100ms/sim0/0_cell46.dat">
            <OutputColumn id="v46" quantity="Golgi_pop0/46/Golgi_10comp_13channels_2CaPools/v"/>
        </OutputFile>

        <OutputFile id="Volts0_file0_47" fileName="/home/rokas/Golgi_network_2016/PyExperiments/simulations/V2010_regional_from_left_to_right_100ms/sim0/0_cell47.dat">
            <OutputColumn id="v47" quantity="Golgi_pop0/47/Golgi_10comp_13channels_2CaPools/v"/>
        </OutputFile>

        <OutputFile id="Volts0_file0_48" fileName="/home/rokas/Golgi_network_2016/PyExperiments/simulations/V2010_regional_from_left_to_right_100ms/sim0/0_cell48.dat">
            <OutputColumn id="v48" quantity="Golgi_pop0/48/Golgi_10comp_13channels_2CaPools/v"/>
        </OutputFile>

        <OutputFile id="Volts0_file0_49" fileName="/home/rokas/Golgi_network_2016/PyExperiments/simulations/V2010_regional_from_left_to_right_100ms/sim0/0_cell49.dat">
            <OutputColumn id="v49" quantity="Golgi_pop0/49/Golgi_10comp_13channels_2CaPools/v"/>
        </OutputFile>

        <OutputFile id="Volts0_file0_50" fileName="/home/rokas/Golgi_network_2016/PyExperiments/simulations/V2010_regional_from_left_to_right_100ms/sim0/0_cell50.dat">
            <OutputColumn id="v50" quantity="Golgi_pop0/50/Golgi_10comp_13channels_2CaPools/v"/>
        </OutputFile>

        <OutputFile id="Volts0_file0_51" fileName="/home/rokas/Golgi_network_2016/PyExperiments/simulations/V2010_regional_from_left_to_right_100ms/sim0/0_cell51.dat">
            <OutputColumn id="v51" quantity="Golgi_pop0/51/Golgi_10comp_13channels_2CaPools/v"/>
        </OutputFile>

        <OutputFile id="Volts0_file0_52" fileName="/home/rokas/Golgi_network_2016/PyExperiments/simulations/V2010_regional_from_left_to_right_100ms/sim0/0_cell52.dat">
            <OutputColumn id="v52" quantity="Golgi_pop0/52/Golgi_10comp_13channels_2CaPools/v"/>
        </OutputFile>

        <OutputFile id="Volts0_file0_53" fileName="/home/rokas/Golgi_network_2016/PyExperiments/simulations/V2010_regional_from_left_to_right_100ms/sim0/0_cell53.dat">
            <OutputColumn id="v53" quantity="Golgi_pop0/53/Golgi_10comp_13channels_2CaPools/v"/>
        </OutputFile>

        <OutputFile id="Volts0_file0_54" fileName="/home/rokas/Golgi_network_2016/PyExperiments/simulations/V2010_regional_from_left_to_right_100ms/sim0/0_cell54.dat">
            <OutputColumn id="v54" quantity="Golgi_pop0/54/Golgi_10comp_13channels_2CaPools/v"/>
        </OutputFile>

        <OutputFile id="Volts0_file0_55" fileName="/home/rokas/Golgi_network_2016/PyExperiments/simulations/V2010_regional_from_left_to_right_100ms/sim0/0_cell55.dat">
            <OutputColumn id="v55" quantity="Golgi_pop0/55/Golgi_10comp_13channels_2CaPools/v"/>
        </OutputFile>

        <OutputFile id="Volts0_file0_56" fileName="/home/rokas/Golgi_network_2016/PyExperiments/simulations/V2010_regional_from_left_to_right_100ms/sim0/0_cell56.dat">
            <OutputColumn id="v56" quantity="Golgi_pop0/56/Golgi_10comp_13channels_2CaPools/v"/>
        </OutputFile>

        <OutputFile id="Volts0_file0_57" fileName="/home/rokas/Golgi_network_2016/PyExperiments/simulations/V2010_regional_from_left_to_right_100ms/sim0/0_cell57.dat">
            <OutputColumn id="v57" quantity="Golgi_pop0/57/Golgi_10comp_13channels_2CaPools/v"/>
        </OutputFile>

        <OutputFile id="Volts0_file0_58" fileName="/home/rokas/Golgi_network_2016/PyExperiments/simulations/V2010_regional_from_left_to_right_100ms/sim0/0_cell58.dat">
            <OutputColumn id="v58" quantity="Golgi_pop0/58/Golgi_10comp_13channels_2CaPools/v"/>
        </OutputFile>

        <OutputFile id="Volts0_file0_59" fileName="/home/rokas/Golgi_network_2016/PyExperiments/simulations/V2010_regional_from_left_to_right_100ms/sim0/0_cell59.dat">
            <OutputColumn id="v59" quantity="Golgi_pop0/59/Golgi_10comp_13channels_2CaPools/v"/>
        </OutputFile>

        <OutputFile id="Volts0_file0_60" fileName="/home/rokas/Golgi_network_2016/PyExperiments/simulations/V2010_regional_from_left_to_right_100ms/sim0/0_cell60.dat">
            <OutputColumn id="v60" quantity="Golgi_pop0/60/Golgi_10comp_13channels_2CaPools/v"/>
        </OutputFile>

        <OutputFile id="Volts0_file0_61" fileName="/home/rokas/Golgi_network_2016/PyExperiments/simulations/V2010_regional_from_left_to_right_100ms/sim0/0_cell61.dat">
            <OutputColumn id="v61" quantity="Golgi_pop0/61/Golgi_10comp_13channels_2CaPools/v"/>
        </OutputFile>

        <OutputFile id="Volts0_file0_62" fileName="/home/rokas/Golgi_network_2016/PyExperiments/simulations/V2010_regional_from_left_to_right_100ms/sim0/0_cell62.dat">
            <OutputColumn id="v62" quantity="Golgi_pop0/62/Golgi_10comp_13channels_2CaPools/v"/>
        </OutputFile>

        <OutputFile id="Volts0_file0_63" fileName="/home/rokas/Golgi_network_2016/PyExperiments/simulations/V2010_regional_from_left_to_right_100ms/sim0/0_cell63.dat">
            <OutputColumn id="v63" quantity="Golgi_pop0/63/Golgi_10comp_13channels_2CaPools/v"/>
        </OutputFile>

        <OutputFile id="Volts0_file0_64" fileName="/home/rokas/Golgi_network_2016/PyExperiments/simulations/V2010_regional_from_left_to_right_100ms/sim0/0_cell64.dat">
            <OutputColumn id="v64" quantity="Golgi_pop0/64/Golgi_10comp_13channels_2CaPools/v"/>
        </OutputFile>

        <OutputFile id="Volts0_file0_65" fileName="/home/rokas/Golgi_network_2016/PyExperiments/simulations/V2010_regional_from_left_to_right_100ms/sim0/0_cell65.dat">
            <OutputColumn id="v65" quantity="Golgi_pop0/65/Golgi_10comp_13channels_2CaPools/v"/>
        </OutputFile>

        <OutputFile id="Volts0_file0_66" fileName="/home/rokas/Golgi_network_2016/PyExperiments/simulations/V2010_regional_from_left_to_right_100ms/sim0/0_cell66.dat">
            <OutputColumn id="v66" quantity="Golgi_pop0/66/Golgi_10comp_13channels_2CaPools/v"/>
        </OutputFile>

        <OutputFile id="Volts0_file0_67" fileName="/home/rokas/Golgi_network_2016/PyExperiments/simulations/V2010_regional_from_left_to_right_100ms/sim0/0_cell67.dat">
            <OutputColumn id="v67" quantity="Golgi_pop0/67/Golgi_10comp_13channels_2CaPools/v"/>
        </OutputFile>

        <OutputFile id="Volts0_file0_68" fileName="/home/rokas/Golgi_network_2016/PyExperiments/simulations/V2010_regional_from_left_to_right_100ms/sim0/0_cell68.dat">
            <OutputColumn id="v68" quantity="Golgi_pop0/68/Golgi_10comp_13channels_2CaPools/v"/>
        </OutputFile>

        <OutputFile id="Volts0_file0_69" fileName="/home/rokas/Golgi_network_2016/PyExperiments/simulations/V2010_regional_from_left_to_right_100ms/sim0/0_cell69.dat">
            <OutputColumn id="v69" quantity="Golgi_pop0/69/Golgi_10comp_13channels_2CaPools/v"/>
        </OutputFile>

        <OutputFile id="Volts0_file0_70" fileName="/home/rokas/Golgi_network_2016/PyExperiments/simulations/V2010_regional_from_left_to_right_100ms/sim0/0_cell70.dat">
            <OutputColumn id="v70" quantity="Golgi_pop0/70/Golgi_10comp_13channels_2CaPools/v"/>
        </OutputFile>

        <OutputFile id="Volts0_file0_71" fileName="/home/rokas/Golgi_network_2016/PyExperiments/simulations/V2010_regional_from_left_to_right_100ms/sim0/0_cell71.dat">
            <OutputColumn id="v71" quantity="Golgi_pop0/71/Golgi_10comp_13channels_2CaPools/v"/>
        </OutputFile>

        <OutputFile id="Volts0_file0_72" fileName="/home/rokas/Golgi_network_2016/PyExperiments/simulations/V2010_regional_from_left_to_right_100ms/sim0/0_cell72.dat">
            <OutputColumn id="v72" quantity="Golgi_pop0/72/Golgi_10comp_13channels_2CaPools/v"/>
        </OutputFile>

        <OutputFile id="Volts0_file0_73" fileName="/home/rokas/Golgi_network_2016/PyExperiments/simulations/V2010_regional_from_left_to_right_100ms/sim0/0_cell73.dat">
            <OutputColumn id="v73" quantity="Golgi_pop0/73/Golgi_10comp_13channels_2CaPools/v"/>
        </OutputFile>

        <OutputFile id="Volts0_file0_74" fileName="/home/rokas/Golgi_network_2016/PyExperiments/simulations/V2010_regional_from_left_to_right_100ms/sim0/0_cell74.dat">
            <OutputColumn id="v74" quantity="Golgi_pop0/74/Golgi_10comp_13channels_2CaPools/v"/>
        </OutputFile>

        <OutputFile id="Volts0_file0_75" fileName="/home/rokas/Golgi_network_2016/PyExperiments/simulations/V2010_regional_from_left_to_right_100ms/sim0/0_cell75.dat">
            <OutputColumn id="v75" quantity="Golgi_pop0/75/Golgi_10comp_13channels_2CaPools/v"/>
        </OutputFile>

        <OutputFile id="Volts0_file0_76" fileName="/home/rokas/Golgi_network_2016/PyExperiments/simulations/V2010_regional_from_left_to_right_100ms/sim0/0_cell76.dat">
            <OutputColumn id="v76" quantity="Golgi_pop0/76/Golgi_10comp_13channels_2CaPools/v"/>
        </OutputFile>

        <OutputFile id="Volts0_file0_77" fileName="/home/rokas/Golgi_network_2016/PyExperiments/simulations/V2010_regional_from_left_to_right_100ms/sim0/0_cell77.dat">
            <OutputColumn id="v77" quantity="Golgi_pop0/77/Golgi_10comp_13channels_2CaPools/v"/>
        </OutputFile>

        <OutputFile id="Volts0_file0_78" fileName="/home/rokas/Golgi_network_2016/PyExperiments/simulations/V2010_regional_from_left_to_right_100ms/sim0/0_cell78.dat">
            <OutputColumn id="v78" quantity="Golgi_pop0/78/Golgi_10comp_13channels_2CaPools/v"/>
        </OutputFile>

        <OutputFile id="Volts0_file0_79" fileName="/home/rokas/Golgi_network_2016/PyExperiments/simulations/V2010_regional_from_left_to_right_100ms/sim0/0_cell79.dat">
            <OutputColumn id="v79" quantity="Golgi_pop0/79/Golgi_10comp_13channels_2CaPools/v"/>
        </OutputFile>

        <OutputFile id="Volts0_file0_80" fileName="/home/rokas/Golgi_network_2016/PyExperiments/simulations/V2010_regional_from_left_to_right_100ms/sim0/0_cell80.dat">
            <OutputColumn id="v80" quantity="Golgi_pop0/80/Golgi_10comp_13channels_2CaPools/v"/>
        </OutputFile>

        <OutputFile id="Volts0_file0_81" fileName="/home/rokas/Golgi_network_2016/PyExperiments/simulations/V2010_regional_from_left_to_right_100ms/sim0/0_cell81.dat">
            <OutputColumn id="v81" quantity="Golgi_pop0/81/Golgi_10comp_13channels_2CaPools/v"/>
        </OutputFile>

        <OutputFile id="Volts0_file0_82" fileName="/home/rokas/Golgi_network_2016/PyExperiments/simulations/V2010_regional_from_left_to_right_100ms/sim0/0_cell82.dat">
            <OutputColumn id="v82" quantity="Golgi_pop0/82/Golgi_10comp_13channels_2CaPools/v"/>
        </OutputFile>

        <OutputFile id="Volts0_file0_83" fileName="/home/rokas/Golgi_network_2016/PyExperiments/simulations/V2010_regional_from_left_to_right_100ms/sim0/0_cell83.dat">
            <OutputColumn id="v83" quantity="Golgi_pop0/83/Golgi_10comp_13channels_2CaPools/v"/>
        </OutputFile>

        <OutputFile id="Volts0_file0_84" fileName="/home/rokas/Golgi_network_2016/PyExperiments/simulations/V2010_regional_from_left_to_right_100ms/sim0/0_cell84.dat">
            <OutputColumn id="v84" quantity="Golgi_pop0/84/Golgi_10comp_13channels_2CaPools/v"/>
        </OutputFile>

        <OutputFile id="Volts0_file0_85" fileName="/home/rokas/Golgi_network_2016/PyExperiments/simulations/V2010_regional_from_left_to_right_100ms/sim0/0_cell85.dat">
            <OutputColumn id="v85" quantity="Golgi_pop0/85/Golgi_10comp_13channels_2CaPools/v"/>
        </OutputFile>

    </Simulation>

</Lems>
