<neuroml xmlns="http://www.neuroml.org/schema/neuroml2"  xmlns:xs="http://www.w3.org/2001/XMLSchema" xmlns:xsi="http://www.w3.org/2001/XMLSchema-instance" xsi:schemaLocation="http://www.neuroml.org/schema/neuroml2 https://raw.github.com/NeuroML/NeuroML2/development/Schemas/NeuroML2/NeuroML_v2beta4.xsd" id="Golgi_V2010_test_savings_trial0">
    <include href="../../../Golgi_10comp_13channels_2CaPools.cell.nml"></include>
    <include href="../../../MFSpikeSyn.synapse.nml"></include>
    <include href="../../../PFSpikeSyn.synapse.nml"></include>
    <pulseGenerator id="Pulse_vrpop0_Golgi_pop0_0" delay="0.000000ms" duration="1000.000000ms" amplitude="-4.495599pA"/>
    <spikeArray id="XFpop0_Golgi_pop0_cell0_syn0_0">
        <spike id="0" time="205.690000ms"/>
        <spike id="1" time="206.570000ms"/>
        <spike id="2" time="207.480000ms"/>
        <spike id="3" time="208.220000ms"/>
        <spike id="4" time="208.770000ms"/>
        <spike id="5" time="209.480000ms"/>
        <spike id="6" time="210.480000ms"/>
        <spike id="7" time="212.200000ms"/>
    </spikeArray>
    <spikeArray id="XFpop0_Golgi_pop0_cell0_syn1_0">
        <spike id="0" time="211.890000ms"/>
        <spike id="1" time="212.690000ms"/>
        <spike id="2" time="213.370000ms"/>
        <spike id="3" time="214.120000ms"/>
        <spike id="4" time="215.200000ms"/>
        <spike id="5" time="217.210000ms"/>
        <spike id="6" time="222.420000ms"/>
        <spike id="7" time="223.110000ms"/>
        <spike id="8" time="223.730000ms"/>
        <spike id="9" time="224.380000ms"/>
        <spike id="10" time="225.270000ms"/>
        <spike id="11" time="226.670000ms"/>
        <spike id="12" time="230.770000ms"/>
    </spikeArray>
    <spikeArray id="XFpop0_background_Golgi_pop0_cell0_syn0_0">
        <spike id="0" time="484.090000ms"/>
        <spike id="1" time="487.280000ms"/>
        <spike id="2" time="726.120000ms"/>
        <spike id="3" time="729.310000ms"/>
    </spikeArray>
    <spikeArray id="XFpop0_background_Golgi_pop0_cell0_syn1_0">
        <spike id="0" time="220.380000ms"/>
        <spike id="1" time="223.570000ms"/>
        <spike id="2" time="628.680000ms"/>
        <spike id="3" time="631.870000ms"/>
    </spikeArray>
    <network id="Golgi_V2010_test_savings_trial0_network" type="networkWithTemperature" temperature="23 degC">
        <notes>Parameter arrays for building this network are listed below:
Cell distribution parameters:
{'distanceModel': 'random_no_overlap', 'popID': 'Golgi_pop0', 'zDim': 50, 'xDim': 50, 'distributionModel': 'explicit_cell_numbers', 'yDim': 50}
Cell population parameters:
Cell population parameters for Golgi_pop0:
{'NeuroML2CellType': 'cell2CaPools', 'popID': 'Golgi_pop0', 'cellType': 'Golgi_10comp_13channels_2CaPools', 'size': 1}
Cell connectivity parameters:
{'testingConductanceScale': 1, 'electricalConnModel': 'Vervaeke_2010_based', 'postPoptargetGroup': {'segmentGroupList': ['apical_dendrite_group', 'basal_dendrite_group'], 'segmentGroupProbabilities': {'basal_dendrite_group': 0.5, 'apical_dendrite_group': 0.5}}, 'units': 'nS', 'normalizeConductances': True, 'spatialScale': 0.5, 'prePopID': 'Golgi_pop0', 'postPopID': 'Golgi_pop0', 'prePoptargetGroup': {'segmentGroupList': ['apical_dendrite_group', 'basal_dendrite_group'], 'segmentGroupProbabilities': {'basal_dendrite_group': 0.5, 'apical_dendrite_group': 0.5}}}
Input parameters for a list of populations:
Input group parameters for Golgi_pop0:
{'stDevAmp': 10, 'inputModel': 'variable_basal_firing_rate', 'ampUnits': 'pA', 'amplitudeDistribution': 'gaussian', 'averageAmp': 0, 'valueOffset': 0, 'inputLabel': 'vrpop0', 'offsetDistribution': 'constant', 'offsetUnits': 'ms'}
{'synapseList': [{'noInputs': 1, 'synapseMode': 'transient', 'segmentGroupProbabilities': {'basal_dendrite_group': 1}, 'synapseType': 'MFSpikeSyn', 'duration': 10, 'segmentGroupList': ['basal_dendrite_group'], 'targetingModel': 'segment groups and segments', 'averageRate': 200, 'delay': 200, 'units': 'ms', 'numberModel': 'constant number of inputs per cell'}, {'noInputs': 1, 'synapseMode': 'transient', 'segmentGroupProbabilities': {'apical_dendrite_group': 1}, 'synapseType': 'PFSpikeSyn', 'duration': 15, 'segmentGroupList': ['apical_dendrite_group'], 'targetingModel': 'segment groups and segments', 'averageRate': 350, 'delay': 210, 'units': 'ms', 'numberModel': 'constant number of inputs per cell'}], 'inputLabel': 'XFpop0', 'inputModel': 'XF', 'fractionToTarget': 1, 'targetingRegime': 'uniform', 'colocalizeSynapses': False}
{'synapseList': [{'segmentGroupList': ['basal_dendrite_group'], 'targetingModel': 'segment groups and segments', 'synapseMode': 'persistent', 'averageRate': 2, 'noInputs': 1, 'synapseType': 'MFSpikeSyn', 'numberModel': 'constant number of inputs per cell', 'segmentGroupProbabilities': {'basal_dendrite_group': 1}}, {'segmentGroupList': ['apical_dendrite_group'], 'targetingModel': 'segment groups and segments', 'synapseMode': 'persistent', 'averageRate': 3, 'noInputs': 1, 'synapseType': 'PFSpikeSyn', 'numberModel': 'constant number of inputs per cell', 'segmentGroupProbabilities': {'apical_dendrite_group': 1}}], 'inputLabel': 'XFpop0_background', 'inputModel': 'XF', 'fractionToTarget': 1, 'targetingRegime': 'uniform', 'colocalizeSynapses': False}
</notes>
        <population id="Golgi_pop0" type="populationList" component="Golgi_10comp_13channels_2CaPools" size="1">
            <instance id="0">
                <location y="26.867004788484149" x="15.448385768975381" z="16.802374839833377"/>
            </instance>
        </population>
        <population id="InputPop_XFpop0_Golgi_pop0_cell0_syn0_0" component="XFpop0_Golgi_pop0_cell0_syn0_0" size="1"/>
        <population id="InputPop_XFpop0_Golgi_pop0_cell0_syn1_0" component="XFpop0_Golgi_pop0_cell0_syn1_0" size="1"/>
        <population id="InputPop_XFpop0_background_Golgi_pop0_cell0_syn0_0" component="XFpop0_background_Golgi_pop0_cell0_syn0_0" size="1"/>
        <population id="InputPop_XFpop0_background_Golgi_pop0_cell0_syn1_0" component="XFpop0_background_Golgi_pop0_cell0_syn1_0" size="1"/>
        <projection id="InputProj_XFpop0_Golgi_pop0_cell0_syn0_0" postsynapticPopulation="Golgi_pop0" presynapticPopulation="InputPop_XFpop0_Golgi_pop0_cell0_syn0_0" synapse="MFSpikeSyn">
            <connection id="0" preCellId="../InputPop_XFpop0_Golgi_pop0_cell0_syn0_0[0]" postFractionAlong="0.002407" postSegmentId="9" postCellId="../Golgi_pop0/0/Golgi_10comp_13channels_2CaPools"/>
        </projection>
        <projection id="InputProj_XFpop0_Golgi_pop0_cell0_syn1_0" postsynapticPopulation="Golgi_pop0" presynapticPopulation="InputPop_XFpop0_Golgi_pop0_cell0_syn1_0" synapse="PFSpikeSyn">
            <connection id="0" preCellId="../InputPop_XFpop0_Golgi_pop0_cell0_syn1_0[0]" postFractionAlong="0.276915" postSegmentId="3" postCellId="../Golgi_pop0/0/Golgi_10comp_13channels_2CaPools"/>
        </projection>
        <projection id="InputProj_XFpop0_background_Golgi_pop0_cell0_syn0_0" postsynapticPopulation="Golgi_pop0" presynapticPopulation="InputPop_XFpop0_background_Golgi_pop0_cell0_syn0_0" synapse="MFSpikeSyn">
            <connection id="0" preCellId="../InputPop_XFpop0_background_Golgi_pop0_cell0_syn0_0[0]" postFractionAlong="0.002407" postSegmentId="9" postCellId="../Golgi_pop0/0/Golgi_10comp_13channels_2CaPools"/>
        </projection>
        <projection id="InputProj_XFpop0_background_Golgi_pop0_cell0_syn1_0" postsynapticPopulation="Golgi_pop0" presynapticPopulation="InputPop_XFpop0_background_Golgi_pop0_cell0_syn1_0" synapse="PFSpikeSyn">
            <connection id="0" preCellId="../InputPop_XFpop0_background_Golgi_pop0_cell0_syn1_0[0]" postFractionAlong="0.276915" postSegmentId="3" postCellId="../Golgi_pop0/0/Golgi_10comp_13channels_2CaPools"/>
        </projection>
        <inputList id="vrpop0_Golgi_pop0_0" component="Pulse_vrpop0_Golgi_pop0_0" population="Golgi_pop0">
            <input destination="synapses" id="0" target="../Golgi_pop0/0/Golgi_10comp_13channels_2CaPools"/>
        </inputList>
    </network>
</neuroml>
