<Lems>

    <!--

        This LEMS file has been automatically generated using PyNeuroML v0.1.7 (libNeuroML v0.2.11)

     -->

    <!-- Specify which component to run -->
    <Target component="Golgi_V2010_test_savings_trial0"/>

    <!-- Include core NeuroML2 ComponentType definitions -->
    <Include file="Cells.xml"/>
    <Include file="Networks.xml"/>
    <Include file="Simulation.xml"/>

    <Include file="Golgi_V2010_test_savings_trial0.net.nml"/>
    <Include file="../../../Golgi_10comp_13channels_2CaPools.cell.nml"/>
    <Include file="Golgi_Ca_HVA.channel.nml"/>
    <Include file="Golgi_Ca_LVA.channel.nml"/>
    <Include file="Golgi_CALC.nml"/>
    <Include file="Golgi_CALC_ca2.nml"/>
    <Include file="Golgi_hcn1f.channel.nml"/>
    <Include file="Golgi_hcn1s.channel.nml"/>
    <Include file="Golgi_hcn2f.channel.nml"/>
    <Include file="Golgi_hcn2s.channel.nml"/>
    <Include file="Golgi_KA.channel.nml"/>
    <Include file="Golgi_KC.channel.nml"/>
    <Include file="Golgi_Kslow.channel.nml"/>
    <Include file="Golgi_KAHP.channel.nml"/>
    <Include file="Golgi_KV.channel.nml"/>
    <Include file="LeakCond.channel.nml"/>
    <Include file="Golgi_NaP.channel.nml"/>
    <Include file="Golgi_NaR.channel.nml"/>
    <Include file="Golgi_NaT.channel.nml"/>
    <Include file="/../../../MFSpikeSyn.synapse.nml"/>
    <Include file="/../../../PFSpikeSyn.synapse.nml"/>

    <Simulation id="Golgi_V2010_test_savings_trial0" length="3000ms" step="0.0003ms" target="Golgi_V2010_test_savings_trial0_network">

        <Display id="display_voltagesGolgi_pop0" title="Voltages Golgi_pop0" timeScale="1ms" xmin="-300.0" xmax="3300.0" ymin="-75" ymax="50">
            <Line id="../Golgi_pop0/0: Vm" quantity="Golgi_pop0/0/Golgi_10comp_13channels_2CaPools/v" scale="1mV" color="#3bcb9a" timeScale="1ms"/>
        </Display>

        <OutputFile id="Volts0_file0_0" fileName="/home/rokas/Golgi_network_2016/PyExperiments/simulations/V2010_test_savings/sim0/Golgi_pop0_cell0.dat">
            <OutputColumn id="v0" quantity="Golgi_pop0/0/Golgi_10comp_13channels_2CaPools/v"/>
        </OutputFile>

    </Simulation>

</Lems>
