<neuroml xmlns="http://www.neuroml.org/schema/neuroml2"  xmlns:xs="http://www.w3.org/2001/XMLSchema" xmlns:xsi="http://www.w3.org/2001/XMLSchema-instance" xsi:schemaLocation="http://www.neuroml.org/schema/neuroml2 https://raw.github.com/NeuroML/NeuroML2/development/Schemas/NeuroML2/NeuroML_v2beta4.xsd" id="Golgi_V2010_test_shorter_syn_name_trial0">
    <include href="../../../Golgi_040408_C1.cell.nml"></include>
    <include href="../../../MF.synapse.nml"></include>
    <transientPoissonFiringSynapse id="XFpop0l_MF_Golgi_pop0_syn0" delay="600.000000ms" duration="10.000000ms" synapse="MF" averageRate="200.000000 per_s" spikeTarget="./MF"/>
    <network id="Golgi_V2010_test_shorter_syn_name_trial0_network" type="networkWithTemperature" temperature="23 degC">
        <notes>Parameter arrays for building this network are listed below:
Cell distribution parameters:
{'distanceModel': 'random', 'popID': 'Golgi_pop0', 'zDim': 30, 'xDim': 30, 'distributionModel': 'explicit_cell_numbers', 'yDim': 30}
Cell population parameters:
Cell population parameters for Golgi_pop0:
{'NeuroML2CellType': 'cell2CaPools', 'popID': 'Golgi_pop0', 'cellType': 'Golgi_040408_C1', 'size': 1}
Cell connectivity parameters:
{'testingConductanceScale': 1, 'electricalConnModel': 'Vervaeke_2010_based', 'postPoptargetGroup': {'segmentGroupList': ['apical', 'basolateral'], 'segmentGroupProbabilities': {'basolateral': 0.5, 'apical': 0.5}}, 'units': 'nS', 'normalizeConductances': False, 'spatialScale': 1.0, 'prePopID': 'Golgi_pop0', 'postPopID': 'Golgi_pop0', 'prePoptargetGroup': {'segmentGroupList': ['apical', 'basolateral'], 'segmentGroupProbabilities': {'basolateral': 0.5, 'apical': 0.5}}}
Input parameters for a list of populations:
Input group parameters for Golgi_pop0:
{'synapseList': [{'noInputs': 8, 'synapseMode': 'transient', 'segmentGroupProbabilities': {'basolateral': 1}, 'synapseType': 'MF', 'duration': 10, 'segmentGroupList': ['basolateral'], 'targetingModel': 'segment groups and segments', 'averageRate': 200, 'delay': 600, 'units': 'ms', 'numberModel': 'constant number of inputs per cell'}], 'inputLabel': 'XFpop0l', 'inputModel': 'XF', 'fractionToTarget': 1, 'targetingRegime': '3D_region_specific', 'colocalizeSynapses': False, 'regionList': [{'zVector': [0, 100], 'xVector': [0, 1000], 'yVector': [0, 110]}]}
</notes>
        <population id="Golgi_pop0" type="populationList" component="Golgi_040408_C1" size="1">
            <instance id="0">
                <location y="13.552242186419361" x="27.641235845830238" z="24.007435700354286"/>
            </instance>
        </population>
        <inputList id="List_XFpop0l_MF_Golgi_pop0_syn0" component="XFpop0l_MF_Golgi_pop0_syn0" population="Golgi_pop0">
            <input fractionAlong="0.592487" destination="synapses" id="0" segmentId="4567" target="../Golgi_pop0/0/Golgi_040408_C1"/>
            <input fractionAlong="0.728004" destination="synapses" id="1" segmentId="4674" target="../Golgi_pop0/0/Golgi_040408_C1"/>
            <input fractionAlong="0.051257" destination="synapses" id="2" segmentId="4599" target="../Golgi_pop0/0/Golgi_040408_C1"/>
            <input fractionAlong="0.630718" destination="synapses" id="3" segmentId="4193" target="../Golgi_pop0/0/Golgi_040408_C1"/>
            <input fractionAlong="0.572404" destination="synapses" id="4" segmentId="4589" target="../Golgi_pop0/0/Golgi_040408_C1"/>
            <input fractionAlong="0.306745" destination="synapses" id="5" segmentId="4201" target="../Golgi_pop0/0/Golgi_040408_C1"/>
            <input fractionAlong="0.773421" destination="synapses" id="6" segmentId="4266" target="../Golgi_pop0/0/Golgi_040408_C1"/>
            <input fractionAlong="0.364616" destination="synapses" id="7" segmentId="4250" target="../Golgi_pop0/0/Golgi_040408_C1"/>
        </inputList>
    </network>
</neuroml>
