<Lems>

    <!--

        This LEMS file has been automatically generated using PyNeuroML v0.1.7 (libNeuroML v0.2.11)

     -->

    <!-- Specify which component to run -->
    <Target component="InputNet_test_input_generation_trial0"/>

    <!-- Include core NeuroML2 ComponentType definitions -->
    <Include file="Cells.xml"/>
    <Include file="Networks.xml"/>
    <Include file="Simulation.xml"/>

    <Include file="InputNet_test_input_generation_trial0.net.nml"/>

    <Simulation id="InputNet_test_input_generation_trial0" length="3000ms" step="0.005ms" target="InputNet_test_input_generation_trial0_network">

        <EventOutputFile id="eventFile00" fileName="/home/rokas/Golgi_network_2016/PyExperiments/simulations/test_input_generation/sim0/XFpop0_Golgi_pop0_syn0_PoissonTrain_0.dat" format="ID_TIME">
            <EventSelection id="0" select="XFpop0_Golgi_pop0_syn0[0]/XFpop0_MFSpikeSyn_Golgi_pop0_syn0" eventPort="spike"/>
        </EventOutputFile>

        <EventOutputFile id="eventFile01" fileName="/home/rokas/Golgi_network_2016/PyExperiments/simulations/test_input_generation/sim0/XFpop0_Golgi_pop0_syn0_PoissonTrain_1.dat" format="ID_TIME">
            <EventSelection id="0" select="XFpop0_Golgi_pop0_syn0[1]/XFpop0_MFSpikeSyn_Golgi_pop0_syn0" eventPort="spike"/>
        </EventOutputFile>

        <EventOutputFile id="eventFile10" fileName="/home/rokas/Golgi_network_2016/PyExperiments/simulations/test_input_generation/sim0/XFpop0_Golgi_pop0_syn1_PoissonTrain_0.dat" format="ID_TIME">
            <EventSelection id="0" select="XFpop0_Golgi_pop0_syn1[0]/XFpop0_PFSpikeSyn_Golgi_pop0_syn1" eventPort="spike"/>
        </EventOutputFile>

        <EventOutputFile id="eventFile11" fileName="/home/rokas/Golgi_network_2016/PyExperiments/simulations/test_input_generation/sim0/XFpop0_Golgi_pop0_syn1_PoissonTrain_1.dat" format="ID_TIME">
            <EventSelection id="0" select="XFpop0_Golgi_pop0_syn1[1]/XFpop0_PFSpikeSyn_Golgi_pop0_syn1" eventPort="spike"/>
        </EventOutputFile>

        <EventOutputFile id="eventFile20" fileName="/home/rokas/Golgi_network_2016/PyExperiments/simulations/test_input_generation/sim0/XFpop0_background_Golgi_pop0_syn0_PoissonTrain_0.dat" format="ID_TIME">
            <EventSelection id="0" select="XFpop0_background_Golgi_pop0_syn0[0]/XFpop0_background_MFSpikeSyn_Golgi_pop0_syn0" eventPort="spike"/>
        </EventOutputFile>

        <EventOutputFile id="eventFile21" fileName="/home/rokas/Golgi_network_2016/PyExperiments/simulations/test_input_generation/sim0/XFpop0_background_Golgi_pop0_syn0_PoissonTrain_1.dat" format="ID_TIME">
            <EventSelection id="0" select="XFpop0_background_Golgi_pop0_syn0[1]/XFpop0_background_MFSpikeSyn_Golgi_pop0_syn0" eventPort="spike"/>
        </EventOutputFile>

        <EventOutputFile id="eventFile30" fileName="/home/rokas/Golgi_network_2016/PyExperiments/simulations/test_input_generation/sim0/XFpop0_background_Golgi_pop0_syn1_PoissonTrain_0.dat" format="ID_TIME">
            <EventSelection id="0" select="XFpop0_background_Golgi_pop0_syn1[0]/XFpop0_background_PFSpikeSyn_Golgi_pop0_syn1" eventPort="spike"/>
        </EventOutputFile>

        <EventOutputFile id="eventFile31" fileName="/home/rokas/Golgi_network_2016/PyExperiments/simulations/test_input_generation/sim0/XFpop0_background_Golgi_pop0_syn1_PoissonTrain_1.dat" format="ID_TIME">
            <EventSelection id="0" select="XFpop0_background_Golgi_pop0_syn1[1]/XFpop0_background_PFSpikeSyn_Golgi_pop0_syn1" eventPort="spike"/>
        </EventOutputFile>

    </Simulation>

</Lems>
