<neuroml xmlns="http://www.neuroml.org/schema/neuroml2"  xmlns:xs="http://www.w3.org/2001/XMLSchema" xmlns:xsi="http://www.w3.org/2001/XMLSchema-instance" xsi:schemaLocation="http://www.neuroml.org/schema/neuroml2 https://raw.github.com/NeuroML/NeuroML2/development/Schemas/NeuroML2/NeuroML_v2beta4.xsd" id="InputNet_V2010_sp_scale_05_trial0">
    <expOneSynapse id="syn0" erev="0mV" gbase="5nS" tauDecay="2.5ms"/>
    <iafCell id="iaf0" reset="-70mV" C="1e-5uF" thresh="-40mV" leakConductance="5.2e-7mS" leakReversal="-60mV"/>
    <poissonFiringSynapse id="XFpop0_background_MFSpikeSyn_Golgi_pop0_syn0" synapse="syn0" averageRate="2.000000 per_s" spikeTarget="./syn0"/>
    <poissonFiringSynapse id="XFpop0_background_PFSpikeSyn_Golgi_pop0_syn1" synapse="syn0" averageRate="0.500000 per_s" spikeTarget="./syn0"/>
    <transientPoissonFiringSynapse id="XFpop0_MFSpikeSyn_Golgi_pop0_syn0" delay="600.000000ms" duration="10.000000ms" synapse="syn0" averageRate="200.000000 per_s" spikeTarget="./syn0"/>
    <transientPoissonFiringSynapse id="XFpop0_PFSpikeSyn_Golgi_pop0_syn1" delay="610.000000ms" duration="15.000000ms" synapse="syn0" averageRate="350.000000 per_s" spikeTarget="./syn0"/>
    <network id="InputNet_V2010_sp_scale_05_trial0_network">
        <notes>A simple network that generates Poisson input trains for Golgi_V2010_sp_scale_05_trial0</notes>
        <population id="XFpop0_Golgi_pop0_syn0" component="iaf0" size="360"/>
        <population id="XFpop0_Golgi_pop0_syn1" component="iaf0" size="2250"/>
        <population id="XFpop0_background_Golgi_pop0_syn0" component="iaf0" size="900"/>
        <population id="XFpop0_background_Golgi_pop0_syn1" component="iaf0" size="4500"/>
        <inputList id="List_XFpop0_MFSpikeSyn_Golgi_pop0_syn0" component="XFpop0_MFSpikeSyn_Golgi_pop0_syn0" population="XFpop0_Golgi_pop0_syn0">
            <input destination="synapses" id="0" target="../XFpop0_Golgi_pop0_syn0[0]"/>
            <input destination="synapses" id="1" target="../XFpop0_Golgi_pop0_syn0[1]"/>
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        </inputList>
        <inputList id="List_XFpop0_PFSpikeSyn_Golgi_pop0_syn1" component="XFpop0_PFSpikeSyn_Golgi_pop0_syn1" population="XFpop0_Golgi_pop0_syn1">
            <input destination="synapses" id="0" target="../XFpop0_Golgi_pop0_syn1[0]"/>
            <input destination="synapses" id="1" target="../XFpop0_Golgi_pop0_syn1[1]"/>
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        </inputList>
        <inputList id="List_XFpop0_background_MFSpikeSyn_Golgi_pop0_syn0" component="XFpop0_background_MFSpikeSyn_Golgi_pop0_syn0" population="XFpop0_background_Golgi_pop0_syn0">
            <input destination="synapses" id="0" target="../XFpop0_background_Golgi_pop0_syn0[0]"/>
            <input destination="synapses" id="1" target="../XFpop0_background_Golgi_pop0_syn0[1]"/>
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        </inputList>
        <inputList id="List_XFpop0_background_PFSpikeSyn_Golgi_pop0_syn1" component="XFpop0_background_PFSpikeSyn_Golgi_pop0_syn1" population="XFpop0_background_Golgi_pop0_syn1">
            <input destination="synapses" id="0" target="../XFpop0_background_Golgi_pop0_syn1[0]"/>
            <input destination="synapses" id="1" target="../XFpop0_background_Golgi_pop0_syn1[1]"/>
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        </inputList>
    </network>
</neuroml>
