<neuroml xmlns="http://www.neuroml.org/schema/neuroml2"  xmlns:xs="http://www.w3.org/2001/XMLSchema" xmlns:xsi="http://www.w3.org/2001/XMLSchema-instance" xsi:schemaLocation="http://www.neuroml.org/schema/neuroml2 https://raw.github.com/NeuroML/NeuroML2/development/Schemas/NeuroML2/NeuroML_v2beta4.xsd" id="Golgi_V2012_test1_trial2">
    <include href="/../../../Very_Simple_Golgi_test_morph.cell.nml"></include>
    <include href="/../../../PFSpikeSyn.synapse.nml"></include>
    <pulseGenerator id="Pulse_Golgi_pop0_0" delay="50.000000ms" duration="400.000000ms" amplitude="103.451469nA"/>
    <pulseGenerator id="Pulse_Golgi_pop0_1" delay="50.000000ms" duration="400.000000ms" amplitude="95.078261nA"/>
    <pulseGenerator id="Pulse_Golgi_pop0_2" delay="50.000000ms" duration="400.000000ms" amplitude="110.883685nA"/>
    <pulseGenerator id="Pulse_Golgi_pop0_3" delay="50.000000ms" duration="400.000000ms" amplitude="107.687826nA"/>
    <pulseGenerator id="Pulse_Golgi_pop0_4" delay="50.000000ms" duration="400.000000ms" amplitude="115.223759nA"/>
    <pulseGenerator id="Pulse_Golgi_pop0_5" delay="50.000000ms" duration="400.000000ms" amplitude="127.739526nA"/>
    <pulseGenerator id="Pulse_Golgi_pop0_6" delay="50.000000ms" duration="400.000000ms" amplitude="75.184644nA"/>
    <pulseGenerator id="Pulse_Golgi_pop0_7" delay="50.000000ms" duration="400.000000ms" amplitude="90.727518nA"/>
    <pulseGenerator id="Pulse_Golgi_pop0_8" delay="50.000000ms" duration="400.000000ms" amplitude="95.143476nA"/>
    <pulseGenerator id="Pulse_Golgi_pop0_9" delay="50.000000ms" duration="400.000000ms" amplitude="95.595498nA"/>
    <pulseGenerator id="Pulse_Golgi_pop0_10" delay="50.000000ms" duration="400.000000ms" amplitude="97.417640nA"/>
    <pulseGenerator id="Pulse_Golgi_pop0_11" delay="50.000000ms" duration="400.000000ms" amplitude="96.018309nA"/>
    <pulseGenerator id="Pulse_Golgi_pop0_12" delay="50.000000ms" duration="400.000000ms" amplitude="107.123990nA"/>
    <pulseGenerator id="Pulse_Golgi_pop0_13" delay="50.000000ms" duration="400.000000ms" amplitude="108.161029nA"/>
    <pulseGenerator id="Pulse_Golgi_pop0_14" delay="50.000000ms" duration="400.000000ms" amplitude="105.640115nA"/>
    <pulseGenerator id="Pulse_Golgi_pop1_0" delay="50.000000ms" duration="400.000000ms" amplitude="103.451469nA"/>
    <pulseGenerator id="Pulse_Golgi_pop1_1" delay="50.000000ms" duration="400.000000ms" amplitude="95.078261nA"/>
    <pulseGenerator id="Pulse_Golgi_pop1_2" delay="50.000000ms" duration="400.000000ms" amplitude="110.883685nA"/>
    <pulseGenerator id="Pulse_Golgi_pop1_3" delay="50.000000ms" duration="400.000000ms" amplitude="107.687826nA"/>
    <pulseGenerator id="Pulse_Golgi_pop1_4" delay="50.000000ms" duration="400.000000ms" amplitude="115.223759nA"/>
    <pulseGenerator id="Pulse_Golgi_pop1_5" delay="50.000000ms" duration="400.000000ms" amplitude="127.739526nA"/>
    <pulseGenerator id="Pulse_Golgi_pop1_6" delay="50.000000ms" duration="400.000000ms" amplitude="75.184644nA"/>
    <pulseGenerator id="Pulse_Golgi_pop1_7" delay="50.000000ms" duration="400.000000ms" amplitude="90.727518nA"/>
    <pulseGenerator id="Pulse_Golgi_pop1_8" delay="50.000000ms" duration="400.000000ms" amplitude="95.143476nA"/>
    <pulseGenerator id="Pulse_Golgi_pop1_9" delay="50.000000ms" duration="400.000000ms" amplitude="95.595498nA"/>
    <pulseGenerator id="Pulse_Golgi_pop1_10" delay="50.000000ms" duration="400.000000ms" amplitude="97.417640nA"/>
    <pulseGenerator id="Pulse_Golgi_pop1_11" delay="50.000000ms" duration="400.000000ms" amplitude="96.018309nA"/>
    <pulseGenerator id="Pulse_Golgi_pop1_12" delay="50.000000ms" duration="400.000000ms" amplitude="107.123990nA"/>
    <pulseGenerator id="Pulse_Golgi_pop1_13" delay="50.000000ms" duration="400.000000ms" amplitude="108.161029nA"/>
    <pulseGenerator id="Pulse_Golgi_pop1_14" delay="50.000000ms" duration="400.000000ms" amplitude="105.640115nA"/>
    <poissonFiringSynapse id="PFSpikeSyn_Golgi_pop0syn1" synapse="PFSpikeSyn" averageRate="100.000000 per_s" spikeTarget="./PFSpikeSyn"/>
    <poissonFiringSynapse id="PFSpikeSyn_Golgi_pop1syn1" synapse="PFSpikeSyn" averageRate="100.000000 per_s" spikeTarget="./PFSpikeSyn"/>
    <transientPoissonFiringSynapse id="PFSpikeSyn_Golgi_pop0syn0" delay="80.000000ms" duration="100.000000ms" synapse="PFSpikeSyn" averageRate="300.000000 per_s" spikeTarget="./PFSpikeSyn"/>
    <transientPoissonFiringSynapse id="PFSpikeSyn_Golgi_pop1syn0" delay="80.000000ms" duration="100.000000ms" synapse="PFSpikeSyn" averageRate="150.000000 per_s" spikeTarget="./PFSpikeSyn"/>
    <network id="Golgi_V2012_test1_trial2_network" type="networkWithTemperature" temperature="23 degC">
        <notes>Parameter arrays for building this network are listed below:
Cell distribution parameters:
{'yDim': 100, 'popID': 'Golgi_pop0', 'zDim': 100, 'xDim': 100, 'distributionModel': 'explicit_cell_numbers', 'minimal_distance': 25, 'distanceModel': 'random_minimal_distance'}
{'yDim': 100, 'popID': 'Golgi_pop1', 'zDim': 100, 'xDim': 100, 'distributionModel': 'explicit_cell_numbers', 'minimal_distance': 25, 'distanceModel': 'random_minimal_distance'}
Cell population parameters:
Cell population parameters for Golgi_pop0:
{'popID': 'Golgi_pop0', 'cellType': 'Very_Simple_Golgi_test_morph', 'size': 15}
Cell population parameters for Golgi_pop1:
{'popID': 'Golgi_pop1', 'cellType': 'Very_Simple_Golgi_test_morph', 'size': 15}
Cell connectivity parameters:
{'targetingModelprePop': {'segmentGroupList': ['Section_1', 'dend_1'], 'model': 'segment groups and segments', 'segmentGroupProbabilities': [0.7, 0.3]}, 'gapJunctionModel': 'constant number of GJ contacts per pair', 'testingConductanceScale': 1, 'prePopID': 'Golgi_pop0', 'conductanceValue': 426, 'targetingModelpostPop': {'segmentGroupList': ['Section_1', 'dend_1'], 'model': 'segment groups and segments', 'segmentGroupProbabilities': [0.7, 0.3]}, 'postPopID': 'Golgi_pop1', 'numberGJ': 8, 'conductanceModel': 'constant', 'electricalConnModel': 'Vervaeke_2012_based', 'units': 'pS', 'spatialScale': 1}
Input parameters for a list of populations:
Input group parameters for Golgi_pop0:
{'stDevAmp': 20, 'inputModel': 'variable_basal_firing_rate', 'ampUnits': 'nA', 'amplitudeDistribution': 'gaussian', 'averageAmp': 100, 'valueOffset': 50, 'offsetDistribution': 'constant', 'offsetUnits': 'ms'}
{'inputModel': 'XF', 'targetingRegime': 'uniform', 'synapseList': [{'noInputs': 8, 'synapseMode': 'transient', 'segmentGroupProbabilities': [0.7, 0.3], 'synapseType': 'PFSpikeSyn', 'duration': 100, 'segmentGroupList': ['Section_1', 'dend_1'], 'targetingModel': 'segment groups and segments', 'averageRate': 300, 'delay': 80, 'units': 'ms', 'numberModel': 'constant number of inputs per cell'}, {'segmentGroupList': ['Section_1', 'dend_1'], 'targetingModel': 'segment groups and segments', 'synapseMode': 'persistent', 'averageRate': 100, 'noInputs': 8, 'synapseType': 'PFSpikeSyn', 'numberModel': 'constant number of inputs per cell', 'segmentGroupProbabilities': [0.7, 0.3]}], 'fractionToTarget': 0.5, 'colocalizeSynapses': False}
Input group parameters for Golgi_pop1:
{'stDevAmp': 20, 'inputModel': 'variable_basal_firing_rate', 'ampUnits': 'nA', 'amplitudeDistribution': 'gaussian', 'averageAmp': 100, 'valueOffset': 50, 'offsetDistribution': 'constant', 'offsetUnits': 'ms'}
{'inputModel': 'XF', 'targetingRegime': 'uniform', 'synapseList': [{'fractionAlongANDsubsegProbabilities': [[[0.25, 1], [0.25, 0]], [[0.25, 0.7], [0.25, 0.3]]], 'noInputs': 8, 'synapseMode': 'transient', 'synapseType': 'PFSpikeSyn', 'duration': 100, 'segmentList': ['Soma', 'dend_3'], 'segmentProbabilities': [0.7, 0.3], 'targetingModel': 'segments and subsegments', 'averageRate': 150, 'delay': 80, 'units': 'ms', 'numberModel': 'constant number of inputs per cell'}, {'segmentProbabilities': [0.7, 0.3], 'targetingModel': 'segments and subsegments', 'synapseMode': 'persistent', 'averageRate': 100, 'noInputs': 8, 'synapseType': 'PFSpikeSyn', 'segmentList': ['Soma', 'dend_3'], 'numberModel': 'constant number of inputs per cell', 'fractionAlongANDsubsegProbabilities': [[[0.25, 1], [0.25, 0]], [[0.25, 0.7], [0.25, 0.3]]]}], 'fractionToTarget': 0.5, 'colocalizeSynapses': False}
</notes>
        <population id="Golgi_pop0" type="populationList" component="Very_Simple_Golgi_test_morph" size="15">
            <instance id="0">
                <location y="4.416520153908476" x="84.733564580140623" z="9.787763612240131"/>
            </instance>
            <instance id="1">
                <location y="17.011537045732961" x="19.904184800741518" z="71.394042618563773"/>
            </instance>
            <instance id="2">
                <location y="58.406490120845255" x="55.691293616632834" z="61.723794342170088"/>
            </instance>
            <instance id="3">
                <location y="65.842839540346048" x="5.231378601178093" z="2.776045672779637"/>
            </instance>
            <instance id="4">
                <location y="13.64401160365154" x="13.578163282500121" z="21.698585715292573"/>
            </instance>
            <instance id="5">
                <location y="89.739609331129927" x="60.838839532446151" z="28.855751359347593"/>
            </instance>
            <instance id="6">
                <location y="54.878639001629303" x="44.379487998641764" z="52.194873819029233"/>
            </instance>
            <instance id="7">
                <location y="22.00153792019195" x="68.808851127133138" z="45.786270321415103"/>
            </instance>
            <instance id="8">
                <location y="46.381423591475965" x="94.295768966709886" z="18.467100611454679"/>
            </instance>
            <instance id="9">
                <location y="77.377067773523009" x="30.870958926025217" z="15.388947540483001"/>
            </instance>
            <instance id="10">
                <location y="18.502811344644176" x="98.201415010435028" z="48.40436138284705"/>
            </instance>
            <instance id="11">
                <location y="67.913568863045299" x="72.53345221473036" z="90.555085957281449"/>
            </instance>
            <instance id="12">
                <location y="86.683509642241503" x="21.995999842009695" z="41.903589961304597"/>
            </instance>
            <instance id="13">
                <location y="13.985033075848119" x="17.939009692524788" z="82.01367411615982"/>
            </instance>
            <instance id="14">
                <location y="38.651752441628354" x="12.231165814682099" z="57.737167182399403"/>
            </instance>
        </population>
        <population id="Golgi_pop1" type="populationList" component="Very_Simple_Golgi_test_morph" size="15">
            <instance id="0">
                <location y="8.999447423975726" x="73.829457886776041" z="68.471532282271752"/>
            </instance>
            <instance id="1">
                <location y="1.407043455446799" x="54.099921634773196" z="97.31362870302965"/>
            </instance>
            <instance id="2">
                <location y="98.607577781393047" x="31.606415479380658" z="89.783834091446408"/>
            </instance>
            <instance id="3">
                <location y="33.161859261627555" x="32.074879232028962" z="32.092588719406656"/>
            </instance>
            <instance id="4">
                <location y="74.022258046819857" x="18.889307161002865" z="74.907403149877766"/>
            </instance>
            <instance id="5">
                <location y="96.94723333247795" x="59.796656889660603" z="76.881301580002074"/>
            </instance>
            <instance id="6">
                <location y="53.506508141200058" x="3.835921759136129" z="39.340359126035153"/>
            </instance>
            <instance id="7">
                <location y="73.738072592780412" x="78.256306617398636" z="11.461326950927797"/>
            </instance>
            <instance id="8">
                <location y="42.480164297424395" x="3.030791572346414" z="31.644334216988124"/>
            </instance>
            <instance id="9">
                <location y="48.248193804900993" x="65.728218117236992" z="1.340885235679756"/>
            </instance>
            <instance id="10">
                <location y="32.221690816807126" x="59.860189224128725" z="78.254820872756397"/>
            </instance>
            <instance id="11">
                <location y="29.757994976877399" x="57.947158633868945" z="22.308184000574073"/>
            </instance>
            <instance id="12">
                <location y="99.014126328556429" x="52.895272541928549" z="59.42275377981121"/>
            </instance>
            <instance id="13">
                <location y="14.213110419539154" x="73.328333776617498" z="83.660757259852431"/>
            </instance>
            <instance id="14">
                <location y="95.915324111251678" x="59.639359395268684" z="2.631488715621377"/>
            </instance>
        </population>
        <inputList id="Input_Golgi_pop0_0" component="Pulse_Golgi_pop0_0" population="Golgi_pop0">
            <input destination="synapses" id="0" target="../Golgi_pop0/0/Very_Simple_Golgi_test_morph"/>
        </inputList>
        <inputList id="Input_Golgi_pop0_1" component="Pulse_Golgi_pop0_1" population="Golgi_pop0">
            <input destination="synapses" id="1" target="../Golgi_pop0/1/Very_Simple_Golgi_test_morph"/>
        </inputList>
        <inputList id="Input_Golgi_pop0_2" component="Pulse_Golgi_pop0_2" population="Golgi_pop0">
            <input destination="synapses" id="2" target="../Golgi_pop0/2/Very_Simple_Golgi_test_morph"/>
        </inputList>
        <inputList id="Input_Golgi_pop0_3" component="Pulse_Golgi_pop0_3" population="Golgi_pop0">
            <input destination="synapses" id="3" target="../Golgi_pop0/3/Very_Simple_Golgi_test_morph"/>
        </inputList>
        <inputList id="Input_Golgi_pop0_4" component="Pulse_Golgi_pop0_4" population="Golgi_pop0">
            <input destination="synapses" id="4" target="../Golgi_pop0/4/Very_Simple_Golgi_test_morph"/>
        </inputList>
        <inputList id="Input_Golgi_pop0_5" component="Pulse_Golgi_pop0_5" population="Golgi_pop0">
            <input destination="synapses" id="5" target="../Golgi_pop0/5/Very_Simple_Golgi_test_morph"/>
        </inputList>
        <inputList id="Input_Golgi_pop0_6" component="Pulse_Golgi_pop0_6" population="Golgi_pop0">
            <input destination="synapses" id="6" target="../Golgi_pop0/6/Very_Simple_Golgi_test_morph"/>
        </inputList>
        <inputList id="Input_Golgi_pop0_7" component="Pulse_Golgi_pop0_7" population="Golgi_pop0">
            <input destination="synapses" id="7" target="../Golgi_pop0/7/Very_Simple_Golgi_test_morph"/>
        </inputList>
        <inputList id="Input_Golgi_pop0_8" component="Pulse_Golgi_pop0_8" population="Golgi_pop0">
            <input destination="synapses" id="8" target="../Golgi_pop0/8/Very_Simple_Golgi_test_morph"/>
        </inputList>
        <inputList id="Input_Golgi_pop0_9" component="Pulse_Golgi_pop0_9" population="Golgi_pop0">
            <input destination="synapses" id="9" target="../Golgi_pop0/9/Very_Simple_Golgi_test_morph"/>
        </inputList>
        <inputList id="Input_Golgi_pop0_10" component="Pulse_Golgi_pop0_10" population="Golgi_pop0">
            <input destination="synapses" id="10" target="../Golgi_pop0/10/Very_Simple_Golgi_test_morph"/>
        </inputList>
        <inputList id="Input_Golgi_pop0_11" component="Pulse_Golgi_pop0_11" population="Golgi_pop0">
            <input destination="synapses" id="11" target="../Golgi_pop0/11/Very_Simple_Golgi_test_morph"/>
        </inputList>
        <inputList id="Input_Golgi_pop0_12" component="Pulse_Golgi_pop0_12" population="Golgi_pop0">
            <input destination="synapses" id="12" target="../Golgi_pop0/12/Very_Simple_Golgi_test_morph"/>
        </inputList>
        <inputList id="Input_Golgi_pop0_13" component="Pulse_Golgi_pop0_13" population="Golgi_pop0">
            <input destination="synapses" id="13" target="../Golgi_pop0/13/Very_Simple_Golgi_test_morph"/>
        </inputList>
        <inputList id="Input_Golgi_pop0_14" component="Pulse_Golgi_pop0_14" population="Golgi_pop0">
            <input destination="synapses" id="14" target="../Golgi_pop0/14/Very_Simple_Golgi_test_morph"/>
        </inputList>
        <inputList id="Input_listPFSpikeSyn_Golgi_pop0_syn0" component="PFSpikeSyn_Golgi_pop0syn0" population="Golgi_pop0">
            <input fractionAlong="0.027760" destination="synapses" id="0" segmentId="2" target="../Golgi_pop0/12/Very_Simple_Golgi_test_morph"/>
            <input fractionAlong="0.608388" destination="synapses" id="1" segmentId="1" target="../Golgi_pop0/12/Very_Simple_Golgi_test_morph"/>
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        </inputList>
        <inputList id="Input_listPFSpikeSyn_Golgi_pop0_syn1" component="PFSpikeSyn_Golgi_pop0syn1" population="Golgi_pop0">
            <input fractionAlong="0.243916" destination="synapses" id="0" segmentId="2" target="../Golgi_pop0/12/Very_Simple_Golgi_test_morph"/>
            <input fractionAlong="0.756386" destination="synapses" id="1" segmentId="1" target="../Golgi_pop0/12/Very_Simple_Golgi_test_morph"/>
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        </inputList>
        <inputList id="Input_Golgi_pop1_0" component="Pulse_Golgi_pop1_0" population="Golgi_pop1">
            <input destination="synapses" id="0" target="../Golgi_pop1/0/Very_Simple_Golgi_test_morph"/>
        </inputList>
        <inputList id="Input_Golgi_pop1_1" component="Pulse_Golgi_pop1_1" population="Golgi_pop1">
            <input destination="synapses" id="1" target="../Golgi_pop1/1/Very_Simple_Golgi_test_morph"/>
        </inputList>
        <inputList id="Input_Golgi_pop1_2" component="Pulse_Golgi_pop1_2" population="Golgi_pop1">
            <input destination="synapses" id="2" target="../Golgi_pop1/2/Very_Simple_Golgi_test_morph"/>
        </inputList>
        <inputList id="Input_Golgi_pop1_3" component="Pulse_Golgi_pop1_3" population="Golgi_pop1">
            <input destination="synapses" id="3" target="../Golgi_pop1/3/Very_Simple_Golgi_test_morph"/>
        </inputList>
        <inputList id="Input_Golgi_pop1_4" component="Pulse_Golgi_pop1_4" population="Golgi_pop1">
            <input destination="synapses" id="4" target="../Golgi_pop1/4/Very_Simple_Golgi_test_morph"/>
        </inputList>
        <inputList id="Input_Golgi_pop1_5" component="Pulse_Golgi_pop1_5" population="Golgi_pop1">
            <input destination="synapses" id="5" target="../Golgi_pop1/5/Very_Simple_Golgi_test_morph"/>
        </inputList>
        <inputList id="Input_Golgi_pop1_6" component="Pulse_Golgi_pop1_6" population="Golgi_pop1">
            <input destination="synapses" id="6" target="../Golgi_pop1/6/Very_Simple_Golgi_test_morph"/>
        </inputList>
        <inputList id="Input_Golgi_pop1_7" component="Pulse_Golgi_pop1_7" population="Golgi_pop1">
            <input destination="synapses" id="7" target="../Golgi_pop1/7/Very_Simple_Golgi_test_morph"/>
        </inputList>
        <inputList id="Input_Golgi_pop1_8" component="Pulse_Golgi_pop1_8" population="Golgi_pop1">
            <input destination="synapses" id="8" target="../Golgi_pop1/8/Very_Simple_Golgi_test_morph"/>
        </inputList>
        <inputList id="Input_Golgi_pop1_9" component="Pulse_Golgi_pop1_9" population="Golgi_pop1">
            <input destination="synapses" id="9" target="../Golgi_pop1/9/Very_Simple_Golgi_test_morph"/>
        </inputList>
        <inputList id="Input_Golgi_pop1_10" component="Pulse_Golgi_pop1_10" population="Golgi_pop1">
            <input destination="synapses" id="10" target="../Golgi_pop1/10/Very_Simple_Golgi_test_morph"/>
        </inputList>
        <inputList id="Input_Golgi_pop1_11" component="Pulse_Golgi_pop1_11" population="Golgi_pop1">
            <input destination="synapses" id="11" target="../Golgi_pop1/11/Very_Simple_Golgi_test_morph"/>
        </inputList>
        <inputList id="Input_Golgi_pop1_12" component="Pulse_Golgi_pop1_12" population="Golgi_pop1">
            <input destination="synapses" id="12" target="../Golgi_pop1/12/Very_Simple_Golgi_test_morph"/>
        </inputList>
        <inputList id="Input_Golgi_pop1_13" component="Pulse_Golgi_pop1_13" population="Golgi_pop1">
            <input destination="synapses" id="13" target="../Golgi_pop1/13/Very_Simple_Golgi_test_morph"/>
        </inputList>
        <inputList id="Input_Golgi_pop1_14" component="Pulse_Golgi_pop1_14" population="Golgi_pop1">
            <input destination="synapses" id="14" target="../Golgi_pop1/14/Very_Simple_Golgi_test_morph"/>
        </inputList>
        <inputList id="Input_listPFSpikeSyn_Golgi_pop1_syn0" component="PFSpikeSyn_Golgi_pop1syn0" population="Golgi_pop1">
            <input fractionAlong="0.034110" destination="synapses" id="0" segmentId="5" target="../Golgi_pop1/12/Very_Simple_Golgi_test_morph"/>
            <input fractionAlong="0.137197" destination="synapses" id="1" segmentId="0" target="../Golgi_pop1/12/Very_Simple_Golgi_test_morph"/>
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        </inputList>
        <inputList id="Input_listPFSpikeSyn_Golgi_pop1_syn1" component="PFSpikeSyn_Golgi_pop1syn1" population="Golgi_pop1">
            <input fractionAlong="0.163138" destination="synapses" id="0" segmentId="0" target="../Golgi_pop1/12/Very_Simple_Golgi_test_morph"/>
            <input fractionAlong="0.104654" destination="synapses" id="1" segmentId="0" target="../Golgi_pop1/12/Very_Simple_Golgi_test_morph"/>
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        </inputList>
    </network>
</neuroml>
