<neuroml xmlns="http://www.neuroml.org/schema/neuroml2"  xmlns:xs="http://www.w3.org/2001/XMLSchema" xmlns:xsi="http://www.w3.org/2001/XMLSchema-instance" xsi:schemaLocation="http://www.neuroml.org/schema/neuroml2 https://raw.github.com/NeuroML/NeuroML2/development/Schemas/NeuroML2/NeuroML_v2beta4.xsd" id="Golgi_V2012_test1_import_trial0">
    <include href="/../../../Golgi_5comp_3channels_1CaPool.cell.nml"></include>
    <include href="/../../../PFSpikeSyn.synapse.nml"></include>
    <gapJunction id="gap_junction00" conductance="443.698925pS"/>
    <gapJunction id="gap_junction01" conductance="422.484992pS"/>
    <gapJunction id="gap_junction02" conductance="438.612603pS"/>
    <gapJunction id="gap_junction03" conductance="461.615312pS"/>
    <gapJunction id="gap_junction04" conductance="388.159519pS"/>
    <gapJunction id="gap_junction05" conductance="389.408499pS"/>
    <gapJunction id="gap_junction06" conductance="425.181096pS"/>
    <gapJunction id="gap_junction07" conductance="414.198462pS"/>
    <gapJunction id="gap_junction08" conductance="454.276160pS"/>
    <gapJunction id="gap_junction09" conductance="441.608709pS"/>
    <gapJunction id="gap_junction010" conductance="454.257736pS"/>
    <gapJunction id="gap_junction011" conductance="396.317488pS"/>
    <gapJunction id="gap_junction012" conductance="465.073771pS"/>
    <gapJunction id="gap_junction013" conductance="440.829855pS"/>
    <gapJunction id="gap_junction014" conductance="427.391552pS"/>
    <gapJunction id="gap_junction015" conductance="456.512107pS"/>
    <gapJunction id="gap_junction016" conductance="416.164127pS"/>
    <gapJunction id="gap_junction017" conductance="412.399468pS"/>
    <gapJunction id="gap_junction018" conductance="415.891144pS"/>
    <gapJunction id="gap_junction019" conductance="394.717361pS"/>
    <gapJunction id="gap_junction020" conductance="427.041845pS"/>
    <gapJunction id="gap_junction021" conductance="462.019104pS"/>
    <gapJunction id="gap_junction022" conductance="416.305394pS"/>
    <gapJunction id="gap_junction023" conductance="427.517739pS"/>
    <gapJunction id="gap_junction024" conductance="410.218399pS"/>
    <gapJunction id="gap_junction025" conductance="393.459432pS"/>
    <gapJunction id="gap_junction026" conductance="416.005547pS"/>
    <gapJunction id="gap_junction027" conductance="446.126489pS"/>
    <gapJunction id="gap_junction028" conductance="433.879889pS"/>
    <gapJunction id="gap_junction029" conductance="423.058868pS"/>
    <gapJunction id="gap_junction030" conductance="455.134994pS"/>
    <gapJunction id="gap_junction031" conductance="427.593899pS"/>
    <gapJunction id="gap_junction032" conductance="436.224886pS"/>
    <gapJunction id="gap_junction033" conductance="438.054748pS"/>
    <gapJunction id="gap_junction034" conductance="436.932226pS"/>
    <gapJunction id="gap_junction035" conductance="424.032889pS"/>
    <gapJunction id="gap_junction036" conductance="416.962947pS"/>
    <gapJunction id="gap_junction037" conductance="407.412674pS"/>
    <gapJunction id="gap_junction038" conductance="431.501170pS"/>
    <gapJunction id="gap_junction039" conductance="415.269650pS"/>
    <gapJunction id="gap_junction040" conductance="481.200529pS"/>
    <gapJunction id="gap_junction041" conductance="428.617155pS"/>
    <gapJunction id="gap_junction042" conductance="430.953298pS"/>
    <gapJunction id="gap_junction043" conductance="422.267689pS"/>
    <gapJunction id="gap_junction044" conductance="422.385576pS"/>
    <gapJunction id="gap_junction045" conductance="443.781700pS"/>
    <gapJunction id="gap_junction046" conductance="445.288909pS"/>
    <gapJunction id="gap_junction047" conductance="433.156938pS"/>
    <gapJunction id="gap_junction048" conductance="424.974898pS"/>
    <gapJunction id="gap_junction049" conductance="456.286961pS"/>
    <gapJunction id="gap_junction050" conductance="414.018684pS"/>
    <gapJunction id="gap_junction051" conductance="422.023198pS"/>
    <gapJunction id="gap_junction052" conductance="438.841938pS"/>
    <gapJunction id="gap_junction053" conductance="413.416578pS"/>
    <gapJunction id="gap_junction054" conductance="468.035372pS"/>
    <gapJunction id="gap_junction055" conductance="428.254536pS"/>
    <gapJunction id="gap_junction056" conductance="398.352275pS"/>
    <gapJunction id="gap_junction057" conductance="407.053142pS"/>
    <gapJunction id="gap_junction058" conductance="408.239576pS"/>
    <gapJunction id="gap_junction059" conductance="435.583005pS"/>
    <gapJunction id="gap_junction060" conductance="404.906795pS"/>
    <gapJunction id="gap_junction061" conductance="415.751885pS"/>
    <gapJunction id="gap_junction062" conductance="436.706735pS"/>
    <gapJunction id="gap_junction063" conductance="430.350426pS"/>
    <gapJunction id="gap_junction064" conductance="381.085578pS"/>
    <gapJunction id="gap_junction065" conductance="386.151645pS"/>
    <gapJunction id="gap_junction066" conductance="443.519824pS"/>
    <gapJunction id="gap_junction067" conductance="420.450244pS"/>
    <gapJunction id="gap_junction068" conductance="423.871040pS"/>
    <gapJunction id="gap_junction069" conductance="420.362475pS"/>
    <gapJunction id="gap_junction070" conductance="429.041241pS"/>
    <gapJunction id="gap_junction071" conductance="431.849802pS"/>
    <gapJunction id="gap_junction072" conductance="425.655604pS"/>
    <gapJunction id="gap_junction073" conductance="420.466008pS"/>
    <gapJunction id="gap_junction074" conductance="399.319028pS"/>
    <gapJunction id="gap_junction075" conductance="392.219510pS"/>
    <gapJunction id="gap_junction076" conductance="414.059200pS"/>
    <gapJunction id="gap_junction077" conductance="429.526725pS"/>
    <gapJunction id="gap_junction078" conductance="410.645555pS"/>
    <gapJunction id="gap_junction079" conductance="411.262870pS"/>
    <gapJunction id="gap_junction080" conductance="408.218458pS"/>
    <gapJunction id="gap_junction081" conductance="388.962829pS"/>
    <gapJunction id="gap_junction082" conductance="401.659570pS"/>
    <gapJunction id="gap_junction083" conductance="423.078692pS"/>
    <gapJunction id="gap_junction084" conductance="443.385669pS"/>
    <gapJunction id="gap_junction085" conductance="439.354703pS"/>
    <gapJunction id="gap_junction086" conductance="423.831318pS"/>
    <gapJunction id="gap_junction087" conductance="437.020682pS"/>
    <gapJunction id="gap_junction088" conductance="444.771712pS"/>
    <gapJunction id="gap_junction089" conductance="416.642611pS"/>
    <gapJunction id="gap_junction090" conductance="428.807881pS"/>
    <gapJunction id="gap_junction091" conductance="425.539593pS"/>
    <gapJunction id="gap_junction092" conductance="392.673774pS"/>
    <gapJunction id="gap_junction093" conductance="464.354475pS"/>
    <gapJunction id="gap_junction094" conductance="440.550868pS"/>
    <gapJunction id="gap_junction095" conductance="444.417788pS"/>
    <gapJunction id="gap_junction096" conductance="422.545307pS"/>
    <gapJunction id="gap_junction097" conductance="445.997665pS"/>
    <gapJunction id="gap_junction098" conductance="425.288535pS"/>
    <gapJunction id="gap_junction099" conductance="462.483563pS"/>
    <gapJunction id="gap_junction0100" conductance="431.926109pS"/>
    <gapJunction id="gap_junction0101" conductance="404.277406pS"/>
    <gapJunction id="gap_junction0102" conductance="439.214989pS"/>
    <gapJunction id="gap_junction0103" conductance="430.045161pS"/>
    <pulseGenerator id="Pulse_vrpop0_Golgi_pop0_0" delay="50.000000ms" duration="400.000000ms" amplitude="89.409390pA"/>
    <pulseGenerator id="Pulse_vrpop0_Golgi_pop0_1" delay="50.000000ms" duration="400.000000ms" amplitude="69.466373pA"/>
    <pulseGenerator id="Pulse_vrpop0_Golgi_pop0_2" delay="50.000000ms" duration="400.000000ms" amplitude="50.639457pA"/>
    <pulseGenerator id="Pulse_vrpop0_Golgi_pop0_3" delay="50.000000ms" duration="400.000000ms" amplitude="40.483591pA"/>
    <pulseGenerator id="Pulse_vrpop0_Golgi_pop0_4" delay="50.000000ms" duration="400.000000ms" amplitude="45.041921pA"/>
    <pulseGenerator id="Pulse_vrpop1_Golgi_pop1_0" delay="50.000000ms" duration="400.000000ms" amplitude="89.409390pA"/>
    <pulseGenerator id="Pulse_vrpop1_Golgi_pop1_1" delay="50.000000ms" duration="400.000000ms" amplitude="69.466373pA"/>
    <pulseGenerator id="Pulse_vrpop1_Golgi_pop1_2" delay="50.000000ms" duration="400.000000ms" amplitude="50.639457pA"/>
    <pulseGenerator id="Pulse_vrpop1_Golgi_pop1_3" delay="50.000000ms" duration="400.000000ms" amplitude="40.483591pA"/>
    <pulseGenerator id="Pulse_vrpop1_Golgi_pop1_4" delay="50.000000ms" duration="400.000000ms" amplitude="45.041921pA"/>
    <spikeArray id="XFpop0_Golgi_pop0_cell0_syn0_0">
        <spike id="0" time="0.006315s"/>
        <spike id="1" time="0.016800s"/>
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    </spikeArray>
    <spikeArray id="XFpop0_Golgi_pop0_cell0_syn0_1">
        <spike id="0" time="0.000190s"/>
        <spike id="1" time="0.012725s"/>
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    </spikeArray>
    <spikeArray id="XFpop0_Golgi_pop0_cell0_syn0_2">
        <spike id="0" time="0.019855s"/>
        <spike id="1" time="0.025095s"/>
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    </spikeArray>
    <spikeArray id="XFpop0_Golgi_pop0_cell0_syn0_3">
        <spike id="0" time="0.004025s"/>
        <spike id="1" time="0.007510s"/>
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    </spikeArray>
    <spikeArray id="XFpop0_Golgi_pop0_cell0_syn0_4">
        <spike id="0" time="0.008755s"/>
        <spike id="1" time="0.044155s"/>
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    </spikeArray>
    <spikeArray id="XFpop0_Golgi_pop0_cell0_syn0_5">
        <spike id="0" time="0.000465s"/>
        <spike id="1" time="0.006835s"/>
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    </spikeArray>
    <spikeArray id="XFpop0_Golgi_pop0_cell0_syn0_6">
        <spike id="0" time="0.009025s"/>
        <spike id="1" time="0.022910s"/>
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    </spikeArray>
    <spikeArray id="XFpop0_Golgi_pop0_cell0_syn0_7">
        <spike id="0" time="0.017580s"/>
        <spike id="1" time="0.020250s"/>
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    </spikeArray>
    <spikeArray id="XFpop0_Golgi_pop0_cell3_syn0_0">
        <spike id="0" time="0.006315s"/>
        <spike id="1" time="0.016800s"/>
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    </spikeArray>
    <spikeArray id="XFpop0_Golgi_pop0_cell3_syn0_1">
        <spike id="0" time="0.000190s"/>
        <spike id="1" time="0.012725s"/>
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    </spikeArray>
    <spikeArray id="XFpop0_Golgi_pop0_cell3_syn0_2">
        <spike id="0" time="0.019855s"/>
        <spike id="1" time="0.025095s"/>
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    </spikeArray>
    <spikeArray id="XFpop0_Golgi_pop0_cell3_syn0_3">
        <spike id="0" time="0.004025s"/>
        <spike id="1" time="0.007510s"/>
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    </spikeArray>
    <spikeArray id="XFpop0_Golgi_pop0_cell3_syn0_4">
        <spike id="0" time="0.008755s"/>
        <spike id="1" time="0.044155s"/>
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    </spikeArray>
    <spikeArray id="XFpop0_Golgi_pop0_cell3_syn0_5">
        <spike id="0" time="0.000465s"/>
        <spike id="1" time="0.006835s"/>
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    </spikeArray>
    <spikeArray id="XFpop0_Golgi_pop0_cell3_syn0_6">
        <spike id="0" time="0.009025s"/>
        <spike id="1" time="0.022910s"/>
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    </spikeArray>
    <spikeArray id="XFpop0_Golgi_pop0_cell3_syn0_7">
        <spike id="0" time="0.017580s"/>
        <spike id="1" time="0.020250s"/>
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    </spikeArray>
    <spikeArray id="XFpop0_Golgi_pop0_cell2_syn0_0">
        <spike id="0" time="0.006315s"/>
        <spike id="1" time="0.016800s"/>
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    </spikeArray>
    <spikeArray id="XFpop0_Golgi_pop0_cell2_syn0_1">
        <spike id="0" time="0.000190s"/>
        <spike id="1" time="0.012725s"/>
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    </spikeArray>
    <spikeArray id="XFpop0_Golgi_pop0_cell2_syn0_2">
        <spike id="0" time="0.019855s"/>
        <spike id="1" time="0.025095s"/>
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    </spikeArray>
    <spikeArray id="XFpop0_Golgi_pop0_cell2_syn0_3">
        <spike id="0" time="0.004025s"/>
        <spike id="1" time="0.007510s"/>
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    </spikeArray>
    <spikeArray id="XFpop0_Golgi_pop0_cell2_syn0_4">
        <spike id="0" time="0.008755s"/>
        <spike id="1" time="0.044155s"/>
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    </spikeArray>
    <spikeArray id="XFpop0_Golgi_pop0_cell2_syn0_5">
        <spike id="0" time="0.000465s"/>
        <spike id="1" time="0.006835s"/>
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    </spikeArray>
    <spikeArray id="XFpop0_Golgi_pop0_cell2_syn0_6">
        <spike id="0" time="0.009025s"/>
        <spike id="1" time="0.022910s"/>
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    </spikeArray>
    <spikeArray id="XFpop0_Golgi_pop0_cell2_syn0_7">
        <spike id="0" time="0.017580s"/>
        <spike id="1" time="0.020250s"/>
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    </spikeArray>
    <spikeArray id="XFpop1_Golgi_pop1_cell0_syn0_0">
        <spike id="0" time="0.006455s"/>
        <spike id="1" time="0.027405s"/>
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    </spikeArray>
    <spikeArray id="XFpop1_Golgi_pop1_cell0_syn0_1">
        <spike id="0" time="0.003155s"/>
        <spike id="1" time="0.006790s"/>
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    </spikeArray>
    <spikeArray id="XFpop1_Golgi_pop1_cell0_syn0_2">
        <spike id="0" time="0.004620s"/>
        <spike id="1" time="0.005830s"/>
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    </spikeArray>
    <spikeArray id="XFpop1_Golgi_pop1_cell0_syn0_3">
        <spike id="0" time="0.015505s"/>
        <spike id="1" time="0.026950s"/>
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    </spikeArray>
    <spikeArray id="XFpop1_Golgi_pop1_cell0_syn0_4">
        <spike id="0" time="0.025540s"/>
        <spike id="1" time="0.051365s"/>
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    </spikeArray>
    <spikeArray id="XFpop1_Golgi_pop1_cell0_syn0_5">
        <spike id="0" time="0.006890s"/>
        <spike id="1" time="0.021370s"/>
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    </spikeArray>
    <spikeArray id="XFpop1_Golgi_pop1_cell0_syn0_6">
        <spike id="0" time="0.002135s"/>
        <spike id="1" time="0.019750s"/>
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    </spikeArray>
    <spikeArray id="XFpop1_Golgi_pop1_cell0_syn0_7">
        <spike id="0" time="0.014445s"/>
        <spike id="1" time="0.033735s"/>
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    </spikeArray>
    <spikeArray id="XFpop1_Golgi_pop1_cell3_syn0_0">
        <spike id="0" time="0.006455s"/>
        <spike id="1" time="0.027405s"/>
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    </spikeArray>
    <spikeArray id="XFpop1_Golgi_pop1_cell3_syn0_1">
        <spike id="0" time="0.003155s"/>
        <spike id="1" time="0.006790s"/>
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    </spikeArray>
    <spikeArray id="XFpop1_Golgi_pop1_cell3_syn0_2">
        <spike id="0" time="0.004620s"/>
        <spike id="1" time="0.005830s"/>
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    </spikeArray>
    <spikeArray id="XFpop1_Golgi_pop1_cell3_syn0_3">
        <spike id="0" time="0.015505s"/>
        <spike id="1" time="0.026950s"/>
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    </spikeArray>
    <spikeArray id="XFpop1_Golgi_pop1_cell3_syn0_4">
        <spike id="0" time="0.025540s"/>
        <spike id="1" time="0.051365s"/>
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    </spikeArray>
    <spikeArray id="XFpop1_Golgi_pop1_cell3_syn0_5">
        <spike id="0" time="0.006890s"/>
        <spike id="1" time="0.021370s"/>
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    </spikeArray>
    <spikeArray id="XFpop1_Golgi_pop1_cell3_syn0_6">
        <spike id="0" time="0.002135s"/>
        <spike id="1" time="0.019750s"/>
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    </spikeArray>
    <spikeArray id="XFpop1_Golgi_pop1_cell3_syn0_7">
        <spike id="0" time="0.014445s"/>
        <spike id="1" time="0.033735s"/>
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    </spikeArray>
    <spikeArray id="XFpop1_Golgi_pop1_cell2_syn0_0">
        <spike id="0" time="0.006455s"/>
        <spike id="1" time="0.027405s"/>
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    </spikeArray>
    <spikeArray id="XFpop1_Golgi_pop1_cell2_syn0_1">
        <spike id="0" time="0.003155s"/>
        <spike id="1" time="0.006790s"/>
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    </spikeArray>
    <spikeArray id="XFpop1_Golgi_pop1_cell2_syn0_2">
        <spike id="0" time="0.004620s"/>
        <spike id="1" time="0.005830s"/>
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    </spikeArray>
    <spikeArray id="XFpop1_Golgi_pop1_cell2_syn0_3">
        <spike id="0" time="0.015505s"/>
        <spike id="1" time="0.026950s"/>
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    </spikeArray>
    <spikeArray id="XFpop1_Golgi_pop1_cell2_syn0_4">
        <spike id="0" time="0.025540s"/>
        <spike id="1" time="0.051365s"/>
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    </spikeArray>
    <spikeArray id="XFpop1_Golgi_pop1_cell2_syn0_5">
        <spike id="0" time="0.006890s"/>
        <spike id="1" time="0.021370s"/>
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    </spikeArray>
    <spikeArray id="XFpop1_Golgi_pop1_cell2_syn0_6">
        <spike id="0" time="0.002135s"/>
        <spike id="1" time="0.019750s"/>
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    </spikeArray>
    <spikeArray id="XFpop1_Golgi_pop1_cell2_syn0_7">
        <spike id="0" time="0.014445s"/>
        <spike id="1" time="0.033735s"/>
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    </spikeArray>
    <network id="Golgi_V2012_test1_import_trial0_network" type="networkWithTemperature" temperature="23 degC">
        <notes>Parameter arrays for building this network are listed below:
Cell distribution parameters:
{'yDim': 80, 'popID': 'Golgi_pop0', 'zDim': 80, 'xDim': 80, 'distributionModel': 'explicit_cell_numbers', 'minimal_distance': 25, 'distanceModel': 'random_minimal_distance'}
{'yDim': 80, 'popID': 'Golgi_pop1', 'zDim': 80, 'xDim': 80, 'distributionModel': 'explicit_cell_numbers', 'minimal_distance': 25, 'distanceModel': 'random_minimal_distance'}
Cell population parameters:
Cell population parameters for Golgi_pop0:
{'popID': 'Golgi_pop0', 'cellType': 'Golgi_5comp_3channels_1CaPool', 'size': 5}
Cell population parameters for Golgi_pop1:
{'popID': 'Golgi_pop1', 'cellType': 'Golgi_5comp_3channels_1CaPool', 'size': 5}
Cell connectivity parameters:
{'targetingModelprePop': {'segmentGroupList': ['Section_1', 'dend_1'], 'model': 'segment groups and segments', 'segmentGroupProbabilities': {'Section_1': 0.7, 'dend_1': 0.3}}, 'gapJunctionModel': 'constant number of GJ contacts per pair', 'testingConductanceScale': 1, 'stdDev': 20, 'maximalConnDistance': 150, 'spatialScale': 1, 'prePopID': 'Golgi_pop0', 'averageConductance': 426, 'targetingModelpostPop': {'segmentGroupList': ['Section_1', 'dend_1'], 'model': 'segment groups and segments', 'segmentGroupProbabilities': {'Section_1': 0.7, 'dend_1': 0.3}}, 'postPopID': 'Golgi_pop1', 'numberGJ': 8, 'conductanceModel': 'variable', 'electricalConnModel': 'Vervaeke_2012_based', 'units': 'pS', 'distribution': 'gaussian'}
Input parameters for a list of populations:
Input group parameters for Golgi_pop0:
{'stDevAmp': 25, 'inputModel': 'variable_basal_firing_rate', 'ampUnits': 'pA', 'amplitudeDistribution': 'gaussian', 'averageAmp': 50, 'valueOffset': 50, 'inputLabel': 'vrpop0', 'offsetDistribution': 'constant', 'offsetUnits': 'ms'}
{'synapseList': [{'segmentGroupList': ['Section_1', 'dend_1'], 'targetingModel': 'segment groups and segments', 'synapseMode': 'persistent', 'averageRate': 100, 'noInputs': 8, 'synapseType': 'PFSpikeSyn', 'numberModel': 'constant number of inputs per cell', 'segmentGroupProbabilities': {'Section_1': 0.7, 'dend_1': 0.3}}], 'inputLabel': 'XFpop0', 'inputModel': 'XF', 'fractionToTarget': 0.5, 'targetingRegime': 'uniform', 'colocalizeSynapses': False}
Input group parameters for Golgi_pop1:
{'stDevAmp': 25, 'inputModel': 'variable_basal_firing_rate', 'ampUnits': 'pA', 'amplitudeDistribution': 'gaussian', 'averageAmp': 50, 'valueOffset': 50, 'inputLabel': 'vrpop1', 'offsetDistribution': 'constant', 'offsetUnits': 'ms'}
{'synapseList': [{'segmentProbabilities': {'Soma': 0.7, 'dend_3': 0.3}, 'targetingModel': 'segments and subsegments', 'synapseMode': 'persistent', 'averageRate': 100, 'noInputs': 8, 'synapseType': 'PFSpikeSyn', 'segmentList': ['Soma', 'dend_3'], 'numberModel': 'constant number of inputs per cell', 'fractionAlongANDsubsegProbabilities': {'Soma': [{'fractionAlong': 0.5, 'Prob': 1}, {'fractionAlong': 0.5, 'Prob': 0}], 'dend_3': [{'fractionAlong': 0.5, 'Prob': 0.7}, {'fractionAlong': 0.5, 'Prob': 0.3}]}}], 'inputLabel': 'XFpop1', 'inputModel': 'XF', 'fractionToTarget': 0.5, 'targetingRegime': 'uniform', 'colocalizeSynapses': False}
</notes>
        <population id="Golgi_pop0" type="populationList" component="Golgi_5comp_3channels_1CaPool" size="5">
            <instance id="0">
                <location y="62.945828079662249" x="5.841598081992334" z="60.854271742782693"/>
            </instance>
            <instance id="1">
                <location y="20.799827868792917" x="5.615329560033224" z="79.455640122152744"/>
            </instance>
            <instance id="2">
                <location y="17.676164743403788" x="10.981830800145174" z="19.393600128606892"/>
            </instance>
            <instance id="3">
                <location y="18.286075517742965" x="53.901992303972236" z="36.096863943010497"/>
            </instance>
            <instance id="4">
                <location y="59.282338628265549" x="56.858360190447087" z="12.133159431480296"/>
            </instance>
        </population>
        <population id="Golgi_pop1" type="populationList" component="Golgi_5comp_3channels_1CaPool" size="5">
            <instance id="0">
                <location y="61.052922380210404" x="15.368815721413291" z="35.101843379863865"/>
            </instance>
            <instance id="1">
                <location y="0.556123654602754" x="74.835202914941732" z="30.89393913166613"/>
            </instance>
            <instance id="2">
                <location y="22.575343454937116" x="76.722735250685204" z="47.964015284825436"/>
            </instance>
            <instance id="3">
                <location y="50.855363181736941" x="39.139181196963342" z="41.223812535811561"/>
            </instance>
            <instance id="4">
                <location y="51.845000088719431" x="24.804440456402659" z="16.267804962454619"/>
            </instance>
        </population>
        <population id="InputPop_XFpop0_Golgi_pop0_cell0_syn0_0" component="XFpop0_Golgi_pop0_cell0_syn0_0" size="1"/>
        <population id="InputPop_XFpop0_Golgi_pop0_cell0_syn0_1" component="XFpop0_Golgi_pop0_cell0_syn0_1" size="1"/>
        <population id="InputPop_XFpop0_Golgi_pop0_cell0_syn0_2" component="XFpop0_Golgi_pop0_cell0_syn0_2" size="1"/>
        <population id="InputPop_XFpop0_Golgi_pop0_cell0_syn0_3" component="XFpop0_Golgi_pop0_cell0_syn0_3" size="1"/>
        <population id="InputPop_XFpop0_Golgi_pop0_cell0_syn0_4" component="XFpop0_Golgi_pop0_cell0_syn0_4" size="1"/>
        <population id="InputPop_XFpop0_Golgi_pop0_cell0_syn0_5" component="XFpop0_Golgi_pop0_cell0_syn0_5" size="1"/>
        <population id="InputPop_XFpop0_Golgi_pop0_cell0_syn0_6" component="XFpop0_Golgi_pop0_cell0_syn0_6" size="1"/>
        <population id="InputPop_XFpop0_Golgi_pop0_cell0_syn0_7" component="XFpop0_Golgi_pop0_cell0_syn0_7" size="1"/>
        <population id="InputPop_XFpop0_Golgi_pop0_cell3_syn0_0" component="XFpop0_Golgi_pop0_cell3_syn0_0" size="1"/>
        <population id="InputPop_XFpop0_Golgi_pop0_cell3_syn0_1" component="XFpop0_Golgi_pop0_cell3_syn0_1" size="1"/>
        <population id="InputPop_XFpop0_Golgi_pop0_cell3_syn0_2" component="XFpop0_Golgi_pop0_cell3_syn0_2" size="1"/>
        <population id="InputPop_XFpop0_Golgi_pop0_cell3_syn0_3" component="XFpop0_Golgi_pop0_cell3_syn0_3" size="1"/>
        <population id="InputPop_XFpop0_Golgi_pop0_cell3_syn0_4" component="XFpop0_Golgi_pop0_cell3_syn0_4" size="1"/>
        <population id="InputPop_XFpop0_Golgi_pop0_cell3_syn0_5" component="XFpop0_Golgi_pop0_cell3_syn0_5" size="1"/>
        <population id="InputPop_XFpop0_Golgi_pop0_cell3_syn0_6" component="XFpop0_Golgi_pop0_cell3_syn0_6" size="1"/>
        <population id="InputPop_XFpop0_Golgi_pop0_cell3_syn0_7" component="XFpop0_Golgi_pop0_cell3_syn0_7" size="1"/>
        <population id="InputPop_XFpop0_Golgi_pop0_cell2_syn0_0" component="XFpop0_Golgi_pop0_cell2_syn0_0" size="1"/>
        <population id="InputPop_XFpop0_Golgi_pop0_cell2_syn0_1" component="XFpop0_Golgi_pop0_cell2_syn0_1" size="1"/>
        <population id="InputPop_XFpop0_Golgi_pop0_cell2_syn0_2" component="XFpop0_Golgi_pop0_cell2_syn0_2" size="1"/>
        <population id="InputPop_XFpop0_Golgi_pop0_cell2_syn0_3" component="XFpop0_Golgi_pop0_cell2_syn0_3" size="1"/>
        <population id="InputPop_XFpop0_Golgi_pop0_cell2_syn0_4" component="XFpop0_Golgi_pop0_cell2_syn0_4" size="1"/>
        <population id="InputPop_XFpop0_Golgi_pop0_cell2_syn0_5" component="XFpop0_Golgi_pop0_cell2_syn0_5" size="1"/>
        <population id="InputPop_XFpop0_Golgi_pop0_cell2_syn0_6" component="XFpop0_Golgi_pop0_cell2_syn0_6" size="1"/>
        <population id="InputPop_XFpop0_Golgi_pop0_cell2_syn0_7" component="XFpop0_Golgi_pop0_cell2_syn0_7" size="1"/>
        <population id="InputPop_XFpop1_Golgi_pop1_cell0_syn0_0" component="XFpop1_Golgi_pop1_cell0_syn0_0" size="1"/>
        <population id="InputPop_XFpop1_Golgi_pop1_cell0_syn0_1" component="XFpop1_Golgi_pop1_cell0_syn0_1" size="1"/>
        <population id="InputPop_XFpop1_Golgi_pop1_cell0_syn0_2" component="XFpop1_Golgi_pop1_cell0_syn0_2" size="1"/>
        <population id="InputPop_XFpop1_Golgi_pop1_cell0_syn0_3" component="XFpop1_Golgi_pop1_cell0_syn0_3" size="1"/>
        <population id="InputPop_XFpop1_Golgi_pop1_cell0_syn0_4" component="XFpop1_Golgi_pop1_cell0_syn0_4" size="1"/>
        <population id="InputPop_XFpop1_Golgi_pop1_cell0_syn0_5" component="XFpop1_Golgi_pop1_cell0_syn0_5" size="1"/>
        <population id="InputPop_XFpop1_Golgi_pop1_cell0_syn0_6" component="XFpop1_Golgi_pop1_cell0_syn0_6" size="1"/>
        <population id="InputPop_XFpop1_Golgi_pop1_cell0_syn0_7" component="XFpop1_Golgi_pop1_cell0_syn0_7" size="1"/>
        <population id="InputPop_XFpop1_Golgi_pop1_cell3_syn0_0" component="XFpop1_Golgi_pop1_cell3_syn0_0" size="1"/>
        <population id="InputPop_XFpop1_Golgi_pop1_cell3_syn0_1" component="XFpop1_Golgi_pop1_cell3_syn0_1" size="1"/>
        <population id="InputPop_XFpop1_Golgi_pop1_cell3_syn0_2" component="XFpop1_Golgi_pop1_cell3_syn0_2" size="1"/>
        <population id="InputPop_XFpop1_Golgi_pop1_cell3_syn0_3" component="XFpop1_Golgi_pop1_cell3_syn0_3" size="1"/>
        <population id="InputPop_XFpop1_Golgi_pop1_cell3_syn0_4" component="XFpop1_Golgi_pop1_cell3_syn0_4" size="1"/>
        <population id="InputPop_XFpop1_Golgi_pop1_cell3_syn0_5" component="XFpop1_Golgi_pop1_cell3_syn0_5" size="1"/>
        <population id="InputPop_XFpop1_Golgi_pop1_cell3_syn0_6" component="XFpop1_Golgi_pop1_cell3_syn0_6" size="1"/>
        <population id="InputPop_XFpop1_Golgi_pop1_cell3_syn0_7" component="XFpop1_Golgi_pop1_cell3_syn0_7" size="1"/>
        <population id="InputPop_XFpop1_Golgi_pop1_cell2_syn0_0" component="XFpop1_Golgi_pop1_cell2_syn0_0" size="1"/>
        <population id="InputPop_XFpop1_Golgi_pop1_cell2_syn0_1" component="XFpop1_Golgi_pop1_cell2_syn0_1" size="1"/>
        <population id="InputPop_XFpop1_Golgi_pop1_cell2_syn0_2" component="XFpop1_Golgi_pop1_cell2_syn0_2" size="1"/>
        <population id="InputPop_XFpop1_Golgi_pop1_cell2_syn0_3" component="XFpop1_Golgi_pop1_cell2_syn0_3" size="1"/>
        <population id="InputPop_XFpop1_Golgi_pop1_cell2_syn0_4" component="XFpop1_Golgi_pop1_cell2_syn0_4" size="1"/>
        <population id="InputPop_XFpop1_Golgi_pop1_cell2_syn0_5" component="XFpop1_Golgi_pop1_cell2_syn0_5" size="1"/>
        <population id="InputPop_XFpop1_Golgi_pop1_cell2_syn0_6" component="XFpop1_Golgi_pop1_cell2_syn0_6" size="1"/>
        <population id="InputPop_XFpop1_Golgi_pop1_cell2_syn0_7" component="XFpop1_Golgi_pop1_cell2_syn0_7" size="1"/>
        <projection id="InputProj_XFpop0_Golgi_pop0_cell0_syn0_0" postsynapticPopulation="Golgi_pop0" presynapticPopulation="InputPop_XFpop0_Golgi_pop0_cell0_syn0_0" synapse="PFSpikeSyn">
            <connection id="0" preCellId="../InputPop_XFpop0_Golgi_pop0_cell0_syn0_0[0]" postFractionAlong="0.137273" postSegmentId="1" postCellId="../Golgi_pop0/0/Golgi_5comp_3channels_1CaPool"/>
        </projection>
        <projection id="InputProj_XFpop0_Golgi_pop0_cell0_syn0_1" postsynapticPopulation="Golgi_pop0" presynapticPopulation="InputPop_XFpop0_Golgi_pop0_cell0_syn0_1" synapse="PFSpikeSyn">
            <connection id="0" preCellId="../InputPop_XFpop0_Golgi_pop0_cell0_syn0_1[0]" postFractionAlong="0.228576" postSegmentId="1" postCellId="../Golgi_pop0/0/Golgi_5comp_3channels_1CaPool"/>
        </projection>
        <projection id="InputProj_XFpop0_Golgi_pop0_cell0_syn0_2" postsynapticPopulation="Golgi_pop0" presynapticPopulation="InputPop_XFpop0_Golgi_pop0_cell0_syn0_2" synapse="PFSpikeSyn">
            <connection id="0" preCellId="../InputPop_XFpop0_Golgi_pop0_cell0_syn0_2[0]" postFractionAlong="0.763162" postSegmentId="2" postCellId="../Golgi_pop0/0/Golgi_5comp_3channels_1CaPool"/>
        </projection>
        <projection id="InputProj_XFpop0_Golgi_pop0_cell0_syn0_3" postsynapticPopulation="Golgi_pop0" presynapticPopulation="InputPop_XFpop0_Golgi_pop0_cell0_syn0_3" synapse="PFSpikeSyn">
            <connection id="0" preCellId="../InputPop_XFpop0_Golgi_pop0_cell0_syn0_3[0]" postFractionAlong="0.282192" postSegmentId="1" postCellId="../Golgi_pop0/0/Golgi_5comp_3channels_1CaPool"/>
        </projection>
        <projection id="InputProj_XFpop0_Golgi_pop0_cell0_syn0_4" postsynapticPopulation="Golgi_pop0" presynapticPopulation="InputPop_XFpop0_Golgi_pop0_cell0_syn0_4" synapse="PFSpikeSyn">
            <connection id="0" preCellId="../InputPop_XFpop0_Golgi_pop0_cell0_syn0_4[0]" postFractionAlong="0.846659" postSegmentId="1" postCellId="../Golgi_pop0/0/Golgi_5comp_3channels_1CaPool"/>
        </projection>
        <projection id="InputProj_XFpop0_Golgi_pop0_cell0_syn0_5" postsynapticPopulation="Golgi_pop0" presynapticPopulation="InputPop_XFpop0_Golgi_pop0_cell0_syn0_5" synapse="PFSpikeSyn">
            <connection id="0" preCellId="../InputPop_XFpop0_Golgi_pop0_cell0_syn0_5[0]" postFractionAlong="0.648063" postSegmentId="1" postCellId="../Golgi_pop0/0/Golgi_5comp_3channels_1CaPool"/>
        </projection>
        <projection id="InputProj_XFpop0_Golgi_pop0_cell0_syn0_6" postsynapticPopulation="Golgi_pop0" presynapticPopulation="InputPop_XFpop0_Golgi_pop0_cell0_syn0_6" synapse="PFSpikeSyn">
            <connection id="0" preCellId="../InputPop_XFpop0_Golgi_pop0_cell0_syn0_6[0]" postFractionAlong="0.906556" postSegmentId="2" postCellId="../Golgi_pop0/0/Golgi_5comp_3channels_1CaPool"/>
        </projection>
        <projection id="InputProj_XFpop0_Golgi_pop0_cell0_syn0_7" postsynapticPopulation="Golgi_pop0" presynapticPopulation="InputPop_XFpop0_Golgi_pop0_cell0_syn0_7" synapse="PFSpikeSyn">
            <connection id="0" preCellId="../InputPop_XFpop0_Golgi_pop0_cell0_syn0_7[0]" postFractionAlong="0.423156" postSegmentId="1" postCellId="../Golgi_pop0/0/Golgi_5comp_3channels_1CaPool"/>
        </projection>
        <projection id="InputProj_XFpop0_Golgi_pop0_cell3_syn0_0" postsynapticPopulation="Golgi_pop0" presynapticPopulation="InputPop_XFpop0_Golgi_pop0_cell3_syn0_0" synapse="PFSpikeSyn">
            <connection id="0" preCellId="../InputPop_XFpop0_Golgi_pop0_cell3_syn0_0[0]" postFractionAlong="0.036386" postSegmentId="1" postCellId="../Golgi_pop0/3/Golgi_5comp_3channels_1CaPool"/>
        </projection>
        <projection id="InputProj_XFpop0_Golgi_pop0_cell3_syn0_1" postsynapticPopulation="Golgi_pop0" presynapticPopulation="InputPop_XFpop0_Golgi_pop0_cell3_syn0_1" synapse="PFSpikeSyn">
            <connection id="0" preCellId="../InputPop_XFpop0_Golgi_pop0_cell3_syn0_1[0]" postFractionAlong="0.309455" postSegmentId="1" postCellId="../Golgi_pop0/3/Golgi_5comp_3channels_1CaPool"/>
        </projection>
        <projection id="InputProj_XFpop0_Golgi_pop0_cell3_syn0_2" postsynapticPopulation="Golgi_pop0" presynapticPopulation="InputPop_XFpop0_Golgi_pop0_cell3_syn0_2" synapse="PFSpikeSyn">
            <connection id="0" preCellId="../InputPop_XFpop0_Golgi_pop0_cell3_syn0_2[0]" postFractionAlong="0.851032" postSegmentId="2" postCellId="../Golgi_pop0/3/Golgi_5comp_3channels_1CaPool"/>
        </projection>
        <projection id="InputProj_XFpop0_Golgi_pop0_cell3_syn0_3" postsynapticPopulation="Golgi_pop0" presynapticPopulation="InputPop_XFpop0_Golgi_pop0_cell3_syn0_3" synapse="PFSpikeSyn">
            <connection id="0" preCellId="../InputPop_XFpop0_Golgi_pop0_cell3_syn0_3[0]" postFractionAlong="0.501185" postSegmentId="2" postCellId="../Golgi_pop0/3/Golgi_5comp_3channels_1CaPool"/>
        </projection>
        <projection id="InputProj_XFpop0_Golgi_pop0_cell3_syn0_4" postsynapticPopulation="Golgi_pop0" presynapticPopulation="InputPop_XFpop0_Golgi_pop0_cell3_syn0_4" synapse="PFSpikeSyn">
            <connection id="0" preCellId="../InputPop_XFpop0_Golgi_pop0_cell3_syn0_4[0]" postFractionAlong="0.444723" postSegmentId="1" postCellId="../Golgi_pop0/3/Golgi_5comp_3channels_1CaPool"/>
        </projection>
        <projection id="InputProj_XFpop0_Golgi_pop0_cell3_syn0_5" postsynapticPopulation="Golgi_pop0" presynapticPopulation="InputPop_XFpop0_Golgi_pop0_cell3_syn0_5" synapse="PFSpikeSyn">
            <connection id="0" preCellId="../InputPop_XFpop0_Golgi_pop0_cell3_syn0_5[0]" postFractionAlong="0.799515" postSegmentId="1" postCellId="../Golgi_pop0/3/Golgi_5comp_3channels_1CaPool"/>
        </projection>
        <projection id="InputProj_XFpop0_Golgi_pop0_cell3_syn0_6" postsynapticPopulation="Golgi_pop0" presynapticPopulation="InputPop_XFpop0_Golgi_pop0_cell3_syn0_6" synapse="PFSpikeSyn">
            <connection id="0" preCellId="../InputPop_XFpop0_Golgi_pop0_cell3_syn0_6[0]" postFractionAlong="0.637965" postSegmentId="1" postCellId="../Golgi_pop0/3/Golgi_5comp_3channels_1CaPool"/>
        </projection>
        <projection id="InputProj_XFpop0_Golgi_pop0_cell3_syn0_7" postsynapticPopulation="Golgi_pop0" presynapticPopulation="InputPop_XFpop0_Golgi_pop0_cell3_syn0_7" synapse="PFSpikeSyn">
            <connection id="0" preCellId="../InputPop_XFpop0_Golgi_pop0_cell3_syn0_7[0]" postFractionAlong="0.856806" postSegmentId="2" postCellId="../Golgi_pop0/3/Golgi_5comp_3channels_1CaPool"/>
        </projection>
        <projection id="InputProj_XFpop0_Golgi_pop0_cell2_syn0_0" postsynapticPopulation="Golgi_pop0" presynapticPopulation="InputPop_XFpop0_Golgi_pop0_cell2_syn0_0" synapse="PFSpikeSyn">
            <connection id="0" preCellId="../InputPop_XFpop0_Golgi_pop0_cell2_syn0_0[0]" postFractionAlong="0.186952" postSegmentId="2" postCellId="../Golgi_pop0/2/Golgi_5comp_3channels_1CaPool"/>
        </projection>
        <projection id="InputProj_XFpop0_Golgi_pop0_cell2_syn0_1" postsynapticPopulation="Golgi_pop0" presynapticPopulation="InputPop_XFpop0_Golgi_pop0_cell2_syn0_1" synapse="PFSpikeSyn">
            <connection id="0" preCellId="../InputPop_XFpop0_Golgi_pop0_cell2_syn0_1[0]" postFractionAlong="0.757098" postSegmentId="1" postCellId="../Golgi_pop0/2/Golgi_5comp_3channels_1CaPool"/>
        </projection>
        <projection id="InputProj_XFpop0_Golgi_pop0_cell2_syn0_2" postsynapticPopulation="Golgi_pop0" presynapticPopulation="InputPop_XFpop0_Golgi_pop0_cell2_syn0_2" synapse="PFSpikeSyn">
            <connection id="0" preCellId="../InputPop_XFpop0_Golgi_pop0_cell2_syn0_2[0]" postFractionAlong="0.379534" postSegmentId="1" postCellId="../Golgi_pop0/2/Golgi_5comp_3channels_1CaPool"/>
        </projection>
        <projection id="InputProj_XFpop0_Golgi_pop0_cell2_syn0_3" postsynapticPopulation="Golgi_pop0" presynapticPopulation="InputPop_XFpop0_Golgi_pop0_cell2_syn0_3" synapse="PFSpikeSyn">
            <connection id="0" preCellId="../InputPop_XFpop0_Golgi_pop0_cell2_syn0_3[0]" postFractionAlong="0.289723" postSegmentId="2" postCellId="../Golgi_pop0/2/Golgi_5comp_3channels_1CaPool"/>
        </projection>
        <projection id="InputProj_XFpop0_Golgi_pop0_cell2_syn0_4" postsynapticPopulation="Golgi_pop0" presynapticPopulation="InputPop_XFpop0_Golgi_pop0_cell2_syn0_4" synapse="PFSpikeSyn">
            <connection id="0" preCellId="../InputPop_XFpop0_Golgi_pop0_cell2_syn0_4[0]" postFractionAlong="0.616113" postSegmentId="1" postCellId="../Golgi_pop0/2/Golgi_5comp_3channels_1CaPool"/>
        </projection>
        <projection id="InputProj_XFpop0_Golgi_pop0_cell2_syn0_5" postsynapticPopulation="Golgi_pop0" presynapticPopulation="InputPop_XFpop0_Golgi_pop0_cell2_syn0_5" synapse="PFSpikeSyn">
            <connection id="0" preCellId="../InputPop_XFpop0_Golgi_pop0_cell2_syn0_5[0]" postFractionAlong="0.872447" postSegmentId="1" postCellId="../Golgi_pop0/2/Golgi_5comp_3channels_1CaPool"/>
        </projection>
        <projection id="InputProj_XFpop0_Golgi_pop0_cell2_syn0_6" postsynapticPopulation="Golgi_pop0" presynapticPopulation="InputPop_XFpop0_Golgi_pop0_cell2_syn0_6" synapse="PFSpikeSyn">
            <connection id="0" preCellId="../InputPop_XFpop0_Golgi_pop0_cell2_syn0_6[0]" postFractionAlong="0.124231" postSegmentId="2" postCellId="../Golgi_pop0/2/Golgi_5comp_3channels_1CaPool"/>
        </projection>
        <projection id="InputProj_XFpop0_Golgi_pop0_cell2_syn0_7" postsynapticPopulation="Golgi_pop0" presynapticPopulation="InputPop_XFpop0_Golgi_pop0_cell2_syn0_7" synapse="PFSpikeSyn">
            <connection id="0" preCellId="../InputPop_XFpop0_Golgi_pop0_cell2_syn0_7[0]" postFractionAlong="0.116820" postSegmentId="1" postCellId="../Golgi_pop0/2/Golgi_5comp_3channels_1CaPool"/>
        </projection>
        <projection id="InputProj_XFpop1_Golgi_pop1_cell0_syn0_0" postsynapticPopulation="Golgi_pop1" presynapticPopulation="InputPop_XFpop1_Golgi_pop1_cell0_syn0_0" synapse="PFSpikeSyn">
            <connection id="0" preCellId="../InputPop_XFpop1_Golgi_pop1_cell0_syn0_0[0]" postFractionAlong="0.121210" postSegmentId="0" postCellId="../Golgi_pop1/0/Golgi_5comp_3channels_1CaPool"/>
        </projection>
        <projection id="InputProj_XFpop1_Golgi_pop1_cell0_syn0_1" postsynapticPopulation="Golgi_pop1" presynapticPopulation="InputPop_XFpop1_Golgi_pop1_cell0_syn0_1" synapse="PFSpikeSyn">
            <connection id="0" preCellId="../InputPop_XFpop1_Golgi_pop1_cell0_syn0_1[0]" postFractionAlong="0.381581" postSegmentId="5" postCellId="../Golgi_pop1/0/Golgi_5comp_3channels_1CaPool"/>
        </projection>
        <projection id="InputProj_XFpop1_Golgi_pop1_cell0_syn0_2" postsynapticPopulation="Golgi_pop1" presynapticPopulation="InputPop_XFpop1_Golgi_pop1_cell0_syn0_2" synapse="PFSpikeSyn">
            <connection id="0" preCellId="../InputPop_XFpop1_Golgi_pop1_cell0_syn0_2[0]" postFractionAlong="0.244620" postSegmentId="0" postCellId="../Golgi_pop1/0/Golgi_5comp_3channels_1CaPool"/>
        </projection>
        <projection id="InputProj_XFpop1_Golgi_pop1_cell0_syn0_3" postsynapticPopulation="Golgi_pop1" presynapticPopulation="InputPop_XFpop1_Golgi_pop1_cell0_syn0_3" synapse="PFSpikeSyn">
            <connection id="0" preCellId="../InputPop_XFpop1_Golgi_pop1_cell0_syn0_3[0]" postFractionAlong="0.453278" postSegmentId="0" postCellId="../Golgi_pop1/0/Golgi_5comp_3channels_1CaPool"/>
        </projection>
        <projection id="InputProj_XFpop1_Golgi_pop1_cell0_syn0_4" postsynapticPopulation="Golgi_pop1" presynapticPopulation="InputPop_XFpop1_Golgi_pop1_cell0_syn0_4" synapse="PFSpikeSyn">
            <connection id="0" preCellId="../InputPop_XFpop1_Golgi_pop1_cell0_syn0_4[0]" postFractionAlong="0.389514" postSegmentId="0" postCellId="../Golgi_pop1/0/Golgi_5comp_3channels_1CaPool"/>
        </projection>
        <projection id="InputProj_XFpop1_Golgi_pop1_cell0_syn0_5" postsynapticPopulation="Golgi_pop1" presynapticPopulation="InputPop_XFpop1_Golgi_pop1_cell0_syn0_5" synapse="PFSpikeSyn">
            <connection id="0" preCellId="../InputPop_XFpop1_Golgi_pop1_cell0_syn0_5[0]" postFractionAlong="0.167181" postSegmentId="0" postCellId="../Golgi_pop1/0/Golgi_5comp_3channels_1CaPool"/>
        </projection>
        <projection id="InputProj_XFpop1_Golgi_pop1_cell0_syn0_6" postsynapticPopulation="Golgi_pop1" presynapticPopulation="InputPop_XFpop1_Golgi_pop1_cell0_syn0_6" synapse="PFSpikeSyn">
            <connection id="0" preCellId="../InputPop_XFpop1_Golgi_pop1_cell0_syn0_6[0]" postFractionAlong="0.346952" postSegmentId="0" postCellId="../Golgi_pop1/0/Golgi_5comp_3channels_1CaPool"/>
        </projection>
        <projection id="InputProj_XFpop1_Golgi_pop1_cell0_syn0_7" postsynapticPopulation="Golgi_pop1" presynapticPopulation="InputPop_XFpop1_Golgi_pop1_cell0_syn0_7" synapse="PFSpikeSyn">
            <connection id="0" preCellId="../InputPop_XFpop1_Golgi_pop1_cell0_syn0_7[0]" postFractionAlong="0.916052" postSegmentId="5" postCellId="../Golgi_pop1/0/Golgi_5comp_3channels_1CaPool"/>
        </projection>
        <projection id="InputProj_XFpop1_Golgi_pop1_cell3_syn0_0" postsynapticPopulation="Golgi_pop1" presynapticPopulation="InputPop_XFpop1_Golgi_pop1_cell3_syn0_0" synapse="PFSpikeSyn">
            <connection id="0" preCellId="../InputPop_XFpop1_Golgi_pop1_cell3_syn0_0[0]" postFractionAlong="0.222362" postSegmentId="5" postCellId="../Golgi_pop1/3/Golgi_5comp_3channels_1CaPool"/>
        </projection>
        <projection id="InputProj_XFpop1_Golgi_pop1_cell3_syn0_1" postsynapticPopulation="Golgi_pop1" presynapticPopulation="InputPop_XFpop1_Golgi_pop1_cell3_syn0_1" synapse="PFSpikeSyn">
            <connection id="0" preCellId="../InputPop_XFpop1_Golgi_pop1_cell3_syn0_1[0]" postFractionAlong="0.318982" postSegmentId="0" postCellId="../Golgi_pop1/3/Golgi_5comp_3channels_1CaPool"/>
        </projection>
        <projection id="InputProj_XFpop1_Golgi_pop1_cell3_syn0_2" postsynapticPopulation="Golgi_pop1" presynapticPopulation="InputPop_XFpop1_Golgi_pop1_cell3_syn0_2" synapse="PFSpikeSyn">
            <connection id="0" preCellId="../InputPop_XFpop1_Golgi_pop1_cell3_syn0_2[0]" postFractionAlong="0.481382" postSegmentId="5" postCellId="../Golgi_pop1/3/Golgi_5comp_3channels_1CaPool"/>
        </projection>
        <projection id="InputProj_XFpop1_Golgi_pop1_cell3_syn0_3" postsynapticPopulation="Golgi_pop1" presynapticPopulation="InputPop_XFpop1_Golgi_pop1_cell3_syn0_3" synapse="PFSpikeSyn">
            <connection id="0" preCellId="../InputPop_XFpop1_Golgi_pop1_cell3_syn0_3[0]" postFractionAlong="0.348067" postSegmentId="0" postCellId="../Golgi_pop1/3/Golgi_5comp_3channels_1CaPool"/>
        </projection>
        <projection id="InputProj_XFpop1_Golgi_pop1_cell3_syn0_4" postsynapticPopulation="Golgi_pop1" presynapticPopulation="InputPop_XFpop1_Golgi_pop1_cell3_syn0_4" synapse="PFSpikeSyn">
            <connection id="0" preCellId="../InputPop_XFpop1_Golgi_pop1_cell3_syn0_4[0]" postFractionAlong="0.186391" postSegmentId="5" postCellId="../Golgi_pop1/3/Golgi_5comp_3channels_1CaPool"/>
        </projection>
        <projection id="InputProj_XFpop1_Golgi_pop1_cell3_syn0_5" postsynapticPopulation="Golgi_pop1" presynapticPopulation="InputPop_XFpop1_Golgi_pop1_cell3_syn0_5" synapse="PFSpikeSyn">
            <connection id="0" preCellId="../InputPop_XFpop1_Golgi_pop1_cell3_syn0_5[0]" postFractionAlong="0.062115" postSegmentId="0" postCellId="../Golgi_pop1/3/Golgi_5comp_3channels_1CaPool"/>
        </projection>
        <projection id="InputProj_XFpop1_Golgi_pop1_cell3_syn0_6" postsynapticPopulation="Golgi_pop1" presynapticPopulation="InputPop_XFpop1_Golgi_pop1_cell3_syn0_6" synapse="PFSpikeSyn">
            <connection id="0" preCellId="../InputPop_XFpop1_Golgi_pop1_cell3_syn0_6[0]" postFractionAlong="0.325834" postSegmentId="0" postCellId="../Golgi_pop1/3/Golgi_5comp_3channels_1CaPool"/>
        </projection>
        <projection id="InputProj_XFpop1_Golgi_pop1_cell3_syn0_7" postsynapticPopulation="Golgi_pop1" presynapticPopulation="InputPop_XFpop1_Golgi_pop1_cell3_syn0_7" synapse="PFSpikeSyn">
            <connection id="0" preCellId="../InputPop_XFpop1_Golgi_pop1_cell3_syn0_7[0]" postFractionAlong="0.040138" postSegmentId="5" postCellId="../Golgi_pop1/3/Golgi_5comp_3channels_1CaPool"/>
        </projection>
        <projection id="InputProj_XFpop1_Golgi_pop1_cell2_syn0_0" postsynapticPopulation="Golgi_pop1" presynapticPopulation="InputPop_XFpop1_Golgi_pop1_cell2_syn0_0" synapse="PFSpikeSyn">
            <connection id="0" preCellId="../InputPop_XFpop1_Golgi_pop1_cell2_syn0_0[0]" postFractionAlong="0.041020" postSegmentId="0" postCellId="../Golgi_pop1/2/Golgi_5comp_3channels_1CaPool"/>
        </projection>
        <projection id="InputProj_XFpop1_Golgi_pop1_cell2_syn0_1" postsynapticPopulation="Golgi_pop1" presynapticPopulation="InputPop_XFpop1_Golgi_pop1_cell2_syn0_1" synapse="PFSpikeSyn">
            <connection id="0" preCellId="../InputPop_XFpop1_Golgi_pop1_cell2_syn0_1[0]" postFractionAlong="0.208088" postSegmentId="5" postCellId="../Golgi_pop1/2/Golgi_5comp_3channels_1CaPool"/>
        </projection>
        <projection id="InputProj_XFpop1_Golgi_pop1_cell2_syn0_2" postsynapticPopulation="Golgi_pop1" presynapticPopulation="InputPop_XFpop1_Golgi_pop1_cell2_syn0_2" synapse="PFSpikeSyn">
            <connection id="0" preCellId="../InputPop_XFpop1_Golgi_pop1_cell2_syn0_2[0]" postFractionAlong="0.262592" postSegmentId="0" postCellId="../Golgi_pop1/2/Golgi_5comp_3channels_1CaPool"/>
        </projection>
        <projection id="InputProj_XFpop1_Golgi_pop1_cell2_syn0_3" postsynapticPopulation="Golgi_pop1" presynapticPopulation="InputPop_XFpop1_Golgi_pop1_cell2_syn0_3" synapse="PFSpikeSyn">
            <connection id="0" preCellId="../InputPop_XFpop1_Golgi_pop1_cell2_syn0_3[0]" postFractionAlong="0.077705" postSegmentId="0" postCellId="../Golgi_pop1/2/Golgi_5comp_3channels_1CaPool"/>
        </projection>
        <projection id="InputProj_XFpop1_Golgi_pop1_cell2_syn0_4" postsynapticPopulation="Golgi_pop1" presynapticPopulation="InputPop_XFpop1_Golgi_pop1_cell2_syn0_4" synapse="PFSpikeSyn">
            <connection id="0" preCellId="../InputPop_XFpop1_Golgi_pop1_cell2_syn0_4[0]" postFractionAlong="0.319494" postSegmentId="0" postCellId="../Golgi_pop1/2/Golgi_5comp_3channels_1CaPool"/>
        </projection>
        <projection id="InputProj_XFpop1_Golgi_pop1_cell2_syn0_5" postsynapticPopulation="Golgi_pop1" presynapticPopulation="InputPop_XFpop1_Golgi_pop1_cell2_syn0_5" synapse="PFSpikeSyn">
            <connection id="0" preCellId="../InputPop_XFpop1_Golgi_pop1_cell2_syn0_5[0]" postFractionAlong="0.082270" postSegmentId="0" postCellId="../Golgi_pop1/2/Golgi_5comp_3channels_1CaPool"/>
        </projection>
        <projection id="InputProj_XFpop1_Golgi_pop1_cell2_syn0_6" postsynapticPopulation="Golgi_pop1" presynapticPopulation="InputPop_XFpop1_Golgi_pop1_cell2_syn0_6" synapse="PFSpikeSyn">
            <connection id="0" preCellId="../InputPop_XFpop1_Golgi_pop1_cell2_syn0_6[0]" postFractionAlong="0.130019" postSegmentId="0" postCellId="../Golgi_pop1/2/Golgi_5comp_3channels_1CaPool"/>
        </projection>
        <projection id="InputProj_XFpop1_Golgi_pop1_cell2_syn0_7" postsynapticPopulation="Golgi_pop1" presynapticPopulation="InputPop_XFpop1_Golgi_pop1_cell2_syn0_7" synapse="PFSpikeSyn">
            <connection id="0" preCellId="../InputPop_XFpop1_Golgi_pop1_cell2_syn0_7[0]" postFractionAlong="0.036951" postSegmentId="0" postCellId="../Golgi_pop1/2/Golgi_5comp_3channels_1CaPool"/>
        </projection>
        <electricalProjection id="proj0" postsynapticPopulation="Golgi_pop1" presynapticPopulation="Golgi_pop0">
            <electricalConnectionInstance id="0" synapse="gap_junction00" preFractionAlong="0.137273" preSegment="1" postFractionAlong="0.036386" postSegment="1" postCell="../Golgi_pop1/0/Golgi_5comp_3channels_1CaPool" preCell="../Golgi_pop0/0/Golgi_5comp_3channels_1CaPool"/>
            <electricalConnectionInstance id="1" synapse="gap_junction01" preFractionAlong="0.228576" preSegment="1" postFractionAlong="0.309455" postSegment="1" postCell="../Golgi_pop1/0/Golgi_5comp_3channels_1CaPool" preCell="../Golgi_pop0/0/Golgi_5comp_3channels_1CaPool"/>
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        </electricalProjection>
        <inputList id="vrpop0_Golgi_pop0_0" component="Pulse_vrpop0_Golgi_pop0_0" population="Golgi_pop0">
            <input destination="synapses" id="0" target="../Golgi_pop0/0/Golgi_5comp_3channels_1CaPool"/>
        </inputList>
        <inputList id="vrpop0_Golgi_pop0_1" component="Pulse_vrpop0_Golgi_pop0_1" population="Golgi_pop0">
            <input destination="synapses" id="1" target="../Golgi_pop0/1/Golgi_5comp_3channels_1CaPool"/>
        </inputList>
        <inputList id="vrpop0_Golgi_pop0_2" component="Pulse_vrpop0_Golgi_pop0_2" population="Golgi_pop0">
            <input destination="synapses" id="2" target="../Golgi_pop0/2/Golgi_5comp_3channels_1CaPool"/>
        </inputList>
        <inputList id="vrpop0_Golgi_pop0_3" component="Pulse_vrpop0_Golgi_pop0_3" population="Golgi_pop0">
            <input destination="synapses" id="3" target="../Golgi_pop0/3/Golgi_5comp_3channels_1CaPool"/>
        </inputList>
        <inputList id="vrpop0_Golgi_pop0_4" component="Pulse_vrpop0_Golgi_pop0_4" population="Golgi_pop0">
            <input destination="synapses" id="4" target="../Golgi_pop0/4/Golgi_5comp_3channels_1CaPool"/>
        </inputList>
        <inputList id="vrpop1_Golgi_pop1_0" component="Pulse_vrpop1_Golgi_pop1_0" population="Golgi_pop1">
            <input destination="synapses" id="0" target="../Golgi_pop1/0/Golgi_5comp_3channels_1CaPool"/>
        </inputList>
        <inputList id="vrpop1_Golgi_pop1_1" component="Pulse_vrpop1_Golgi_pop1_1" population="Golgi_pop1">
            <input destination="synapses" id="1" target="../Golgi_pop1/1/Golgi_5comp_3channels_1CaPool"/>
        </inputList>
        <inputList id="vrpop1_Golgi_pop1_2" component="Pulse_vrpop1_Golgi_pop1_2" population="Golgi_pop1">
            <input destination="synapses" id="2" target="../Golgi_pop1/2/Golgi_5comp_3channels_1CaPool"/>
        </inputList>
        <inputList id="vrpop1_Golgi_pop1_3" component="Pulse_vrpop1_Golgi_pop1_3" population="Golgi_pop1">
            <input destination="synapses" id="3" target="../Golgi_pop1/3/Golgi_5comp_3channels_1CaPool"/>
        </inputList>
        <inputList id="vrpop1_Golgi_pop1_4" component="Pulse_vrpop1_Golgi_pop1_4" population="Golgi_pop1">
            <input destination="synapses" id="4" target="../Golgi_pop1/4/Golgi_5comp_3channels_1CaPool"/>
        </inputList>
    </network>
</neuroml>
