<neuroml xmlns="http://www.neuroml.org/schema/neuroml2"  xmlns:xs="http://www.w3.org/2001/XMLSchema" xmlns:xsi="http://www.w3.org/2001/XMLSchema-instance" xsi:schemaLocation="http://www.neuroml.org/schema/neuroml2 https://raw.github.com/NeuroML/NeuroML2/development/Schemas/NeuroML2/NeuroML_v2beta4.xsd" id="InputNet_V2012_test1_import_trial0">
    <expOneSynapse id="syn0" erev="0mV" gbase="5nS" tauDecay="2.5ms"/>
    <iafCell id="iaf0" reset="-70mV" C="1e-5uF" thresh="-40mV" leakConductance="5.2e-7mS" leakReversal="-60mV"/>
    <poissonFiringSynapse id="XFpop0_PFSpikeSyn_Golgi_pop0_syn0" synapse="syn0" averageRate="100.000000 per_s" spikeTarget="./syn0"/>
    <poissonFiringSynapse id="XFpop1_PFSpikeSyn_Golgi_pop1_syn0" synapse="syn0" averageRate="100.000000 per_s" spikeTarget="./syn0"/>
    <network id="InputNet_V2012_test1_import_trial0_network">
        <notes>A simple network that generates Poisson input trains for Golgi_V2012_test1_import_trial0</notes>
        <population id="XFpop0_Golgi_pop0_syn0" component="iaf0" size="120"/>
        <population id="XFpop1_Golgi_pop1_syn0" component="iaf0" size="120"/>
        <inputList id="List_XFpop0_PFSpikeSyn_Golgi_pop0_syn0" component="XFpop0_PFSpikeSyn_Golgi_pop0_syn0" population="XFpop0_Golgi_pop0_syn0">
            <input destination="synapses" id="0" target="../XFpop0_Golgi_pop0_syn0[0]"/>
            <input destination="synapses" id="1" target="../XFpop0_Golgi_pop0_syn0[1]"/>
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        </inputList>
        <inputList id="List_XFpop1_PFSpikeSyn_Golgi_pop1_syn0" component="XFpop1_PFSpikeSyn_Golgi_pop1_syn0" population="XFpop1_Golgi_pop1_syn0">
            <input destination="synapses" id="0" target="../XFpop1_Golgi_pop1_syn0[0]"/>
            <input destination="synapses" id="1" target="../XFpop1_Golgi_pop1_syn0[1]"/>
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        </inputList>
    </network>
</neuroml>
