<neuroml xmlns="http://www.neuroml.org/schema/neuroml2"  xmlns:xs="http://www.w3.org/2001/XMLSchema" xmlns:xsi="http://www.w3.org/2001/XMLSchema-instance" xsi:schemaLocation="http://www.neuroml.org/schema/neuroml2 https://raw.github.com/NeuroML/NeuroML2/development/Schemas/NeuroML2/NeuroML_v2beta4.xsd" id="Golgi_V2012_test1_import_colocalize_trial0">
    <include href="/../../../Golgi_5comp_3channels_1CaPool.cell.nml"></include>
    <include href="/../../../MFSpikeSyn.synapse.nml"></include>
    <include href="/../../../MF_PF_SpikeSynNMDA.synapse.nml"></include>
    <gapJunction id="gap_junction00" conductance="411.852524pS"/>
    <gapJunction id="gap_junction01" conductance="434.716195pS"/>
    <gapJunction id="gap_junction02" conductance="417.482689pS"/>
    <gapJunction id="gap_junction03" conductance="419.971126pS"/>
    <gapJunction id="gap_junction04" conductance="427.478572pS"/>
    <gapJunction id="gap_junction05" conductance="422.075036pS"/>
    <gapJunction id="gap_junction06" conductance="415.472207pS"/>
    <gapJunction id="gap_junction07" conductance="441.665010pS"/>
    <pulseGenerator id="Pulse_vrpop0_Golgi_pop0_0" delay="50.000000ms" duration="400.000000ms" amplitude="22.533199pA"/>
    <pulseGenerator id="Pulse_vrpop0_Golgi_pop0_1" delay="50.000000ms" duration="400.000000ms" amplitude="72.015121pA"/>
    <spikeArray id="MF_AMPA_NMDA_Golgi_pop0_cell0_0">
        <spike id="0" time="0.092730s"/>
        <spike id="1" time="0.104050s"/>
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    </spikeArray>
    <spikeArray id="MF_AMPA_NMDA_Golgi_pop0_cell0_1">
        <spike id="0" time="0.117715s"/>
        <spike id="1" time="0.126430s"/>
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    </spikeArray>
    <spikeArray id="MF_AMPA_NMDA_Golgi_pop0_cell0_2">
        <spike id="0" time="0.088060s"/>
        <spike id="1" time="0.093865s"/>
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    </spikeArray>
    <spikeArray id="MF_AMPA_NMDA_Golgi_pop0_cell0_3">
        <spike id="0" time="0.085020s"/>
        <spike id="1" time="0.089380s"/>
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    </spikeArray>
    <spikeArray id="MF_AMPA_NMDA_Golgi_pop0_cell0_4">
        <spike id="0" time="0.081375s"/>
        <spike id="1" time="0.083045s"/>
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    </spikeArray>
    <spikeArray id="MF_AMPA_NMDA_Golgi_pop0_cell0_5">
        <spike id="0" time="0.105580s"/>
        <spike id="1" time="0.107565s"/>
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    </spikeArray>
    <spikeArray id="MF_AMPA_NMDA_Golgi_pop0_cell0_6">
        <spike id="0" time="0.082660s"/>
        <spike id="1" time="0.090005s"/>
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    </spikeArray>
    <spikeArray id="MF_AMPA_NMDA_Golgi_pop0_cell0_7">
        <spike id="0" time="0.081530s"/>
        <spike id="1" time="0.096410s"/>
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    </spikeArray>
    <network id="Golgi_V2012_test1_import_colocalize_trial0_network" type="networkWithTemperature" temperature="23 degC">
        <notes>Parameter arrays for building this network are listed below:
Cell distribution parameters:
{'yDim': 50, 'popID': 'Golgi_pop0', 'zDim': 50, 'xDim': 50, 'distributionModel': 'explicit_cell_numbers', 'minimal_distance': 25, 'distanceModel': 'random_minimal_distance'}
Cell population parameters:
Cell population parameters for Golgi_pop0:
{'popID': 'Golgi_pop0', 'cellType': 'Golgi_5comp_3channels_1CaPool', 'size': 2}
Cell connectivity parameters:
{'maximalConnDistance': 150, 'conductanceModel': 'variable', 'targetingModelpostPop': {'segmentGroupList': ['Section_1', 'dend_1'], 'model': 'segment groups and segments', 'segmentGroupProbabilities': {'Section_1': 0.7, 'dend_1': 0.3}}, 'distributionGJ': 'binomial', 'targetingModelprePop': {'segmentGroupList': ['Section_1', 'dend_1'], 'model': 'segment groups and segments', 'segmentGroupProbabilities': {'Section_1': 0.7, 'dend_1': 0.3}}, 'postPopID': 'Golgi_pop0', 'averageNoGJs': 8, 'gapJunctionModel': 'variable number of GJ contacts per pair', 'averageConductance': 426, 'testingConductanceScale': 1, 'electricalConnModel': 'Vervaeke_2012_based', 'stdDev': 20, 'maxNoGJs': 10, 'units': 'pS', 'distribution': 'gaussian', 'prePopID': 'Golgi_pop0', 'spatialScale': 1}
Input parameters for a list of populations:
Input group parameters for Golgi_pop0:
{'stDevAmp': 25, 'inputModel': 'variable_basal_firing_rate', 'ampUnits': 'pA', 'amplitudeDistribution': 'gaussian', 'averageAmp': 50, 'valueOffset': 50, 'inputLabel': 'vrpop0', 'offsetDistribution': 'constant', 'offsetUnits': 'ms'}
{'segmentProbabilities': {'Soma': 0.7, 'dend_1': 0.3}, 'targetingModel': 'segments and subsegments', 'units': 'ms', 'averageRate': 150, 'noInputs': 8, 'synapseList': [{'synapseType': 'MFSpikeSyn'}, {'synapseType': 'MF_PF_SpikeSynNMDA'}], 'inputLabel': 'MF_AMPA_NMDA', 'delay': 80, 'inputModel': 'XF', 'synapseMode': 'transient', 'fractionToTarget': 0.5, 'segmentList': ['Soma', 'dend_1'], 'duration': 100, 'numberModel': 'constant number of inputs per cell', 'targetingRegime': 'uniform', 'colocalizeSynapses': True, 'fractionAlongANDsubsegProbabilities': {'Soma': [{'fractionAlong': 0.25, 'Prob': 1}, {'fractionAlong': 0.25, 'Prob': 0}], 'dend_1': [{'fractionAlong': 0.5, 'Prob': 0.7}, {'fractionAlong': 0.5, 'Prob': 0.3}]}}
</notes>
        <population id="Golgi_pop0" type="populationList" component="Golgi_5comp_3channels_1CaPool" size="2">
            <instance id="0">
                <location y="31.444793221233613" x="19.623224273239749" z="42.871915768231666"/>
            </instance>
            <instance id="1">
                <location y="8.958581159520135" x="32.437762450817651" z="5.3724913755471"/>
            </instance>
        </population>
        <population id="InputPop_MF_AMPA_NMDA_Golgi_pop0_cell0_0" component="MF_AMPA_NMDA_Golgi_pop0_cell0_0" size="1"/>
        <population id="InputPop_MF_AMPA_NMDA_Golgi_pop0_cell0_1" component="MF_AMPA_NMDA_Golgi_pop0_cell0_1" size="1"/>
        <population id="InputPop_MF_AMPA_NMDA_Golgi_pop0_cell0_2" component="MF_AMPA_NMDA_Golgi_pop0_cell0_2" size="1"/>
        <population id="InputPop_MF_AMPA_NMDA_Golgi_pop0_cell0_3" component="MF_AMPA_NMDA_Golgi_pop0_cell0_3" size="1"/>
        <population id="InputPop_MF_AMPA_NMDA_Golgi_pop0_cell0_4" component="MF_AMPA_NMDA_Golgi_pop0_cell0_4" size="1"/>
        <population id="InputPop_MF_AMPA_NMDA_Golgi_pop0_cell0_5" component="MF_AMPA_NMDA_Golgi_pop0_cell0_5" size="1"/>
        <population id="InputPop_MF_AMPA_NMDA_Golgi_pop0_cell0_6" component="MF_AMPA_NMDA_Golgi_pop0_cell0_6" size="1"/>
        <population id="InputPop_MF_AMPA_NMDA_Golgi_pop0_cell0_7" component="MF_AMPA_NMDA_Golgi_pop0_cell0_7" size="1"/>
        <projection id="InputProj_MF_AMPA_NMDA_Golgi_pop0_cell0_syn0_0" postsynapticPopulation="Golgi_pop0" presynapticPopulation="InputPop_MF_AMPA_NMDA_Golgi_pop0_cell0_0" synapse="MFSpikeSyn">
            <connection id="0" preCellId="../InputPop_MF_AMPA_NMDA_Golgi_pop0_cell0_0[0]" postFractionAlong="0.026869" postSegmentId="2" postCellId="../Golgi_pop0/0/Golgi_5comp_3channels_1CaPool"/>
        </projection>
        <projection id="InputProj_MF_AMPA_NMDA_Golgi_pop0_cell0_syn1_0" postsynapticPopulation="Golgi_pop0" presynapticPopulation="InputPop_MF_AMPA_NMDA_Golgi_pop0_cell0_0" synapse="MF_PF_SpikeSynNMDA">
            <connection id="0" preCellId="../InputPop_MF_AMPA_NMDA_Golgi_pop0_cell0_0[0]" postFractionAlong="0.026869" postSegmentId="2" postCellId="../Golgi_pop0/0/Golgi_5comp_3channels_1CaPool"/>
        </projection>
        <projection id="InputProj_MF_AMPA_NMDA_Golgi_pop0_cell0_syn0_1" postsynapticPopulation="Golgi_pop0" presynapticPopulation="InputPop_MF_AMPA_NMDA_Golgi_pop0_cell0_1" synapse="MFSpikeSyn">
            <connection id="0" preCellId="../InputPop_MF_AMPA_NMDA_Golgi_pop0_cell0_1[0]" postFractionAlong="0.297385" postSegmentId="2" postCellId="../Golgi_pop0/0/Golgi_5comp_3channels_1CaPool"/>
        </projection>
        <projection id="InputProj_MF_AMPA_NMDA_Golgi_pop0_cell0_syn1_1" postsynapticPopulation="Golgi_pop0" presynapticPopulation="InputPop_MF_AMPA_NMDA_Golgi_pop0_cell0_1" synapse="MF_PF_SpikeSynNMDA">
            <connection id="0" preCellId="../InputPop_MF_AMPA_NMDA_Golgi_pop0_cell0_1[0]" postFractionAlong="0.297385" postSegmentId="2" postCellId="../Golgi_pop0/0/Golgi_5comp_3channels_1CaPool"/>
        </projection>
        <projection id="InputProj_MF_AMPA_NMDA_Golgi_pop0_cell0_syn0_2" postsynapticPopulation="Golgi_pop0" presynapticPopulation="InputPop_MF_AMPA_NMDA_Golgi_pop0_cell0_2" synapse="MFSpikeSyn">
            <connection id="0" preCellId="../InputPop_MF_AMPA_NMDA_Golgi_pop0_cell0_2[0]" postFractionAlong="0.241508" postSegmentId="0" postCellId="../Golgi_pop0/0/Golgi_5comp_3channels_1CaPool"/>
        </projection>
        <projection id="InputProj_MF_AMPA_NMDA_Golgi_pop0_cell0_syn1_2" postsynapticPopulation="Golgi_pop0" presynapticPopulation="InputPop_MF_AMPA_NMDA_Golgi_pop0_cell0_2" synapse="MF_PF_SpikeSynNMDA">
            <connection id="0" preCellId="../InputPop_MF_AMPA_NMDA_Golgi_pop0_cell0_2[0]" postFractionAlong="0.241508" postSegmentId="0" postCellId="../Golgi_pop0/0/Golgi_5comp_3channels_1CaPool"/>
        </projection>
        <projection id="InputProj_MF_AMPA_NMDA_Golgi_pop0_cell0_syn0_3" postsynapticPopulation="Golgi_pop0" presynapticPopulation="InputPop_MF_AMPA_NMDA_Golgi_pop0_cell0_3" synapse="MFSpikeSyn">
            <connection id="0" preCellId="../InputPop_MF_AMPA_NMDA_Golgi_pop0_cell0_3[0]" postFractionAlong="0.055046" postSegmentId="0" postCellId="../Golgi_pop0/0/Golgi_5comp_3channels_1CaPool"/>
        </projection>
        <projection id="InputProj_MF_AMPA_NMDA_Golgi_pop0_cell0_syn1_3" postsynapticPopulation="Golgi_pop0" presynapticPopulation="InputPop_MF_AMPA_NMDA_Golgi_pop0_cell0_3" synapse="MF_PF_SpikeSynNMDA">
            <connection id="0" preCellId="../InputPop_MF_AMPA_NMDA_Golgi_pop0_cell0_3[0]" postFractionAlong="0.055046" postSegmentId="0" postCellId="../Golgi_pop0/0/Golgi_5comp_3channels_1CaPool"/>
        </projection>
        <projection id="InputProj_MF_AMPA_NMDA_Golgi_pop0_cell0_syn0_4" postsynapticPopulation="Golgi_pop0" presynapticPopulation="InputPop_MF_AMPA_NMDA_Golgi_pop0_cell0_4" synapse="MFSpikeSyn">
            <connection id="0" preCellId="../InputPop_MF_AMPA_NMDA_Golgi_pop0_cell0_4[0]" postFractionAlong="0.072972" postSegmentId="0" postCellId="../Golgi_pop0/0/Golgi_5comp_3channels_1CaPool"/>
        </projection>
        <projection id="InputProj_MF_AMPA_NMDA_Golgi_pop0_cell0_syn1_4" postsynapticPopulation="Golgi_pop0" presynapticPopulation="InputPop_MF_AMPA_NMDA_Golgi_pop0_cell0_4" synapse="MF_PF_SpikeSynNMDA">
            <connection id="0" preCellId="../InputPop_MF_AMPA_NMDA_Golgi_pop0_cell0_4[0]" postFractionAlong="0.072972" postSegmentId="0" postCellId="../Golgi_pop0/0/Golgi_5comp_3channels_1CaPool"/>
        </projection>
        <projection id="InputProj_MF_AMPA_NMDA_Golgi_pop0_cell0_syn0_5" postsynapticPopulation="Golgi_pop0" presynapticPopulation="InputPop_MF_AMPA_NMDA_Golgi_pop0_cell0_5" synapse="MFSpikeSyn">
            <connection id="0" preCellId="../InputPop_MF_AMPA_NMDA_Golgi_pop0_cell0_5[0]" postFractionAlong="0.884171" postSegmentId="2" postCellId="../Golgi_pop0/0/Golgi_5comp_3channels_1CaPool"/>
        </projection>
        <projection id="InputProj_MF_AMPA_NMDA_Golgi_pop0_cell0_syn1_5" postsynapticPopulation="Golgi_pop0" presynapticPopulation="InputPop_MF_AMPA_NMDA_Golgi_pop0_cell0_5" synapse="MF_PF_SpikeSynNMDA">
            <connection id="0" preCellId="../InputPop_MF_AMPA_NMDA_Golgi_pop0_cell0_5[0]" postFractionAlong="0.884171" postSegmentId="2" postCellId="../Golgi_pop0/0/Golgi_5comp_3channels_1CaPool"/>
        </projection>
        <projection id="InputProj_MF_AMPA_NMDA_Golgi_pop0_cell0_syn0_6" postsynapticPopulation="Golgi_pop0" presynapticPopulation="InputPop_MF_AMPA_NMDA_Golgi_pop0_cell0_6" synapse="MFSpikeSyn">
            <connection id="0" preCellId="../InputPop_MF_AMPA_NMDA_Golgi_pop0_cell0_6[0]" postFractionAlong="0.063629" postSegmentId="2" postCellId="../Golgi_pop0/0/Golgi_5comp_3channels_1CaPool"/>
        </projection>
        <projection id="InputProj_MF_AMPA_NMDA_Golgi_pop0_cell0_syn1_6" postsynapticPopulation="Golgi_pop0" presynapticPopulation="InputPop_MF_AMPA_NMDA_Golgi_pop0_cell0_6" synapse="MF_PF_SpikeSynNMDA">
            <connection id="0" preCellId="../InputPop_MF_AMPA_NMDA_Golgi_pop0_cell0_6[0]" postFractionAlong="0.063629" postSegmentId="2" postCellId="../Golgi_pop0/0/Golgi_5comp_3channels_1CaPool"/>
        </projection>
        <projection id="InputProj_MF_AMPA_NMDA_Golgi_pop0_cell0_syn0_7" postsynapticPopulation="Golgi_pop0" presynapticPopulation="InputPop_MF_AMPA_NMDA_Golgi_pop0_cell0_7" synapse="MFSpikeSyn">
            <connection id="0" preCellId="../InputPop_MF_AMPA_NMDA_Golgi_pop0_cell0_7[0]" postFractionAlong="0.098898" postSegmentId="0" postCellId="../Golgi_pop0/0/Golgi_5comp_3channels_1CaPool"/>
        </projection>
        <projection id="InputProj_MF_AMPA_NMDA_Golgi_pop0_cell0_syn1_7" postsynapticPopulation="Golgi_pop0" presynapticPopulation="InputPop_MF_AMPA_NMDA_Golgi_pop0_cell0_7" synapse="MF_PF_SpikeSynNMDA">
            <connection id="0" preCellId="../InputPop_MF_AMPA_NMDA_Golgi_pop0_cell0_7[0]" postFractionAlong="0.098898" postSegmentId="0" postCellId="../Golgi_pop0/0/Golgi_5comp_3channels_1CaPool"/>
        </projection>
        <electricalProjection id="proj0" postsynapticPopulation="Golgi_pop0" presynapticPopulation="Golgi_pop0">
            <electricalConnectionInstance id="0" synapse="gap_junction00" preFractionAlong="0.205605" preSegment="2" postFractionAlong="0.191069" postSegment="1" postCell="../Golgi_pop0/1/Golgi_5comp_3channels_1CaPool" preCell="../Golgi_pop0/0/Golgi_5comp_3channels_1CaPool"/>
            <electricalConnectionInstance id="1" synapse="gap_junction01" preFractionAlong="0.701456" preSegment="2" postFractionAlong="0.352646" postSegment="2" postCell="../Golgi_pop0/1/Golgi_5comp_3channels_1CaPool" preCell="../Golgi_pop0/0/Golgi_5comp_3channels_1CaPool"/>
            <electricalConnectionInstance id="2" synapse="gap_junction02" preFractionAlong="0.261427" preSegment="2" postFractionAlong="0.488429" postSegment="2" postCell="../Golgi_pop0/1/Golgi_5comp_3channels_1CaPool" preCell="../Golgi_pop0/0/Golgi_5comp_3channels_1CaPool"/>
            <electricalConnectionInstance id="3" synapse="gap_junction03" preFractionAlong="0.594769" preSegment="2" postFractionAlong="0.670870" postSegment="1" postCell="../Golgi_pop0/1/Golgi_5comp_3channels_1CaPool" preCell="../Golgi_pop0/0/Golgi_5comp_3channels_1CaPool"/>
            <electricalConnectionInstance id="4" synapse="gap_junction04" preFractionAlong="0.865662" preSegment="1" postFractionAlong="0.395592" postSegment="2" postCell="../Golgi_pop0/1/Golgi_5comp_3channels_1CaPool" preCell="../Golgi_pop0/0/Golgi_5comp_3channels_1CaPool"/>
            <electricalConnectionInstance id="5" synapse="gap_junction05" preFractionAlong="0.966032" preSegment="1" postFractionAlong="0.949704" postSegment="1" postCell="../Golgi_pop0/1/Golgi_5comp_3channels_1CaPool" preCell="../Golgi_pop0/0/Golgi_5comp_3channels_1CaPool"/>
            <electricalConnectionInstance id="6" synapse="gap_junction06" preFractionAlong="0.842310" preSegment="1" postFractionAlong="0.210164" postSegment="2" postCell="../Golgi_pop0/1/Golgi_5comp_3channels_1CaPool" preCell="../Golgi_pop0/0/Golgi_5comp_3channels_1CaPool"/>
            <electricalConnectionInstance id="7" synapse="gap_junction07" preFractionAlong="0.220186" preSegment="1" postFractionAlong="0.928834" postSegment="2" postCell="../Golgi_pop0/1/Golgi_5comp_3channels_1CaPool" preCell="../Golgi_pop0/0/Golgi_5comp_3channels_1CaPool"/>
        </electricalProjection>
        <inputList id="vrpop0_Golgi_pop0_0" component="Pulse_vrpop0_Golgi_pop0_0" population="Golgi_pop0">
            <input destination="synapses" id="0" target="../Golgi_pop0/0/Golgi_5comp_3channels_1CaPool"/>
        </inputList>
        <inputList id="vrpop0_Golgi_pop0_1" component="Pulse_vrpop0_Golgi_pop0_1" population="Golgi_pop0">
            <input destination="synapses" id="1" target="../Golgi_pop0/1/Golgi_5comp_3channels_1CaPool"/>
        </inputList>
    </network>
</neuroml>
