<neuroml xmlns="http://www.neuroml.org/schema/neuroml2"  xmlns:xs="http://www.w3.org/2001/XMLSchema" xmlns:xsi="http://www.w3.org/2001/XMLSchema-instance" xsi:schemaLocation="http://www.neuroml.org/schema/neuroml2 https://raw.github.com/NeuroML/NeuroML2/development/Schemas/NeuroML2/NeuroML_v2beta4.xsd" id="InputNet_V2012_test1_import_colocalize_trial0">
    <expOneSynapse id="syn0" erev="0mV" gbase="5nS" tauDecay="2.5ms"/>
    <iafCell id="iaf0" reset="-70mV" C="1e-5uF" thresh="-40mV" leakConductance="5.2e-7mS" leakReversal="-60mV"/>
    <transientPoissonFiringSynapse id="MF_AMPA_NMDA_Golgi_pop0_syn0one" delay="80.000000ms" duration="100.000000ms" synapse="syn0" averageRate="150.000000 per_s" spikeTarget="./syn0"/>
    <network id="InputNet_V2012_test1_import_colocalize_trial0_network">
        <notes>A simple network that generates Poisson input trains for Golgi_V2012_test1_import_colocalize_trial0</notes>
        <population id="MF_AMPA_NMDA_Golgi_pop0_syn0" component="iaf0" size="120"/>
        <inputList id="ListMF_AMPA_NMDA_Golgi_pop0_syn0one" component="MF_AMPA_NMDA_Golgi_pop0_syn0one" population="MF_AMPA_NMDA_Golgi_pop0_syn0">
            <input destination="synapses" id="0" target="../MF_AMPA_NMDA_Golgi_pop0_syn0[0]"/>
            <input destination="synapses" id="1" target="../MF_AMPA_NMDA_Golgi_pop0_syn0[1]"/>
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        </inputList>
    </network>
</neuroml>
