<neuroml xmlns="http://www.neuroml.org/schema/neuroml2"  xmlns:xs="http://www.w3.org/2001/XMLSchema" xmlns:xsi="http://www.w3.org/2001/XMLSchema-instance" xsi:schemaLocation="http://www.neuroml.org/schema/neuroml2 https://raw.github.com/NeuroML/NeuroML2/development/Schemas/NeuroML2/NeuroML_v2beta4.xsd" id="Golgi_V2012_test1_import_colocalize_plus_regional_trial0">
    <include href="/../../../Golgi_5comp_3channels_1CaPool.cell.nml"></include>
    <include href="/../../../MFSpikeSyn.synapse.nml"></include>
    <include href="/../../../MF_PF_SpikeSynNMDA.synapse.nml"></include>
    <gapJunction id="gap_junction00" conductance="388.740905pS"/>
    <gapJunction id="gap_junction01" conductance="441.967736pS"/>
    <gapJunction id="gap_junction02" conductance="446.428431pS"/>
    <gapJunction id="gap_junction03" conductance="408.994471pS"/>
    <gapJunction id="gap_junction04" conductance="455.027382pS"/>
    <gapJunction id="gap_junction05" conductance="424.384653pS"/>
    <gapJunction id="gap_junction06" conductance="441.364880pS"/>
    <gapJunction id="gap_junction07" conductance="413.470723pS"/>
    <gapJunction id="gap_junction08" conductance="422.403870pS"/>
    <gapJunction id="gap_junction09" conductance="404.202556pS"/>
    <gapJunction id="gap_junction010" conductance="409.130102pS"/>
    <gapJunction id="gap_junction011" conductance="439.145409pS"/>
    <gapJunction id="gap_junction012" conductance="414.944917pS"/>
    <gapJunction id="gap_junction013" conductance="433.852304pS"/>
    <gapJunction id="gap_junction014" conductance="434.286055pS"/>
    <gapJunction id="gap_junction015" conductance="427.890326pS"/>
    <gapJunction id="gap_junction016" conductance="420.223692pS"/>
    <gapJunction id="gap_junction017" conductance="419.706217pS"/>
    <gapJunction id="gap_junction018" conductance="429.944032pS"/>
    <gapJunction id="gap_junction019" conductance="400.895541pS"/>
    <gapJunction id="gap_junction020" conductance="454.446015pS"/>
    <gapJunction id="gap_junction021" conductance="437.278435pS"/>
    <gapJunction id="gap_junction022" conductance="412.759801pS"/>
    <gapJunction id="gap_junction023" conductance="418.503576pS"/>
    <gapJunction id="gap_junction024" conductance="451.051186pS"/>
    <gapJunction id="gap_junction025" conductance="439.584357pS"/>
    <gapJunction id="gap_junction026" conductance="451.179538pS"/>
    <gapJunction id="gap_junction027" conductance="410.951225pS"/>
    <gapJunction id="gap_junction028" conductance="411.676975pS"/>
    <gapJunction id="gap_junction029" conductance="444.641648pS"/>
    <gapJunction id="gap_junction030" conductance="414.070917pS"/>
    <gapJunction id="gap_junction031" conductance="411.244516pS"/>
    <gapJunction id="gap_junction032" conductance="419.375272pS"/>
    <gapJunction id="gap_junction033" conductance="468.585257pS"/>
    <gapJunction id="gap_junction034" conductance="424.011596pS"/>
    <gapJunction id="gap_junction035" conductance="460.657104pS"/>
    <gapJunction id="gap_junction036" conductance="422.192377pS"/>
    <gapJunction id="gap_junction037" conductance="427.470442pS"/>
    <gapJunction id="gap_junction038" conductance="422.657741pS"/>
    <gapJunction id="gap_junction039" conductance="407.893564pS"/>
    <gapJunction id="gap_junction040" conductance="416.024904pS"/>
    <gapJunction id="gap_junction041" conductance="451.262391pS"/>
    <gapJunction id="gap_junction042" conductance="400.358040pS"/>
    <gapJunction id="gap_junction043" conductance="413.204957pS"/>
    <gapJunction id="gap_junction044" conductance="448.133064pS"/>
    <gapJunction id="gap_junction045" conductance="417.097272pS"/>
    <gapJunction id="gap_junction046" conductance="425.863449pS"/>
    <gapJunction id="gap_junction047" conductance="446.198783pS"/>
    <gapJunction id="gap_junction048" conductance="399.148059pS"/>
    <gapJunction id="gap_junction049" conductance="415.205759pS"/>
    <gapJunction id="gap_junction050" conductance="415.149569pS"/>
    <gapJunction id="gap_junction051" conductance="415.080786pS"/>
    <gapJunction id="gap_junction052" conductance="469.325515pS"/>
    <gapJunction id="gap_junction053" conductance="433.100090pS"/>
    <gapJunction id="gap_junction054" conductance="464.652040pS"/>
    <gapJunction id="gap_junction055" conductance="423.224507pS"/>
    <gapJunction id="gap_junction056" conductance="403.778440pS"/>
    <gapJunction id="gap_junction057" conductance="407.143691pS"/>
    <gapJunction id="gap_junction058" conductance="400.091042pS"/>
    <gapJunction id="gap_junction059" conductance="454.994130pS"/>
    <gapJunction id="gap_junction060" conductance="404.155073pS"/>
    <gapJunction id="gap_junction061" conductance="451.215067pS"/>
    <gapJunction id="gap_junction062" conductance="421.757178pS"/>
    <gapJunction id="gap_junction063" conductance="418.461750pS"/>
    <gapJunction id="gap_junction064" conductance="454.343681pS"/>
    <gapJunction id="gap_junction065" conductance="400.484609pS"/>
    <gapJunction id="gap_junction066" conductance="435.290575pS"/>
    <gapJunction id="gap_junction067" conductance="433.755712pS"/>
    <gapJunction id="gap_junction068" conductance="424.404942pS"/>
    <gapJunction id="gap_junction069" conductance="426.105107pS"/>
    <gapJunction id="gap_junction070" conductance="418.582179pS"/>
    <pulseGenerator id="Pulse_vrpop0_Golgi_pop0_0" delay="50.000000ms" duration="400.000000ms" amplitude="22.354716pA"/>
    <pulseGenerator id="Pulse_vrpop0_Golgi_pop0_1" delay="50.000000ms" duration="400.000000ms" amplitude="55.471898pA"/>
    <pulseGenerator id="Pulse_vrpop0_Golgi_pop0_2" delay="50.000000ms" duration="400.000000ms" amplitude="54.712350pA"/>
    <pulseGenerator id="Pulse_vrpop0_Golgi_pop0_3" delay="50.000000ms" duration="400.000000ms" amplitude="41.513084pA"/>
    <pulseGenerator id="Pulse_vrpop0_Golgi_pop0_4" delay="50.000000ms" duration="400.000000ms" amplitude="72.518506pA"/>
    <spikeArray id="MF_AMPA_NMDA_Golgi_pop0_cell1_0">
        <spike id="0" time="0.006315s"/>
        <spike id="1" time="0.016800s"/>
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    </spikeArray>
    <spikeArray id="MF_AMPA_NMDA_Golgi_pop0_cell1_1">
        <spike id="0" time="0.000190s"/>
        <spike id="1" time="0.012725s"/>
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    </spikeArray>
    <spikeArray id="MF_AMPA_NMDA_Golgi_pop0_cell1_2">
        <spike id="0" time="0.019855s"/>
        <spike id="1" time="0.025095s"/>
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    </spikeArray>
    <spikeArray id="MF_AMPA_NMDA_Golgi_pop0_cell1_3">
        <spike id="0" time="0.004025s"/>
        <spike id="1" time="0.007510s"/>
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    </spikeArray>
    <spikeArray id="MF_AMPA_NMDA_Golgi_pop0_cell1_4">
        <spike id="0" time="0.008755s"/>
        <spike id="1" time="0.044155s"/>
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    </spikeArray>
    <spikeArray id="MF_AMPA_NMDA_Golgi_pop0_cell1_5">
        <spike id="0" time="0.000465s"/>
        <spike id="1" time="0.006835s"/>
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    </spikeArray>
    <spikeArray id="MF_AMPA_NMDA_Golgi_pop0_cell1_6">
        <spike id="0" time="0.009025s"/>
        <spike id="1" time="0.022910s"/>
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    </spikeArray>
    <spikeArray id="MF_AMPA_NMDA_Golgi_pop0_cell1_7">
        <spike id="0" time="0.017580s"/>
        <spike id="1" time="0.020250s"/>
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    </spikeArray>
    <spikeArray id="MF_AMPA_NMDA_Golgi_pop0_cell3_0">
        <spike id="0" time="0.006315s"/>
        <spike id="1" time="0.016800s"/>
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    </spikeArray>
    <spikeArray id="MF_AMPA_NMDA_Golgi_pop0_cell3_1">
        <spike id="0" time="0.000190s"/>
        <spike id="1" time="0.012725s"/>
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    </spikeArray>
    <spikeArray id="MF_AMPA_NMDA_Golgi_pop0_cell3_2">
        <spike id="0" time="0.019855s"/>
        <spike id="1" time="0.025095s"/>
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    </spikeArray>
    <spikeArray id="MF_AMPA_NMDA_Golgi_pop0_cell3_3">
        <spike id="0" time="0.004025s"/>
        <spike id="1" time="0.007510s"/>
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    </spikeArray>
    <spikeArray id="MF_AMPA_NMDA_Golgi_pop0_cell3_4">
        <spike id="0" time="0.008755s"/>
        <spike id="1" time="0.044155s"/>
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    </spikeArray>
    <spikeArray id="MF_AMPA_NMDA_Golgi_pop0_cell3_5">
        <spike id="0" time="0.000465s"/>
        <spike id="1" time="0.006835s"/>
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    </spikeArray>
    <spikeArray id="MF_AMPA_NMDA_Golgi_pop0_cell3_6">
        <spike id="0" time="0.009025s"/>
        <spike id="1" time="0.022910s"/>
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    </spikeArray>
    <spikeArray id="MF_AMPA_NMDA_Golgi_pop0_cell3_7">
        <spike id="0" time="0.017580s"/>
        <spike id="1" time="0.020250s"/>
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    </spikeArray>
    <network id="Golgi_V2012_test1_import_colocalize_plus_regional_trial0_network" type="networkWithTemperature" temperature="23 degC">
        <notes>Parameter arrays for building this network are listed below:
Cell distribution parameters:
{'yDim': 50, 'popID': 'Golgi_pop0', 'zDim': 50, 'xDim': 50, 'distributionModel': 'explicit_cell_numbers', 'minimal_distance': 25, 'distanceModel': 'random_minimal_distance'}
Cell population parameters:
Cell population parameters for Golgi_pop0:
{'popID': 'Golgi_pop0', 'cellType': 'Golgi_5comp_3channels_1CaPool', 'size': 5}
Cell connectivity parameters:
{'maximalConnDistance': 150, 'conductanceModel': 'variable', 'targetingModelpostPop': {'segmentGroupList': ['Section_1', 'dend_1'], 'model': 'segment groups and segments', 'segmentGroupProbabilities': {'Section_1': 0.7, 'dend_1': 0.3}}, 'distributionGJ': 'binomial', 'targetingModelprePop': {'segmentGroupList': ['Section_1', 'dend_1'], 'model': 'segment groups and segments', 'segmentGroupProbabilities': {'Section_1': 0.7, 'dend_1': 0.3}}, 'postPopID': 'Golgi_pop0', 'averageNoGJs': 8, 'gapJunctionModel': 'variable number of GJ contacts per pair', 'averageConductance': 426, 'testingConductanceScale': 1, 'electricalConnModel': 'Vervaeke_2012_based', 'stdDev': 20, 'maxNoGJs': 10, 'units': 'pS', 'distribution': 'gaussian', 'prePopID': 'Golgi_pop0', 'spatialScale': 1}
Input parameters for a list of populations:
Input group parameters for Golgi_pop0:
{'stDevAmp': 25, 'inputModel': 'variable_basal_firing_rate', 'ampUnits': 'pA', 'amplitudeDistribution': 'gaussian', 'averageAmp': 50, 'valueOffset': 50, 'inputLabel': 'vrpop0', 'offsetDistribution': 'constant', 'offsetUnits': 'ms'}
{'segmentProbabilities': {'Soma': 0.7, 'dend_1': 0.3}, 'targetingModel': 'segments and subsegments', 'units': 'ms', 'averageRate': 150, 'noInputs': 8, 'synapseList': [{'synapseType': 'MFSpikeSyn'}, {'synapseType': 'MF_PF_SpikeSynNMDA'}], 'inputLabel': 'MF_AMPA_NMDA', 'delay': 80, 'inputModel': 'XF', 'inputIdLibrary': 'XFpop0_Golgi_pop0_syn0', 'synapseMode': 'transient', 'fractionToTarget': 1, 'segmentList': ['Soma', 'dend_1'], 'duration': 100, 'numberModel': 'constant number of inputs per cell', 'targetingRegime': '3D_region_specific', 'colocalizeSynapses': True, 'regionList': [{'zVector': [0, 40], 'xVector': [0, 40], 'yVector': [0, 40]}], 'fractionAlongANDsubsegProbabilities': {'Soma': [{'fractionAlong': 0.25, 'Prob': 1}, {'fractionAlong': 0.25, 'Prob': 0}], 'dend_1': [{'fractionAlong': 0.5, 'Prob': 0.7}, {'fractionAlong': 0.5, 'Prob': 0.3}]}}
</notes>
        <population id="Golgi_pop0" type="populationList" component="Golgi_5comp_3channels_1CaPool" size="5">
            <instance id="0">
                <location y="23.512834821661027" x="23.445002662665114" z="41.533496580891629"/>
            </instance>
            <instance id="1">
                <location y="0.279477031485575" x="3.630782713296354" z="16.690064112945013"/>
            </instance>
            <instance id="2">
                <location y="46.995760497534789" x="18.805175560395554" z="16.34188714026234"/>
            </instance>
            <instance id="3">
                <location y="31.19582328650667" x="32.824359360504793" z="29.605148347366839"/>
            </instance>
            <instance id="4">
                <location y="23.591117616265105" x="6.288154905162657" z="44.959512723460001"/>
            </instance>
        </population>
        <population id="InputPop_MF_AMPA_NMDA_Golgi_pop0_cell1_0" component="MF_AMPA_NMDA_Golgi_pop0_cell1_0" size="1"/>
        <population id="InputPop_MF_AMPA_NMDA_Golgi_pop0_cell1_1" component="MF_AMPA_NMDA_Golgi_pop0_cell1_1" size="1"/>
        <population id="InputPop_MF_AMPA_NMDA_Golgi_pop0_cell1_2" component="MF_AMPA_NMDA_Golgi_pop0_cell1_2" size="1"/>
        <population id="InputPop_MF_AMPA_NMDA_Golgi_pop0_cell1_3" component="MF_AMPA_NMDA_Golgi_pop0_cell1_3" size="1"/>
        <population id="InputPop_MF_AMPA_NMDA_Golgi_pop0_cell1_4" component="MF_AMPA_NMDA_Golgi_pop0_cell1_4" size="1"/>
        <population id="InputPop_MF_AMPA_NMDA_Golgi_pop0_cell1_5" component="MF_AMPA_NMDA_Golgi_pop0_cell1_5" size="1"/>
        <population id="InputPop_MF_AMPA_NMDA_Golgi_pop0_cell1_6" component="MF_AMPA_NMDA_Golgi_pop0_cell1_6" size="1"/>
        <population id="InputPop_MF_AMPA_NMDA_Golgi_pop0_cell1_7" component="MF_AMPA_NMDA_Golgi_pop0_cell1_7" size="1"/>
        <population id="InputPop_MF_AMPA_NMDA_Golgi_pop0_cell3_0" component="MF_AMPA_NMDA_Golgi_pop0_cell3_0" size="1"/>
        <population id="InputPop_MF_AMPA_NMDA_Golgi_pop0_cell3_1" component="MF_AMPA_NMDA_Golgi_pop0_cell3_1" size="1"/>
        <population id="InputPop_MF_AMPA_NMDA_Golgi_pop0_cell3_2" component="MF_AMPA_NMDA_Golgi_pop0_cell3_2" size="1"/>
        <population id="InputPop_MF_AMPA_NMDA_Golgi_pop0_cell3_3" component="MF_AMPA_NMDA_Golgi_pop0_cell3_3" size="1"/>
        <population id="InputPop_MF_AMPA_NMDA_Golgi_pop0_cell3_4" component="MF_AMPA_NMDA_Golgi_pop0_cell3_4" size="1"/>
        <population id="InputPop_MF_AMPA_NMDA_Golgi_pop0_cell3_5" component="MF_AMPA_NMDA_Golgi_pop0_cell3_5" size="1"/>
        <population id="InputPop_MF_AMPA_NMDA_Golgi_pop0_cell3_6" component="MF_AMPA_NMDA_Golgi_pop0_cell3_6" size="1"/>
        <population id="InputPop_MF_AMPA_NMDA_Golgi_pop0_cell3_7" component="MF_AMPA_NMDA_Golgi_pop0_cell3_7" size="1"/>
        <projection id="InputProj_MF_AMPA_NMDA_Golgi_pop0_cell1_syn0_0" postsynapticPopulation="Golgi_pop0" presynapticPopulation="InputPop_MF_AMPA_NMDA_Golgi_pop0_cell1_0" synapse="MFSpikeSyn">
            <connection id="0" preCellId="../InputPop_MF_AMPA_NMDA_Golgi_pop0_cell1_0[0]" postFractionAlong="0.469958" postSegmentId="2" postCellId="../Golgi_pop0/1/Golgi_5comp_3channels_1CaPool"/>
        </projection>
        <projection id="InputProj_MF_AMPA_NMDA_Golgi_pop0_cell1_syn1_0" postsynapticPopulation="Golgi_pop0" presynapticPopulation="InputPop_MF_AMPA_NMDA_Golgi_pop0_cell1_0" synapse="MF_PF_SpikeSynNMDA">
            <connection id="0" preCellId="../InputPop_MF_AMPA_NMDA_Golgi_pop0_cell1_0[0]" postFractionAlong="0.469958" postSegmentId="2" postCellId="../Golgi_pop0/1/Golgi_5comp_3channels_1CaPool"/>
        </projection>
        <projection id="InputProj_MF_AMPA_NMDA_Golgi_pop0_cell1_syn0_1" postsynapticPopulation="Golgi_pop0" presynapticPopulation="InputPop_MF_AMPA_NMDA_Golgi_pop0_cell1_1" synapse="MFSpikeSyn">
            <connection id="0" preCellId="../InputPop_MF_AMPA_NMDA_Golgi_pop0_cell1_1[0]" postFractionAlong="0.092484" postSegmentId="0" postCellId="../Golgi_pop0/1/Golgi_5comp_3channels_1CaPool"/>
        </projection>
        <projection id="InputProj_MF_AMPA_NMDA_Golgi_pop0_cell1_syn1_1" postsynapticPopulation="Golgi_pop0" presynapticPopulation="InputPop_MF_AMPA_NMDA_Golgi_pop0_cell1_1" synapse="MF_PF_SpikeSynNMDA">
            <connection id="0" preCellId="../InputPop_MF_AMPA_NMDA_Golgi_pop0_cell1_1[0]" postFractionAlong="0.092484" postSegmentId="0" postCellId="../Golgi_pop0/1/Golgi_5comp_3channels_1CaPool"/>
        </projection>
        <projection id="InputProj_MF_AMPA_NMDA_Golgi_pop0_cell1_syn0_2" postsynapticPopulation="Golgi_pop0" presynapticPopulation="InputPop_MF_AMPA_NMDA_Golgi_pop0_cell1_2" synapse="MFSpikeSyn">
            <connection id="0" preCellId="../InputPop_MF_AMPA_NMDA_Golgi_pop0_cell1_2[0]" postFractionAlong="0.054124" postSegmentId="0" postCellId="../Golgi_pop0/1/Golgi_5comp_3channels_1CaPool"/>
        </projection>
        <projection id="InputProj_MF_AMPA_NMDA_Golgi_pop0_cell1_syn1_2" postsynapticPopulation="Golgi_pop0" presynapticPopulation="InputPop_MF_AMPA_NMDA_Golgi_pop0_cell1_2" synapse="MF_PF_SpikeSynNMDA">
            <connection id="0" preCellId="../InputPop_MF_AMPA_NMDA_Golgi_pop0_cell1_2[0]" postFractionAlong="0.054124" postSegmentId="0" postCellId="../Golgi_pop0/1/Golgi_5comp_3channels_1CaPool"/>
        </projection>
        <projection id="InputProj_MF_AMPA_NMDA_Golgi_pop0_cell1_syn0_3" postsynapticPopulation="Golgi_pop0" presynapticPopulation="InputPop_MF_AMPA_NMDA_Golgi_pop0_cell1_3" synapse="MFSpikeSyn">
            <connection id="0" preCellId="../InputPop_MF_AMPA_NMDA_Golgi_pop0_cell1_3[0]" postFractionAlong="0.198735" postSegmentId="0" postCellId="../Golgi_pop0/1/Golgi_5comp_3channels_1CaPool"/>
        </projection>
        <projection id="InputProj_MF_AMPA_NMDA_Golgi_pop0_cell1_syn1_3" postsynapticPopulation="Golgi_pop0" presynapticPopulation="InputPop_MF_AMPA_NMDA_Golgi_pop0_cell1_3" synapse="MF_PF_SpikeSynNMDA">
            <connection id="0" preCellId="../InputPop_MF_AMPA_NMDA_Golgi_pop0_cell1_3[0]" postFractionAlong="0.198735" postSegmentId="0" postCellId="../Golgi_pop0/1/Golgi_5comp_3channels_1CaPool"/>
        </projection>
        <projection id="InputProj_MF_AMPA_NMDA_Golgi_pop0_cell1_syn0_4" postsynapticPopulation="Golgi_pop0" presynapticPopulation="InputPop_MF_AMPA_NMDA_Golgi_pop0_cell1_4" synapse="MFSpikeSyn">
            <connection id="0" preCellId="../InputPop_MF_AMPA_NMDA_Golgi_pop0_cell1_4[0]" postFractionAlong="0.078503" postSegmentId="0" postCellId="../Golgi_pop0/1/Golgi_5comp_3channels_1CaPool"/>
        </projection>
        <projection id="InputProj_MF_AMPA_NMDA_Golgi_pop0_cell1_syn1_4" postsynapticPopulation="Golgi_pop0" presynapticPopulation="InputPop_MF_AMPA_NMDA_Golgi_pop0_cell1_4" synapse="MF_PF_SpikeSynNMDA">
            <connection id="0" preCellId="../InputPop_MF_AMPA_NMDA_Golgi_pop0_cell1_4[0]" postFractionAlong="0.078503" postSegmentId="0" postCellId="../Golgi_pop0/1/Golgi_5comp_3channels_1CaPool"/>
        </projection>
        <projection id="InputProj_MF_AMPA_NMDA_Golgi_pop0_cell1_syn0_5" postsynapticPopulation="Golgi_pop0" presynapticPopulation="InputPop_MF_AMPA_NMDA_Golgi_pop0_cell1_5" synapse="MFSpikeSyn">
            <connection id="0" preCellId="../InputPop_MF_AMPA_NMDA_Golgi_pop0_cell1_5[0]" postFractionAlong="0.323462" postSegmentId="2" postCellId="../Golgi_pop0/1/Golgi_5comp_3channels_1CaPool"/>
        </projection>
        <projection id="InputProj_MF_AMPA_NMDA_Golgi_pop0_cell1_syn1_5" postsynapticPopulation="Golgi_pop0" presynapticPopulation="InputPop_MF_AMPA_NMDA_Golgi_pop0_cell1_5" synapse="MF_PF_SpikeSynNMDA">
            <connection id="0" preCellId="../InputPop_MF_AMPA_NMDA_Golgi_pop0_cell1_5[0]" postFractionAlong="0.323462" postSegmentId="2" postCellId="../Golgi_pop0/1/Golgi_5comp_3channels_1CaPool"/>
        </projection>
        <projection id="InputProj_MF_AMPA_NMDA_Golgi_pop0_cell1_syn0_6" postsynapticPopulation="Golgi_pop0" presynapticPopulation="InputPop_MF_AMPA_NMDA_Golgi_pop0_cell1_6" synapse="MFSpikeSyn">
            <connection id="0" preCellId="../InputPop_MF_AMPA_NMDA_Golgi_pop0_cell1_6[0]" postFractionAlong="0.114467" postSegmentId="0" postCellId="../Golgi_pop0/1/Golgi_5comp_3channels_1CaPool"/>
        </projection>
        <projection id="InputProj_MF_AMPA_NMDA_Golgi_pop0_cell1_syn1_6" postsynapticPopulation="Golgi_pop0" presynapticPopulation="InputPop_MF_AMPA_NMDA_Golgi_pop0_cell1_6" synapse="MF_PF_SpikeSynNMDA">
            <connection id="0" preCellId="../InputPop_MF_AMPA_NMDA_Golgi_pop0_cell1_6[0]" postFractionAlong="0.114467" postSegmentId="0" postCellId="../Golgi_pop0/1/Golgi_5comp_3channels_1CaPool"/>
        </projection>
        <projection id="InputProj_MF_AMPA_NMDA_Golgi_pop0_cell1_syn0_7" postsynapticPopulation="Golgi_pop0" presynapticPopulation="InputPop_MF_AMPA_NMDA_Golgi_pop0_cell1_7" synapse="MFSpikeSyn">
            <connection id="0" preCellId="../InputPop_MF_AMPA_NMDA_Golgi_pop0_cell1_7[0]" postFractionAlong="0.022731" postSegmentId="2" postCellId="../Golgi_pop0/1/Golgi_5comp_3channels_1CaPool"/>
        </projection>
        <projection id="InputProj_MF_AMPA_NMDA_Golgi_pop0_cell1_syn1_7" postsynapticPopulation="Golgi_pop0" presynapticPopulation="InputPop_MF_AMPA_NMDA_Golgi_pop0_cell1_7" synapse="MF_PF_SpikeSynNMDA">
            <connection id="0" preCellId="../InputPop_MF_AMPA_NMDA_Golgi_pop0_cell1_7[0]" postFractionAlong="0.022731" postSegmentId="2" postCellId="../Golgi_pop0/1/Golgi_5comp_3channels_1CaPool"/>
        </projection>
        <projection id="InputProj_MF_AMPA_NMDA_Golgi_pop0_cell3_syn0_0" postsynapticPopulation="Golgi_pop0" presynapticPopulation="InputPop_MF_AMPA_NMDA_Golgi_pop0_cell3_0" synapse="MFSpikeSyn">
            <connection id="0" preCellId="../InputPop_MF_AMPA_NMDA_Golgi_pop0_cell3_0[0]" postFractionAlong="0.613693" postSegmentId="2" postCellId="../Golgi_pop0/3/Golgi_5comp_3channels_1CaPool"/>
        </projection>
        <projection id="InputProj_MF_AMPA_NMDA_Golgi_pop0_cell3_syn1_0" postsynapticPopulation="Golgi_pop0" presynapticPopulation="InputPop_MF_AMPA_NMDA_Golgi_pop0_cell3_0" synapse="MF_PF_SpikeSynNMDA">
            <connection id="0" preCellId="../InputPop_MF_AMPA_NMDA_Golgi_pop0_cell3_0[0]" postFractionAlong="0.613693" postSegmentId="2" postCellId="../Golgi_pop0/3/Golgi_5comp_3channels_1CaPool"/>
        </projection>
        <projection id="InputProj_MF_AMPA_NMDA_Golgi_pop0_cell3_syn0_1" postsynapticPopulation="Golgi_pop0" presynapticPopulation="InputPop_MF_AMPA_NMDA_Golgi_pop0_cell3_1" synapse="MFSpikeSyn">
            <connection id="0" preCellId="../InputPop_MF_AMPA_NMDA_Golgi_pop0_cell3_1[0]" postFractionAlong="0.201878" postSegmentId="0" postCellId="../Golgi_pop0/3/Golgi_5comp_3channels_1CaPool"/>
        </projection>
        <projection id="InputProj_MF_AMPA_NMDA_Golgi_pop0_cell3_syn1_1" postsynapticPopulation="Golgi_pop0" presynapticPopulation="InputPop_MF_AMPA_NMDA_Golgi_pop0_cell3_1" synapse="MF_PF_SpikeSynNMDA">
            <connection id="0" preCellId="../InputPop_MF_AMPA_NMDA_Golgi_pop0_cell3_1[0]" postFractionAlong="0.201878" postSegmentId="0" postCellId="../Golgi_pop0/3/Golgi_5comp_3channels_1CaPool"/>
        </projection>
        <projection id="InputProj_MF_AMPA_NMDA_Golgi_pop0_cell3_syn0_2" postsynapticPopulation="Golgi_pop0" presynapticPopulation="InputPop_MF_AMPA_NMDA_Golgi_pop0_cell3_2" synapse="MFSpikeSyn">
            <connection id="0" preCellId="../InputPop_MF_AMPA_NMDA_Golgi_pop0_cell3_2[0]" postFractionAlong="0.032101" postSegmentId="0" postCellId="../Golgi_pop0/3/Golgi_5comp_3channels_1CaPool"/>
        </projection>
        <projection id="InputProj_MF_AMPA_NMDA_Golgi_pop0_cell3_syn1_2" postsynapticPopulation="Golgi_pop0" presynapticPopulation="InputPop_MF_AMPA_NMDA_Golgi_pop0_cell3_2" synapse="MF_PF_SpikeSynNMDA">
            <connection id="0" preCellId="../InputPop_MF_AMPA_NMDA_Golgi_pop0_cell3_2[0]" postFractionAlong="0.032101" postSegmentId="0" postCellId="../Golgi_pop0/3/Golgi_5comp_3channels_1CaPool"/>
        </projection>
        <projection id="InputProj_MF_AMPA_NMDA_Golgi_pop0_cell3_syn0_3" postsynapticPopulation="Golgi_pop0" presynapticPopulation="InputPop_MF_AMPA_NMDA_Golgi_pop0_cell3_3" synapse="MFSpikeSyn">
            <connection id="0" preCellId="../InputPop_MF_AMPA_NMDA_Golgi_pop0_cell3_3[0]" postFractionAlong="0.140712" postSegmentId="2" postCellId="../Golgi_pop0/3/Golgi_5comp_3channels_1CaPool"/>
        </projection>
        <projection id="InputProj_MF_AMPA_NMDA_Golgi_pop0_cell3_syn1_3" postsynapticPopulation="Golgi_pop0" presynapticPopulation="InputPop_MF_AMPA_NMDA_Golgi_pop0_cell3_3" synapse="MF_PF_SpikeSynNMDA">
            <connection id="0" preCellId="../InputPop_MF_AMPA_NMDA_Golgi_pop0_cell3_3[0]" postFractionAlong="0.140712" postSegmentId="2" postCellId="../Golgi_pop0/3/Golgi_5comp_3channels_1CaPool"/>
        </projection>
        <projection id="InputProj_MF_AMPA_NMDA_Golgi_pop0_cell3_syn0_4" postsynapticPopulation="Golgi_pop0" presynapticPopulation="InputPop_MF_AMPA_NMDA_Golgi_pop0_cell3_4" synapse="MFSpikeSyn">
            <connection id="0" preCellId="../InputPop_MF_AMPA_NMDA_Golgi_pop0_cell3_4[0]" postFractionAlong="0.207743" postSegmentId="2" postCellId="../Golgi_pop0/3/Golgi_5comp_3channels_1CaPool"/>
        </projection>
        <projection id="InputProj_MF_AMPA_NMDA_Golgi_pop0_cell3_syn1_4" postsynapticPopulation="Golgi_pop0" presynapticPopulation="InputPop_MF_AMPA_NMDA_Golgi_pop0_cell3_4" synapse="MF_PF_SpikeSynNMDA">
            <connection id="0" preCellId="../InputPop_MF_AMPA_NMDA_Golgi_pop0_cell3_4[0]" postFractionAlong="0.207743" postSegmentId="2" postCellId="../Golgi_pop0/3/Golgi_5comp_3channels_1CaPool"/>
        </projection>
        <projection id="InputProj_MF_AMPA_NMDA_Golgi_pop0_cell3_syn0_5" postsynapticPopulation="Golgi_pop0" presynapticPopulation="InputPop_MF_AMPA_NMDA_Golgi_pop0_cell3_5" synapse="MFSpikeSyn">
            <connection id="0" preCellId="../InputPop_MF_AMPA_NMDA_Golgi_pop0_cell3_5[0]" postFractionAlong="0.108865" postSegmentId="0" postCellId="../Golgi_pop0/3/Golgi_5comp_3channels_1CaPool"/>
        </projection>
        <projection id="InputProj_MF_AMPA_NMDA_Golgi_pop0_cell3_syn1_5" postsynapticPopulation="Golgi_pop0" presynapticPopulation="InputPop_MF_AMPA_NMDA_Golgi_pop0_cell3_5" synapse="MF_PF_SpikeSynNMDA">
            <connection id="0" preCellId="../InputPop_MF_AMPA_NMDA_Golgi_pop0_cell3_5[0]" postFractionAlong="0.108865" postSegmentId="0" postCellId="../Golgi_pop0/3/Golgi_5comp_3channels_1CaPool"/>
        </projection>
        <projection id="InputProj_MF_AMPA_NMDA_Golgi_pop0_cell3_syn0_6" postsynapticPopulation="Golgi_pop0" presynapticPopulation="InputPop_MF_AMPA_NMDA_Golgi_pop0_cell3_6" synapse="MFSpikeSyn">
            <connection id="0" preCellId="../InputPop_MF_AMPA_NMDA_Golgi_pop0_cell3_6[0]" postFractionAlong="0.220095" postSegmentId="0" postCellId="../Golgi_pop0/3/Golgi_5comp_3channels_1CaPool"/>
        </projection>
        <projection id="InputProj_MF_AMPA_NMDA_Golgi_pop0_cell3_syn1_6" postsynapticPopulation="Golgi_pop0" presynapticPopulation="InputPop_MF_AMPA_NMDA_Golgi_pop0_cell3_6" synapse="MF_PF_SpikeSynNMDA">
            <connection id="0" preCellId="../InputPop_MF_AMPA_NMDA_Golgi_pop0_cell3_6[0]" postFractionAlong="0.220095" postSegmentId="0" postCellId="../Golgi_pop0/3/Golgi_5comp_3channels_1CaPool"/>
        </projection>
        <projection id="InputProj_MF_AMPA_NMDA_Golgi_pop0_cell3_syn0_7" postsynapticPopulation="Golgi_pop0" presynapticPopulation="InputPop_MF_AMPA_NMDA_Golgi_pop0_cell3_7" synapse="MFSpikeSyn">
            <connection id="0" preCellId="../InputPop_MF_AMPA_NMDA_Golgi_pop0_cell3_7[0]" postFractionAlong="0.160218" postSegmentId="0" postCellId="../Golgi_pop0/3/Golgi_5comp_3channels_1CaPool"/>
        </projection>
        <projection id="InputProj_MF_AMPA_NMDA_Golgi_pop0_cell3_syn1_7" postsynapticPopulation="Golgi_pop0" presynapticPopulation="InputPop_MF_AMPA_NMDA_Golgi_pop0_cell3_7" synapse="MF_PF_SpikeSynNMDA">
            <connection id="0" preCellId="../InputPop_MF_AMPA_NMDA_Golgi_pop0_cell3_7[0]" postFractionAlong="0.160218" postSegmentId="0" postCellId="../Golgi_pop0/3/Golgi_5comp_3channels_1CaPool"/>
        </projection>
        <electricalProjection id="proj0" postsynapticPopulation="Golgi_pop0" presynapticPopulation="Golgi_pop0">
            <electricalConnectionInstance id="0" synapse="gap_junction00" preFractionAlong="0.376104" preSegment="1" postFractionAlong="0.586296" postSegment="1" postCell="../Golgi_pop0/1/Golgi_5comp_3channels_1CaPool" preCell="../Golgi_pop0/0/Golgi_5comp_3channels_1CaPool"/>
            <electricalConnectionInstance id="1" synapse="gap_junction01" preFractionAlong="0.899190" preSegment="2" postFractionAlong="0.881248" postSegment="1" postCell="../Golgi_pop0/1/Golgi_5comp_3channels_1CaPool" preCell="../Golgi_pop0/0/Golgi_5comp_3channels_1CaPool"/>
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        </electricalProjection>
        <inputList id="vrpop0_Golgi_pop0_0" component="Pulse_vrpop0_Golgi_pop0_0" population="Golgi_pop0">
            <input destination="synapses" id="0" target="../Golgi_pop0/0/Golgi_5comp_3channels_1CaPool"/>
        </inputList>
        <inputList id="vrpop0_Golgi_pop0_1" component="Pulse_vrpop0_Golgi_pop0_1" population="Golgi_pop0">
            <input destination="synapses" id="1" target="../Golgi_pop0/1/Golgi_5comp_3channels_1CaPool"/>
        </inputList>
        <inputList id="vrpop0_Golgi_pop0_2" component="Pulse_vrpop0_Golgi_pop0_2" population="Golgi_pop0">
            <input destination="synapses" id="2" target="../Golgi_pop0/2/Golgi_5comp_3channels_1CaPool"/>
        </inputList>
        <inputList id="vrpop0_Golgi_pop0_3" component="Pulse_vrpop0_Golgi_pop0_3" population="Golgi_pop0">
            <input destination="synapses" id="3" target="../Golgi_pop0/3/Golgi_5comp_3channels_1CaPool"/>
        </inputList>
        <inputList id="vrpop0_Golgi_pop0_4" component="Pulse_vrpop0_Golgi_pop0_4" population="Golgi_pop0">
            <input destination="synapses" id="4" target="../Golgi_pop0/4/Golgi_5comp_3channels_1CaPool"/>
        </inputList>
    </network>
</neuroml>
