<neuroml xmlns="http://www.neuroml.org/schema/neuroml2"  xmlns:xs="http://www.w3.org/2001/XMLSchema" xmlns:xsi="http://www.w3.org/2001/XMLSchema-instance" xsi:schemaLocation="http://www.neuroml.org/schema/neuroml2 https://raw.github.com/NeuroML/NeuroML2/development/Schemas/NeuroML2/NeuroML_v2beta4.xsd" id="Golgi_V2012_test_import_diff_library_trial0">
    <include href="/../../../Golgi_10comp_13channels_2CaPools.cell.nml"></include>
    <include href="/../../../PFSpikeSyn.synapse.nml"></include>
    <gapJunction id="gap_junction00" conductance="450.577308pS"/>
    <gapJunction id="gap_junction01" conductance="441.981179pS"/>
    <gapJunction id="gap_junction02" conductance="394.806145pS"/>
    <gapJunction id="gap_junction03" conductance="444.494733pS"/>
    <gapJunction id="gap_junction04" conductance="433.910982pS"/>
    <gapJunction id="gap_junction05" conductance="431.632427pS"/>
    <gapJunction id="gap_junction06" conductance="341.066895pS"/>
    <gapJunction id="gap_junction07" conductance="424.269172pS"/>
    <pulseGenerator id="Pulse_vrpop0_Golgi_pop0_0" delay="50.000000ms" duration="400.000000ms" amplitude="11.801586pA"/>
    <pulseGenerator id="Pulse_vrpop0_Golgi_pop0_1" delay="50.000000ms" duration="400.000000ms" amplitude="69.993095pA"/>
    <spikeArray id="XFpop0_Golgi_pop0_cell0_syn0_0">
        <spike id="0" time="0.006315s"/>
        <spike id="1" time="0.016800s"/>
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    </spikeArray>
    <spikeArray id="XFpop0_Golgi_pop0_cell0_syn0_1">
        <spike id="0" time="0.000190s"/>
        <spike id="1" time="0.012725s"/>
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    </spikeArray>
    <spikeArray id="XFpop0_Golgi_pop0_cell0_syn0_2">
        <spike id="0" time="0.019855s"/>
        <spike id="1" time="0.025095s"/>
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    </spikeArray>
    <spikeArray id="XFpop0_Golgi_pop0_cell0_syn0_3">
        <spike id="0" time="0.004025s"/>
        <spike id="1" time="0.007510s"/>
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    </spikeArray>
    <spikeArray id="XFpop0_Golgi_pop0_cell0_syn0_4">
        <spike id="0" time="0.008755s"/>
        <spike id="1" time="0.044155s"/>
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    </spikeArray>
    <spikeArray id="XFpop0_Golgi_pop0_cell0_syn0_5">
        <spike id="0" time="0.000465s"/>
        <spike id="1" time="0.006835s"/>
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    </spikeArray>
    <spikeArray id="XFpop0_Golgi_pop0_cell0_syn0_6">
        <spike id="0" time="0.009025s"/>
        <spike id="1" time="0.022910s"/>
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    </spikeArray>
    <spikeArray id="XFpop0_Golgi_pop0_cell0_syn0_7">
        <spike id="0" time="0.017580s"/>
        <spike id="1" time="0.020250s"/>
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    </spikeArray>
    <spikeArray id="XFpop0_Golgi_pop0_cell0_syn1_0">
        <spike id="0" time="0.006315s"/>
        <spike id="1" time="0.016800s"/>
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    </spikeArray>
    <spikeArray id="XFpop0_Golgi_pop0_cell0_syn1_1">
        <spike id="0" time="0.000190s"/>
        <spike id="1" time="0.012725s"/>
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    </spikeArray>
    <spikeArray id="XFpop0_Golgi_pop0_cell0_syn1_2">
        <spike id="0" time="0.019855s"/>
        <spike id="1" time="0.025095s"/>
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    </spikeArray>
    <spikeArray id="XFpop0_Golgi_pop0_cell0_syn1_3">
        <spike id="0" time="0.004025s"/>
        <spike id="1" time="0.007510s"/>
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    </spikeArray>
    <spikeArray id="XFpop0_Golgi_pop0_cell0_syn1_4">
        <spike id="0" time="0.008755s"/>
        <spike id="1" time="0.044155s"/>
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    </spikeArray>
    <spikeArray id="XFpop0_Golgi_pop0_cell0_syn1_5">
        <spike id="0" time="0.000465s"/>
        <spike id="1" time="0.006835s"/>
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    </spikeArray>
    <spikeArray id="XFpop0_Golgi_pop0_cell0_syn1_6">
        <spike id="0" time="0.009025s"/>
        <spike id="1" time="0.022910s"/>
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    </spikeArray>
    <spikeArray id="XFpop0_Golgi_pop0_cell0_syn1_7">
        <spike id="0" time="0.017580s"/>
        <spike id="1" time="0.020250s"/>
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    </spikeArray>
    <network id="Golgi_V2012_test_import_diff_library_trial0_network" type="networkWithTemperature" temperature="23 degC">
        <notes>Parameter arrays for building this network are listed below:
Cell distribution parameters:
{'yDim': 40, 'popID': 'Golgi_pop0', 'zDim': 40, 'xDim': 40, 'distributionModel': 'explicit_cell_numbers', 'minimal_distance': 10, 'distanceModel': 'random_minimal_distance'}
Cell population parameters:
Cell population parameters for Golgi_pop0:
{'NeuroML2CellType': 'cell2CaPools', 'popID': 'Golgi_pop0', 'cellType': 'Golgi_10comp_13channels_2CaPools', 'size': 2}
Cell connectivity parameters:
{'targetingModelprePop': {'segmentGroupList': ['apical_dendrite_group', 'basal_dendrite_group'], 'model': 'segment groups and segments', 'segmentGroupProbabilities': {'basal_dendrite_group': 0.2, 'apical_dendrite_group': 0.8}}, 'gapJunctionModel': 'constant number of GJ contacts per pair', 'testingConductanceScale': 1, 'stdDev': 20, 'maximalConnDistance': 100, 'spatialScale': 1, 'prePopID': 'Golgi_pop0', 'averageConductance': 426, 'targetingModelpostPop': {'segmentGroupList': ['apical_dendrite_group', 'basal_dendrite_group'], 'model': 'segment groups and segments', 'segmentGroupProbabilities': {'basal_dendrite_group': 0.2, 'apical_dendrite_group': 0.8}}, 'postPopID': 'Golgi_pop0', 'numberGJ': 8, 'conductanceModel': 'variable', 'electricalConnModel': 'Vervaeke_2012_based', 'units': 'pS', 'distribution': 'gaussian'}
Input parameters for a list of populations:
Input group parameters for Golgi_pop0:
{'stDevAmp': 25, 'inputModel': 'variable_basal_firing_rate', 'ampUnits': 'pA', 'amplitudeDistribution': 'gaussian', 'averageAmp': 50, 'valueOffset': 50, 'inputLabel': 'vrpop0', 'offsetDistribution': 'constant', 'offsetUnits': 'ms'}
{'synapseList': [{'segmentGroupList': ['apical_dendrite_group'], 'targetingModel': 'segment groups and segments', 'noInputs': 8, 'inputIdLibrary': 'XFpop0_Golgi_pop0_syn0', 'segmentGroupProbabilities': {'apical_dendrite_group': 1}, 'synapseType': 'PFSpikeSyn', 'numberModel': 'constant number of inputs per cell'}, {'segmentGroupList': ['basal_dendrite_group'], 'targetingModel': 'segment groups and segments', 'noInputs': 8, 'inputIdLibrary': 'XFpop0_Golgi_pop0_syn0', 'segmentGroupProbabilities': {'basal_dendrite_group': 1}, 'synapseType': 'PFSpikeSyn', 'numberModel': 'constant number of inputs per cell'}], 'inputLabel': 'XFpop0', 'inputModel': 'XF', 'fractionToTarget': 0.5, 'targetingRegime': 'uniform', 'colocalizeSynapses': False}
</notes>
        <population id="Golgi_pop0" type="populationList" component="Golgi_10comp_13channels_2CaPools" size="2">
            <instance id="0">
                <location y="30.9586787524497" x="16.930265173898562" z="11.973232269002207"/>
            </instance>
            <instance id="1">
                <location y="26.757984144645356" x="22.327935807550109" z="38.827687155727247"/>
            </instance>
        </population>
        <population id="InputPop_XFpop0_Golgi_pop0_cell0_syn0_0" component="XFpop0_Golgi_pop0_cell0_syn0_0" size="1"/>
        <population id="InputPop_XFpop0_Golgi_pop0_cell0_syn0_1" component="XFpop0_Golgi_pop0_cell0_syn0_1" size="1"/>
        <population id="InputPop_XFpop0_Golgi_pop0_cell0_syn0_2" component="XFpop0_Golgi_pop0_cell0_syn0_2" size="1"/>
        <population id="InputPop_XFpop0_Golgi_pop0_cell0_syn0_3" component="XFpop0_Golgi_pop0_cell0_syn0_3" size="1"/>
        <population id="InputPop_XFpop0_Golgi_pop0_cell0_syn0_4" component="XFpop0_Golgi_pop0_cell0_syn0_4" size="1"/>
        <population id="InputPop_XFpop0_Golgi_pop0_cell0_syn0_5" component="XFpop0_Golgi_pop0_cell0_syn0_5" size="1"/>
        <population id="InputPop_XFpop0_Golgi_pop0_cell0_syn0_6" component="XFpop0_Golgi_pop0_cell0_syn0_6" size="1"/>
        <population id="InputPop_XFpop0_Golgi_pop0_cell0_syn0_7" component="XFpop0_Golgi_pop0_cell0_syn0_7" size="1"/>
        <population id="InputPop_XFpop0_Golgi_pop0_cell0_syn1_0" component="XFpop0_Golgi_pop0_cell0_syn1_0" size="1"/>
        <population id="InputPop_XFpop0_Golgi_pop0_cell0_syn1_1" component="XFpop0_Golgi_pop0_cell0_syn1_1" size="1"/>
        <population id="InputPop_XFpop0_Golgi_pop0_cell0_syn1_2" component="XFpop0_Golgi_pop0_cell0_syn1_2" size="1"/>
        <population id="InputPop_XFpop0_Golgi_pop0_cell0_syn1_3" component="XFpop0_Golgi_pop0_cell0_syn1_3" size="1"/>
        <population id="InputPop_XFpop0_Golgi_pop0_cell0_syn1_4" component="XFpop0_Golgi_pop0_cell0_syn1_4" size="1"/>
        <population id="InputPop_XFpop0_Golgi_pop0_cell0_syn1_5" component="XFpop0_Golgi_pop0_cell0_syn1_5" size="1"/>
        <population id="InputPop_XFpop0_Golgi_pop0_cell0_syn1_6" component="XFpop0_Golgi_pop0_cell0_syn1_6" size="1"/>
        <population id="InputPop_XFpop0_Golgi_pop0_cell0_syn1_7" component="XFpop0_Golgi_pop0_cell0_syn1_7" size="1"/>
        <projection id="InputProj_XFpop0_Golgi_pop0_cell0_syn0_0" postsynapticPopulation="Golgi_pop0" presynapticPopulation="InputPop_XFpop0_Golgi_pop0_cell0_syn0_0" synapse="PFSpikeSyn">
            <connection id="0" preCellId="../InputPop_XFpop0_Golgi_pop0_cell0_syn0_0[0]" postFractionAlong="0.668950" postSegmentId="6" postCellId="../Golgi_pop0/0/Golgi_10comp_13channels_2CaPools"/>
        </projection>
        <projection id="InputProj_XFpop0_Golgi_pop0_cell0_syn0_1" postsynapticPopulation="Golgi_pop0" presynapticPopulation="InputPop_XFpop0_Golgi_pop0_cell0_syn0_1" synapse="PFSpikeSyn">
            <connection id="0" preCellId="../InputPop_XFpop0_Golgi_pop0_cell0_syn0_1[0]" postFractionAlong="0.293512" postSegmentId="6" postCellId="../Golgi_pop0/0/Golgi_10comp_13channels_2CaPools"/>
        </projection>
        <projection id="InputProj_XFpop0_Golgi_pop0_cell0_syn0_2" postsynapticPopulation="Golgi_pop0" presynapticPopulation="InputPop_XFpop0_Golgi_pop0_cell0_syn0_2" synapse="PFSpikeSyn">
            <connection id="0" preCellId="../InputPop_XFpop0_Golgi_pop0_cell0_syn0_2[0]" postFractionAlong="0.399212" postSegmentId="7" postCellId="../Golgi_pop0/0/Golgi_10comp_13channels_2CaPools"/>
        </projection>
        <projection id="InputProj_XFpop0_Golgi_pop0_cell0_syn0_3" postsynapticPopulation="Golgi_pop0" presynapticPopulation="InputPop_XFpop0_Golgi_pop0_cell0_syn0_3" synapse="PFSpikeSyn">
            <connection id="0" preCellId="../InputPop_XFpop0_Golgi_pop0_cell0_syn0_3[0]" postFractionAlong="0.259443" postSegmentId="7" postCellId="../Golgi_pop0/0/Golgi_10comp_13channels_2CaPools"/>
        </projection>
        <projection id="InputProj_XFpop0_Golgi_pop0_cell0_syn0_4" postsynapticPopulation="Golgi_pop0" presynapticPopulation="InputPop_XFpop0_Golgi_pop0_cell0_syn0_4" synapse="PFSpikeSyn">
            <connection id="0" preCellId="../InputPop_XFpop0_Golgi_pop0_cell0_syn0_4[0]" postFractionAlong="0.519519" postSegmentId="6" postCellId="../Golgi_pop0/0/Golgi_10comp_13channels_2CaPools"/>
        </projection>
        <projection id="InputProj_XFpop0_Golgi_pop0_cell0_syn0_5" postsynapticPopulation="Golgi_pop0" presynapticPopulation="InputPop_XFpop0_Golgi_pop0_cell0_syn0_5" synapse="PFSpikeSyn">
            <connection id="0" preCellId="../InputPop_XFpop0_Golgi_pop0_cell0_syn0_5[0]" postFractionAlong="0.401772" postSegmentId="3" postCellId="../Golgi_pop0/0/Golgi_10comp_13channels_2CaPools"/>
        </projection>
        <projection id="InputProj_XFpop0_Golgi_pop0_cell0_syn0_6" postsynapticPopulation="Golgi_pop0" presynapticPopulation="InputPop_XFpop0_Golgi_pop0_cell0_syn0_6" synapse="PFSpikeSyn">
            <connection id="0" preCellId="../InputPop_XFpop0_Golgi_pop0_cell0_syn0_6[0]" postFractionAlong="0.581761" postSegmentId="8" postCellId="../Golgi_pop0/0/Golgi_10comp_13channels_2CaPools"/>
        </projection>
        <projection id="InputProj_XFpop0_Golgi_pop0_cell0_syn0_7" postsynapticPopulation="Golgi_pop0" presynapticPopulation="InputPop_XFpop0_Golgi_pop0_cell0_syn0_7" synapse="PFSpikeSyn">
            <connection id="0" preCellId="../InputPop_XFpop0_Golgi_pop0_cell0_syn0_7[0]" postFractionAlong="0.198161" postSegmentId="6" postCellId="../Golgi_pop0/0/Golgi_10comp_13channels_2CaPools"/>
        </projection>
        <projection id="InputProj_XFpop0_Golgi_pop0_cell0_syn1_0" postsynapticPopulation="Golgi_pop0" presynapticPopulation="InputPop_XFpop0_Golgi_pop0_cell0_syn1_0" synapse="PFSpikeSyn">
            <connection id="0" preCellId="../InputPop_XFpop0_Golgi_pop0_cell0_syn1_0[0]" postFractionAlong="0.419233" postSegmentId="9" postCellId="../Golgi_pop0/0/Golgi_10comp_13channels_2CaPools"/>
        </projection>
        <projection id="InputProj_XFpop0_Golgi_pop0_cell0_syn1_1" postsynapticPopulation="Golgi_pop0" presynapticPopulation="InputPop_XFpop0_Golgi_pop0_cell0_syn1_1" synapse="PFSpikeSyn">
            <connection id="0" preCellId="../InputPop_XFpop0_Golgi_pop0_cell0_syn1_1[0]" postFractionAlong="0.918996" postSegmentId="10" postCellId="../Golgi_pop0/0/Golgi_10comp_13channels_2CaPools"/>
        </projection>
        <projection id="InputProj_XFpop0_Golgi_pop0_cell0_syn1_2" postsynapticPopulation="Golgi_pop0" presynapticPopulation="InputPop_XFpop0_Golgi_pop0_cell0_syn1_2" synapse="PFSpikeSyn">
            <connection id="0" preCellId="../InputPop_XFpop0_Golgi_pop0_cell0_syn1_2[0]" postFractionAlong="0.924742" postSegmentId="9" postCellId="../Golgi_pop0/0/Golgi_10comp_13channels_2CaPools"/>
        </projection>
        <projection id="InputProj_XFpop0_Golgi_pop0_cell0_syn1_3" postsynapticPopulation="Golgi_pop0" presynapticPopulation="InputPop_XFpop0_Golgi_pop0_cell0_syn1_3" synapse="PFSpikeSyn">
            <connection id="0" preCellId="../InputPop_XFpop0_Golgi_pop0_cell0_syn1_3[0]" postFractionAlong="0.412630" postSegmentId="9" postCellId="../Golgi_pop0/0/Golgi_10comp_13channels_2CaPools"/>
        </projection>
        <projection id="InputProj_XFpop0_Golgi_pop0_cell0_syn1_4" postsynapticPopulation="Golgi_pop0" presynapticPopulation="InputPop_XFpop0_Golgi_pop0_cell0_syn1_4" synapse="PFSpikeSyn">
            <connection id="0" preCellId="../InputPop_XFpop0_Golgi_pop0_cell0_syn1_4[0]" postFractionAlong="0.420946" postSegmentId="9" postCellId="../Golgi_pop0/0/Golgi_10comp_13channels_2CaPools"/>
        </projection>
        <projection id="InputProj_XFpop0_Golgi_pop0_cell0_syn1_5" postsynapticPopulation="Golgi_pop0" presynapticPopulation="InputPop_XFpop0_Golgi_pop0_cell0_syn1_5" synapse="PFSpikeSyn">
            <connection id="0" preCellId="../InputPop_XFpop0_Golgi_pop0_cell0_syn1_5[0]" postFractionAlong="0.589471" postSegmentId="9" postCellId="../Golgi_pop0/0/Golgi_10comp_13channels_2CaPools"/>
        </projection>
        <projection id="InputProj_XFpop0_Golgi_pop0_cell0_syn1_6" postsynapticPopulation="Golgi_pop0" presynapticPopulation="InputPop_XFpop0_Golgi_pop0_cell0_syn1_6" synapse="PFSpikeSyn">
            <connection id="0" preCellId="../InputPop_XFpop0_Golgi_pop0_cell0_syn1_6[0]" postFractionAlong="0.688262" postSegmentId="10" postCellId="../Golgi_pop0/0/Golgi_10comp_13channels_2CaPools"/>
        </projection>
        <projection id="InputProj_XFpop0_Golgi_pop0_cell0_syn1_7" postsynapticPopulation="Golgi_pop0" presynapticPopulation="InputPop_XFpop0_Golgi_pop0_cell0_syn1_7" synapse="PFSpikeSyn">
            <connection id="0" preCellId="../InputPop_XFpop0_Golgi_pop0_cell0_syn1_7[0]" postFractionAlong="0.314900" postSegmentId="10" postCellId="../Golgi_pop0/0/Golgi_10comp_13channels_2CaPools"/>
        </projection>
        <electricalProjection id="proj0" postsynapticPopulation="Golgi_pop0" presynapticPopulation="Golgi_pop0">
            <electricalConnectionInstance id="0" synapse="gap_junction00" preFractionAlong="0.399212" preSegment="7" postFractionAlong="0.665755" postSegment="8" postCell="../Golgi_pop0/1/Golgi_10comp_13channels_2CaPools" preCell="../Golgi_pop0/0/Golgi_10comp_13channels_2CaPools"/>
            <electricalConnectionInstance id="1" synapse="gap_junction01" preFractionAlong="0.401772" preSegment="3" postFractionAlong="0.955800" postSegment="4" postCell="../Golgi_pop0/1/Golgi_10comp_13channels_2CaPools" preCell="../Golgi_pop0/0/Golgi_10comp_13channels_2CaPools"/>
            <electricalConnectionInstance id="2" synapse="gap_junction02" preFractionAlong="0.198161" preSegment="6" postFractionAlong="0.727000" postSegment="5" postCell="../Golgi_pop0/1/Golgi_10comp_13channels_2CaPools" preCell="../Golgi_pop0/0/Golgi_10comp_13channels_2CaPools"/>
            <electricalConnectionInstance id="3" synapse="gap_junction03" preFractionAlong="0.451232" preSegment="8" postFractionAlong="0.344985" postSegment="7" postCell="../Golgi_pop0/1/Golgi_10comp_13channels_2CaPools" preCell="../Golgi_pop0/0/Golgi_10comp_13channels_2CaPools"/>
            <electricalConnectionInstance id="4" synapse="gap_junction04" preFractionAlong="0.924742" preSegment="9" postFractionAlong="0.140842" postSegment="3" postCell="../Golgi_pop0/1/Golgi_10comp_13channels_2CaPools" preCell="../Golgi_pop0/0/Golgi_10comp_13channels_2CaPools"/>
            <electricalConnectionInstance id="5" synapse="gap_junction05" preFractionAlong="0.412630" preSegment="3" postFractionAlong="0.654848" postSegment="10" postCell="../Golgi_pop0/1/Golgi_10comp_13channels_2CaPools" preCell="../Golgi_pop0/0/Golgi_10comp_13channels_2CaPools"/>
            <electricalConnectionInstance id="6" synapse="gap_junction06" preFractionAlong="0.380853" preSegment="6" postFractionAlong="0.654762" postSegment="6" postCell="../Golgi_pop0/1/Golgi_10comp_13channels_2CaPools" preCell="../Golgi_pop0/0/Golgi_10comp_13channels_2CaPools"/>
            <electricalConnectionInstance id="7" synapse="gap_junction07" preFractionAlong="0.108449" preSegment="4" postFractionAlong="0.034692" postSegment="10" postCell="../Golgi_pop0/1/Golgi_10comp_13channels_2CaPools" preCell="../Golgi_pop0/0/Golgi_10comp_13channels_2CaPools"/>
        </electricalProjection>
        <inputList id="vrpop0_Golgi_pop0_0" component="Pulse_vrpop0_Golgi_pop0_0" population="Golgi_pop0">
            <input destination="synapses" id="0" target="../Golgi_pop0/0/Golgi_10comp_13channels_2CaPools"/>
        </inputList>
        <inputList id="vrpop0_Golgi_pop0_1" component="Pulse_vrpop0_Golgi_pop0_1" population="Golgi_pop0">
            <input destination="synapses" id="1" target="../Golgi_pop0/1/Golgi_10comp_13channels_2CaPools"/>
        </inputList>
    </network>
</neuroml>
