<Lems>

    <!--

        This LEMS file has been automatically generated using PyNeuroML v0.1.7 (libNeuroML v0.2.11)

     -->

    <!-- Specify which component to run -->
    <Target component="Golgi_V2012_test_import_diff_library_trial0"/>

    <!-- Include core NeuroML2 ComponentType definitions -->
    <Include file="Cells.xml"/>
    <Include file="Networks.xml"/>
    <Include file="Simulation.xml"/>

    <Include file="Golgi_V2012_test_import_diff_library_trial0.net.nml"/>
    <Include file="/../../../Golgi_10comp_13channels_2CaPools.cell.nml"/>
    <Include file="Golgi_Ca_HVA.channel.nml"/>
    <Include file="Golgi_Ca_LVA.channel.nml"/>
    <Include file="Golgi_CALC.nml"/>
    <Include file="Golgi_CALC_ca2.nml"/>
    <Include file="Golgi_hcn1f.channel.nml"/>
    <Include file="Golgi_hcn1s.channel.nml"/>
    <Include file="Golgi_hcn2f.channel.nml"/>
    <Include file="Golgi_hcn2s.channel.nml"/>
    <Include file="Golgi_KA.channel.nml"/>
    <Include file="Golgi_KC.channel.nml"/>
    <Include file="Golgi_Kslow.channel.nml"/>
    <Include file="Golgi_KAHP.channel.nml"/>
    <Include file="Golgi_KV.channel.nml"/>
    <Include file="LeakCond.channel.nml"/>
    <Include file="Golgi_NaP.channel.nml"/>
    <Include file="Golgi_NaR.channel.nml"/>
    <Include file="Golgi_NaT.channel.nml"/>
    <Include file="/../../../PFSpikeSyn.synapse.nml"/>

    <Simulation id="Golgi_V2012_test_import_diff_library_trial0" length="450ms" step="0.0005ms" target="Golgi_V2012_test_import_diff_library_trial0_network">

        <Display id="display_voltagesGolgi_pop0" title="Voltages Golgi_pop0" timeScale="1ms" xmin="-45.0" xmax="495.0" ymin="-75" ymax="50">
            <Line id="../Golgi_pop0/0: Vm" quantity="Golgi_pop0/0/Golgi_10comp_13channels_2CaPools/v" scale="1mV" color="#5257f7" timeScale="1ms"/>
            <Line id="../Golgi_pop0/1: Vm" quantity="Golgi_pop0/1/Golgi_10comp_13channels_2CaPools/v" scale="1mV" color="#fc3b4f" timeScale="1ms"/>
        </Display>

        <OutputFile id="Volts0_file0_0" fileName="/home/rokas/Golgi_network_2016/PyExamples/simulations/V2012_test_import_diff_library/sim0/Golgi_pop0_cell0.dat">
            <OutputColumn id="v0" quantity="Golgi_pop0/0/Golgi_10comp_13channels_2CaPools/v"/>
        </OutputFile>

        <OutputFile id="Volts0_file0_1" fileName="/home/rokas/Golgi_network_2016/PyExamples/simulations/V2012_test_import_diff_library/sim0/Golgi_pop0_cell1.dat">
            <OutputColumn id="v1" quantity="Golgi_pop0/1/Golgi_10comp_13channels_2CaPools/v"/>
        </OutputFile>

    </Simulation>

</Lems>
