<Lems>

    <!--

        This LEMS file has been automatically generated using PyNeuroML v0.1.7 (libNeuroML v0.2.11)

     -->

    <!-- Specify which component to run -->
    <Target component="Golgi_V2012_test_transient_plus_regional_trial0"/>

    <!-- Include core NeuroML2 ComponentType definitions -->
    <Include file="Cells.xml"/>
    <Include file="Networks.xml"/>
    <Include file="Simulation.xml"/>

    <Include file="Golgi_V2012_test_transient_plus_regional_trial0.net.nml"/>
    <Include file="/../../../Golgi_10comp_13channels_2CaPools.cell.nml"/>
    <Include file="Golgi_Ca_HVA.channel.nml"/>
    <Include file="Golgi_Ca_LVA.channel.nml"/>
    <Include file="Golgi_CALC.nml"/>
    <Include file="Golgi_CALC_ca2.nml"/>
    <Include file="Golgi_hcn1f.channel.nml"/>
    <Include file="Golgi_hcn1s.channel.nml"/>
    <Include file="Golgi_hcn2f.channel.nml"/>
    <Include file="Golgi_hcn2s.channel.nml"/>
    <Include file="Golgi_KA.channel.nml"/>
    <Include file="Golgi_KC.channel.nml"/>
    <Include file="Golgi_Kslow.channel.nml"/>
    <Include file="Golgi_KAHP.channel.nml"/>
    <Include file="Golgi_KV.channel.nml"/>
    <Include file="LeakCond.channel.nml"/>
    <Include file="Golgi_NaP.channel.nml"/>
    <Include file="Golgi_NaR.channel.nml"/>
    <Include file="Golgi_NaT.channel.nml"/>
    <Include file="/../../../PFSpikeSyn.synapse.nml"/>

    <Simulation id="Golgi_V2012_test_transient_plus_regional_trial0" length="450ms" step="0.0005ms" target="Golgi_V2012_test_transient_plus_regional_trial0_network">

        <Display id="display_voltagesGolgi_pop0" title="Voltages Golgi_pop0" timeScale="1ms" xmin="-45.0" xmax="495.0" ymin="-75" ymax="50">
            <Line id="../Golgi_pop0/16: Vm" quantity="Golgi_pop0/16/Golgi_10comp_13channels_2CaPools/v" scale="1mV" color="#403495" timeScale="1ms"/>
            <Line id="../Golgi_pop0/7: Vm" quantity="Golgi_pop0/7/Golgi_10comp_13channels_2CaPools/v" scale="1mV" color="#800517" timeScale="1ms"/>
            <Line id="../Golgi_pop0/18: Vm" quantity="Golgi_pop0/18/Golgi_10comp_13channels_2CaPools/v" scale="1mV" color="#f3e1a6" timeScale="1ms"/>
            <Line id="../Golgi_pop0/29: Vm" quantity="Golgi_pop0/29/Golgi_10comp_13channels_2CaPools/v" scale="1mV" color="#5ff1b5" timeScale="1ms"/>
            <Line id="../Golgi_pop0/41: Vm" quantity="Golgi_pop0/41/Golgi_10comp_13channels_2CaPools/v" scale="1mV" color="#6c0e0c" timeScale="1ms"/>
            <Line id="../Golgi_pop0/22: Vm" quantity="Golgi_pop0/22/Golgi_10comp_13channels_2CaPools/v" scale="1mV" color="#cc67e3" timeScale="1ms"/>
            <Line id="../Golgi_pop0/2: Vm" quantity="Golgi_pop0/2/Golgi_10comp_13channels_2CaPools/v" scale="1mV" color="#f4bfd9" timeScale="1ms"/>
            <Line id="../Golgi_pop0/31: Vm" quantity="Golgi_pop0/31/Golgi_10comp_13channels_2CaPools/v" scale="1mV" color="#b9b32a" timeScale="1ms"/>
            <Line id="../Golgi_pop0/28: Vm" quantity="Golgi_pop0/28/Golgi_10comp_13channels_2CaPools/v" scale="1mV" color="#b1964d" timeScale="1ms"/>
            <Line id="../Golgi_pop0/44: Vm" quantity="Golgi_pop0/44/Golgi_10comp_13channels_2CaPools/v" scale="1mV" color="#ff97b1" timeScale="1ms"/>
            <Line id="../Golgi_pop0/17: Vm" quantity="Golgi_pop0/17/Golgi_10comp_13channels_2CaPools/v" scale="1mV" color="#9815d9" timeScale="1ms"/>
            <Line id="../Golgi_pop0/21: Vm" quantity="Golgi_pop0/21/Golgi_10comp_13channels_2CaPools/v" scale="1mV" color="#7cddcd" timeScale="1ms"/>
            <Line id="../Golgi_pop0/45: Vm" quantity="Golgi_pop0/45/Golgi_10comp_13channels_2CaPools/v" scale="1mV" color="#fb5583" timeScale="1ms"/>
            <Line id="../Golgi_pop0/49: Vm" quantity="Golgi_pop0/49/Golgi_10comp_13channels_2CaPools/v" scale="1mV" color="#724c49" timeScale="1ms"/>
            <Line id="../Golgi_pop0/6: Vm" quantity="Golgi_pop0/6/Golgi_10comp_13channels_2CaPools/v" scale="1mV" color="#deb583" timeScale="1ms"/>
            <Line id="../Golgi_pop0/4: Vm" quantity="Golgi_pop0/4/Golgi_10comp_13channels_2CaPools/v" scale="1mV" color="#30fce5" timeScale="1ms"/>
            <Line id="../Golgi_pop0/42: Vm" quantity="Golgi_pop0/42/Golgi_10comp_13channels_2CaPools/v" scale="1mV" color="#6b134e" timeScale="1ms"/>
            <Line id="../Golgi_pop0/39: Vm" quantity="Golgi_pop0/39/Golgi_10comp_13channels_2CaPools/v" scale="1mV" color="#41594c" timeScale="1ms"/>
            <Line id="../Golgi_pop0/46: Vm" quantity="Golgi_pop0/46/Golgi_10comp_13channels_2CaPools/v" scale="1mV" color="#345661" timeScale="1ms"/>
            <Line id="../Golgi_pop0/43: Vm" quantity="Golgi_pop0/43/Golgi_10comp_13channels_2CaPools/v" scale="1mV" color="#73c074" timeScale="1ms"/>
        </Display>

        <OutputFile id="Volts0_file0_0" fileName="/home/rokas/Golgi_network_2016/PyExamples/simulations/V2012_test_transient_plus_regional/sim0/0_cell0.dat">
            <OutputColumn id="v0" quantity="Golgi_pop0/0/Golgi_10comp_13channels_2CaPools/v"/>
        </OutputFile>

        <OutputFile id="Volts0_file0_1" fileName="/home/rokas/Golgi_network_2016/PyExamples/simulations/V2012_test_transient_plus_regional/sim0/0_cell1.dat">
            <OutputColumn id="v1" quantity="Golgi_pop0/1/Golgi_10comp_13channels_2CaPools/v"/>
        </OutputFile>

        <OutputFile id="Volts0_file0_2" fileName="/home/rokas/Golgi_network_2016/PyExamples/simulations/V2012_test_transient_plus_regional/sim0/0_cell2.dat">
            <OutputColumn id="v2" quantity="Golgi_pop0/2/Golgi_10comp_13channels_2CaPools/v"/>
        </OutputFile>

        <OutputFile id="Volts0_file0_3" fileName="/home/rokas/Golgi_network_2016/PyExamples/simulations/V2012_test_transient_plus_regional/sim0/0_cell3.dat">
            <OutputColumn id="v3" quantity="Golgi_pop0/3/Golgi_10comp_13channels_2CaPools/v"/>
        </OutputFile>

        <OutputFile id="Volts0_file0_4" fileName="/home/rokas/Golgi_network_2016/PyExamples/simulations/V2012_test_transient_plus_regional/sim0/0_cell4.dat">
            <OutputColumn id="v4" quantity="Golgi_pop0/4/Golgi_10comp_13channels_2CaPools/v"/>
        </OutputFile>

        <OutputFile id="Volts0_file0_5" fileName="/home/rokas/Golgi_network_2016/PyExamples/simulations/V2012_test_transient_plus_regional/sim0/0_cell5.dat">
            <OutputColumn id="v5" quantity="Golgi_pop0/5/Golgi_10comp_13channels_2CaPools/v"/>
        </OutputFile>

        <OutputFile id="Volts0_file0_6" fileName="/home/rokas/Golgi_network_2016/PyExamples/simulations/V2012_test_transient_plus_regional/sim0/0_cell6.dat">
            <OutputColumn id="v6" quantity="Golgi_pop0/6/Golgi_10comp_13channels_2CaPools/v"/>
        </OutputFile>

        <OutputFile id="Volts0_file0_7" fileName="/home/rokas/Golgi_network_2016/PyExamples/simulations/V2012_test_transient_plus_regional/sim0/0_cell7.dat">
            <OutputColumn id="v7" quantity="Golgi_pop0/7/Golgi_10comp_13channels_2CaPools/v"/>
        </OutputFile>

        <OutputFile id="Volts0_file0_8" fileName="/home/rokas/Golgi_network_2016/PyExamples/simulations/V2012_test_transient_plus_regional/sim0/0_cell8.dat">
            <OutputColumn id="v8" quantity="Golgi_pop0/8/Golgi_10comp_13channels_2CaPools/v"/>
        </OutputFile>

        <OutputFile id="Volts0_file0_9" fileName="/home/rokas/Golgi_network_2016/PyExamples/simulations/V2012_test_transient_plus_regional/sim0/0_cell9.dat">
            <OutputColumn id="v9" quantity="Golgi_pop0/9/Golgi_10comp_13channels_2CaPools/v"/>
        </OutputFile>

        <OutputFile id="Volts0_file0_10" fileName="/home/rokas/Golgi_network_2016/PyExamples/simulations/V2012_test_transient_plus_regional/sim0/0_cell10.dat">
            <OutputColumn id="v10" quantity="Golgi_pop0/10/Golgi_10comp_13channels_2CaPools/v"/>
        </OutputFile>

        <OutputFile id="Volts0_file0_11" fileName="/home/rokas/Golgi_network_2016/PyExamples/simulations/V2012_test_transient_plus_regional/sim0/0_cell11.dat">
            <OutputColumn id="v11" quantity="Golgi_pop0/11/Golgi_10comp_13channels_2CaPools/v"/>
        </OutputFile>

        <OutputFile id="Volts0_file0_12" fileName="/home/rokas/Golgi_network_2016/PyExamples/simulations/V2012_test_transient_plus_regional/sim0/0_cell12.dat">
            <OutputColumn id="v12" quantity="Golgi_pop0/12/Golgi_10comp_13channels_2CaPools/v"/>
        </OutputFile>

        <OutputFile id="Volts0_file0_13" fileName="/home/rokas/Golgi_network_2016/PyExamples/simulations/V2012_test_transient_plus_regional/sim0/0_cell13.dat">
            <OutputColumn id="v13" quantity="Golgi_pop0/13/Golgi_10comp_13channels_2CaPools/v"/>
        </OutputFile>

        <OutputFile id="Volts0_file0_14" fileName="/home/rokas/Golgi_network_2016/PyExamples/simulations/V2012_test_transient_plus_regional/sim0/0_cell14.dat">
            <OutputColumn id="v14" quantity="Golgi_pop0/14/Golgi_10comp_13channels_2CaPools/v"/>
        </OutputFile>

        <OutputFile id="Volts0_file0_15" fileName="/home/rokas/Golgi_network_2016/PyExamples/simulations/V2012_test_transient_plus_regional/sim0/0_cell15.dat">
            <OutputColumn id="v15" quantity="Golgi_pop0/15/Golgi_10comp_13channels_2CaPools/v"/>
        </OutputFile>

        <OutputFile id="Volts0_file0_16" fileName="/home/rokas/Golgi_network_2016/PyExamples/simulations/V2012_test_transient_plus_regional/sim0/0_cell16.dat">
            <OutputColumn id="v16" quantity="Golgi_pop0/16/Golgi_10comp_13channels_2CaPools/v"/>
        </OutputFile>

        <OutputFile id="Volts0_file0_17" fileName="/home/rokas/Golgi_network_2016/PyExamples/simulations/V2012_test_transient_plus_regional/sim0/0_cell17.dat">
            <OutputColumn id="v17" quantity="Golgi_pop0/17/Golgi_10comp_13channels_2CaPools/v"/>
        </OutputFile>

        <OutputFile id="Volts0_file0_18" fileName="/home/rokas/Golgi_network_2016/PyExamples/simulations/V2012_test_transient_plus_regional/sim0/0_cell18.dat">
            <OutputColumn id="v18" quantity="Golgi_pop0/18/Golgi_10comp_13channels_2CaPools/v"/>
        </OutputFile>

        <OutputFile id="Volts0_file0_19" fileName="/home/rokas/Golgi_network_2016/PyExamples/simulations/V2012_test_transient_plus_regional/sim0/0_cell19.dat">
            <OutputColumn id="v19" quantity="Golgi_pop0/19/Golgi_10comp_13channels_2CaPools/v"/>
        </OutputFile>

        <OutputFile id="Volts0_file0_20" fileName="/home/rokas/Golgi_network_2016/PyExamples/simulations/V2012_test_transient_plus_regional/sim0/0_cell20.dat">
            <OutputColumn id="v20" quantity="Golgi_pop0/20/Golgi_10comp_13channels_2CaPools/v"/>
        </OutputFile>

        <OutputFile id="Volts0_file0_21" fileName="/home/rokas/Golgi_network_2016/PyExamples/simulations/V2012_test_transient_plus_regional/sim0/0_cell21.dat">
            <OutputColumn id="v21" quantity="Golgi_pop0/21/Golgi_10comp_13channels_2CaPools/v"/>
        </OutputFile>

        <OutputFile id="Volts0_file0_22" fileName="/home/rokas/Golgi_network_2016/PyExamples/simulations/V2012_test_transient_plus_regional/sim0/0_cell22.dat">
            <OutputColumn id="v22" quantity="Golgi_pop0/22/Golgi_10comp_13channels_2CaPools/v"/>
        </OutputFile>

        <OutputFile id="Volts0_file0_23" fileName="/home/rokas/Golgi_network_2016/PyExamples/simulations/V2012_test_transient_plus_regional/sim0/0_cell23.dat">
            <OutputColumn id="v23" quantity="Golgi_pop0/23/Golgi_10comp_13channels_2CaPools/v"/>
        </OutputFile>

        <OutputFile id="Volts0_file0_24" fileName="/home/rokas/Golgi_network_2016/PyExamples/simulations/V2012_test_transient_plus_regional/sim0/0_cell24.dat">
            <OutputColumn id="v24" quantity="Golgi_pop0/24/Golgi_10comp_13channels_2CaPools/v"/>
        </OutputFile>

        <OutputFile id="Volts0_file0_25" fileName="/home/rokas/Golgi_network_2016/PyExamples/simulations/V2012_test_transient_plus_regional/sim0/0_cell25.dat">
            <OutputColumn id="v25" quantity="Golgi_pop0/25/Golgi_10comp_13channels_2CaPools/v"/>
        </OutputFile>

        <OutputFile id="Volts0_file0_26" fileName="/home/rokas/Golgi_network_2016/PyExamples/simulations/V2012_test_transient_plus_regional/sim0/0_cell26.dat">
            <OutputColumn id="v26" quantity="Golgi_pop0/26/Golgi_10comp_13channels_2CaPools/v"/>
        </OutputFile>

        <OutputFile id="Volts0_file0_27" fileName="/home/rokas/Golgi_network_2016/PyExamples/simulations/V2012_test_transient_plus_regional/sim0/0_cell27.dat">
            <OutputColumn id="v27" quantity="Golgi_pop0/27/Golgi_10comp_13channels_2CaPools/v"/>
        </OutputFile>

        <OutputFile id="Volts0_file0_28" fileName="/home/rokas/Golgi_network_2016/PyExamples/simulations/V2012_test_transient_plus_regional/sim0/0_cell28.dat">
            <OutputColumn id="v28" quantity="Golgi_pop0/28/Golgi_10comp_13channels_2CaPools/v"/>
        </OutputFile>

        <OutputFile id="Volts0_file0_29" fileName="/home/rokas/Golgi_network_2016/PyExamples/simulations/V2012_test_transient_plus_regional/sim0/0_cell29.dat">
            <OutputColumn id="v29" quantity="Golgi_pop0/29/Golgi_10comp_13channels_2CaPools/v"/>
        </OutputFile>

        <OutputFile id="Volts0_file0_30" fileName="/home/rokas/Golgi_network_2016/PyExamples/simulations/V2012_test_transient_plus_regional/sim0/0_cell30.dat">
            <OutputColumn id="v30" quantity="Golgi_pop0/30/Golgi_10comp_13channels_2CaPools/v"/>
        </OutputFile>

        <OutputFile id="Volts0_file0_31" fileName="/home/rokas/Golgi_network_2016/PyExamples/simulations/V2012_test_transient_plus_regional/sim0/0_cell31.dat">
            <OutputColumn id="v31" quantity="Golgi_pop0/31/Golgi_10comp_13channels_2CaPools/v"/>
        </OutputFile>

        <OutputFile id="Volts0_file0_32" fileName="/home/rokas/Golgi_network_2016/PyExamples/simulations/V2012_test_transient_plus_regional/sim0/0_cell32.dat">
            <OutputColumn id="v32" quantity="Golgi_pop0/32/Golgi_10comp_13channels_2CaPools/v"/>
        </OutputFile>

        <OutputFile id="Volts0_file0_33" fileName="/home/rokas/Golgi_network_2016/PyExamples/simulations/V2012_test_transient_plus_regional/sim0/0_cell33.dat">
            <OutputColumn id="v33" quantity="Golgi_pop0/33/Golgi_10comp_13channels_2CaPools/v"/>
        </OutputFile>

        <OutputFile id="Volts0_file0_34" fileName="/home/rokas/Golgi_network_2016/PyExamples/simulations/V2012_test_transient_plus_regional/sim0/0_cell34.dat">
            <OutputColumn id="v34" quantity="Golgi_pop0/34/Golgi_10comp_13channels_2CaPools/v"/>
        </OutputFile>

        <OutputFile id="Volts0_file0_35" fileName="/home/rokas/Golgi_network_2016/PyExamples/simulations/V2012_test_transient_plus_regional/sim0/0_cell35.dat">
            <OutputColumn id="v35" quantity="Golgi_pop0/35/Golgi_10comp_13channels_2CaPools/v"/>
        </OutputFile>

        <OutputFile id="Volts0_file0_36" fileName="/home/rokas/Golgi_network_2016/PyExamples/simulations/V2012_test_transient_plus_regional/sim0/0_cell36.dat">
            <OutputColumn id="v36" quantity="Golgi_pop0/36/Golgi_10comp_13channels_2CaPools/v"/>
        </OutputFile>

        <OutputFile id="Volts0_file0_37" fileName="/home/rokas/Golgi_network_2016/PyExamples/simulations/V2012_test_transient_plus_regional/sim0/0_cell37.dat">
            <OutputColumn id="v37" quantity="Golgi_pop0/37/Golgi_10comp_13channels_2CaPools/v"/>
        </OutputFile>

        <OutputFile id="Volts0_file0_38" fileName="/home/rokas/Golgi_network_2016/PyExamples/simulations/V2012_test_transient_plus_regional/sim0/0_cell38.dat">
            <OutputColumn id="v38" quantity="Golgi_pop0/38/Golgi_10comp_13channels_2CaPools/v"/>
        </OutputFile>

        <OutputFile id="Volts0_file0_39" fileName="/home/rokas/Golgi_network_2016/PyExamples/simulations/V2012_test_transient_plus_regional/sim0/0_cell39.dat">
            <OutputColumn id="v39" quantity="Golgi_pop0/39/Golgi_10comp_13channels_2CaPools/v"/>
        </OutputFile>

        <OutputFile id="Volts0_file0_40" fileName="/home/rokas/Golgi_network_2016/PyExamples/simulations/V2012_test_transient_plus_regional/sim0/0_cell40.dat">
            <OutputColumn id="v40" quantity="Golgi_pop0/40/Golgi_10comp_13channels_2CaPools/v"/>
        </OutputFile>

        <OutputFile id="Volts0_file0_41" fileName="/home/rokas/Golgi_network_2016/PyExamples/simulations/V2012_test_transient_plus_regional/sim0/0_cell41.dat">
            <OutputColumn id="v41" quantity="Golgi_pop0/41/Golgi_10comp_13channels_2CaPools/v"/>
        </OutputFile>

        <OutputFile id="Volts0_file0_42" fileName="/home/rokas/Golgi_network_2016/PyExamples/simulations/V2012_test_transient_plus_regional/sim0/0_cell42.dat">
            <OutputColumn id="v42" quantity="Golgi_pop0/42/Golgi_10comp_13channels_2CaPools/v"/>
        </OutputFile>

        <OutputFile id="Volts0_file0_43" fileName="/home/rokas/Golgi_network_2016/PyExamples/simulations/V2012_test_transient_plus_regional/sim0/0_cell43.dat">
            <OutputColumn id="v43" quantity="Golgi_pop0/43/Golgi_10comp_13channels_2CaPools/v"/>
        </OutputFile>

        <OutputFile id="Volts0_file0_44" fileName="/home/rokas/Golgi_network_2016/PyExamples/simulations/V2012_test_transient_plus_regional/sim0/0_cell44.dat">
            <OutputColumn id="v44" quantity="Golgi_pop0/44/Golgi_10comp_13channels_2CaPools/v"/>
        </OutputFile>

        <OutputFile id="Volts0_file0_45" fileName="/home/rokas/Golgi_network_2016/PyExamples/simulations/V2012_test_transient_plus_regional/sim0/0_cell45.dat">
            <OutputColumn id="v45" quantity="Golgi_pop0/45/Golgi_10comp_13channels_2CaPools/v"/>
        </OutputFile>

        <OutputFile id="Volts0_file0_46" fileName="/home/rokas/Golgi_network_2016/PyExamples/simulations/V2012_test_transient_plus_regional/sim0/0_cell46.dat">
            <OutputColumn id="v46" quantity="Golgi_pop0/46/Golgi_10comp_13channels_2CaPools/v"/>
        </OutputFile>

        <OutputFile id="Volts0_file0_47" fileName="/home/rokas/Golgi_network_2016/PyExamples/simulations/V2012_test_transient_plus_regional/sim0/0_cell47.dat">
            <OutputColumn id="v47" quantity="Golgi_pop0/47/Golgi_10comp_13channels_2CaPools/v"/>
        </OutputFile>

        <OutputFile id="Volts0_file0_48" fileName="/home/rokas/Golgi_network_2016/PyExamples/simulations/V2012_test_transient_plus_regional/sim0/0_cell48.dat">
            <OutputColumn id="v48" quantity="Golgi_pop0/48/Golgi_10comp_13channels_2CaPools/v"/>
        </OutputFile>

        <OutputFile id="Volts0_file0_49" fileName="/home/rokas/Golgi_network_2016/PyExamples/simulations/V2012_test_transient_plus_regional/sim0/0_cell49.dat">
            <OutputColumn id="v49" quantity="Golgi_pop0/49/Golgi_10comp_13channels_2CaPools/v"/>
        </OutputFile>

    </Simulation>

</Lems>
