<Lems>

    <!--

        This LEMS file has been automatically generated using PyNeuroML v0.1.7 (libNeuroML v0.2.11)

     -->

    <!-- Specify which component to run -->
    <Target component="Golgi_test_10comp_cell_exp2_trial4"/>

    <!-- Include core NeuroML2 ComponentType definitions -->
    <Include file="Cells.xml"/>
    <Include file="Networks.xml"/>
    <Include file="Simulation.xml"/>

    <Include file="Golgi_test_10comp_cell_exp2_trial4.net.nml"/>
    <Include file="/../../../Golgi_10comp_3channels_1CaPool.cell.nml"/>
    <Include file="Golgi_NaT.channel.nml"/>
    <Include file="Golgi_KV.channel.nml"/>
    <Include file="LeakCond.channel.nml"/>

    <Simulation id="Golgi_test_10comp_cell_exp2_trial4" length="450ms" step="0.005ms" target="Golgi_test_10comp_cell_exp2_trial4_network">

        <Display id="display_voltagesGolgi_pop0" title="Voltages Golgi_pop0" timeScale="1ms" xmin="-45.0" xmax="495.0" ymin="-75" ymax="50">
            <Line id="../Golgi_pop0/0: Vm" quantity="Golgi_pop0/0/Golgi_10comp_3channels_1CaPool/v" scale="1mV" color="#8dc546" timeScale="1ms"/>
            <Line id="../Golgi_pop0/1: Vm" quantity="Golgi_pop0/1/Golgi_10comp_3channels_1CaPool/v" scale="1mV" color="#c9cfe3" timeScale="1ms"/>
            <Line id="../Golgi_pop0/2: Vm" quantity="Golgi_pop0/2/Golgi_10comp_3channels_1CaPool/v" scale="1mV" color="#feaad3" timeScale="1ms"/>
            <Line id="../Golgi_pop0/3: Vm" quantity="Golgi_pop0/3/Golgi_10comp_3channels_1CaPool/v" scale="1mV" color="#a3b96b" timeScale="1ms"/>
            <Line id="../Golgi_pop0/4: Vm" quantity="Golgi_pop0/4/Golgi_10comp_3channels_1CaPool/v" scale="1mV" color="#4d99f2" timeScale="1ms"/>
            <Line id="../Golgi_pop0/5: Vm" quantity="Golgi_pop0/5/Golgi_10comp_3channels_1CaPool/v" scale="1mV" color="#97a4de" timeScale="1ms"/>
            <Line id="../Golgi_pop0/6: Vm" quantity="Golgi_pop0/6/Golgi_10comp_3channels_1CaPool/v" scale="1mV" color="#228d8c" timeScale="1ms"/>
            <Line id="../Golgi_pop0/7: Vm" quantity="Golgi_pop0/7/Golgi_10comp_3channels_1CaPool/v" scale="1mV" color="#cb21c2" timeScale="1ms"/>
            <Line id="../Golgi_pop0/8: Vm" quantity="Golgi_pop0/8/Golgi_10comp_3channels_1CaPool/v" scale="1mV" color="#452351" timeScale="1ms"/>
            <Line id="../Golgi_pop0/9: Vm" quantity="Golgi_pop0/9/Golgi_10comp_3channels_1CaPool/v" scale="1mV" color="#6204ae" timeScale="1ms"/>
        </Display>

        <Display id="display_voltagesGolgi_pop1" title="Voltages Golgi_pop1" timeScale="1ms" xmin="-45.0" xmax="495.0" ymin="-75" ymax="50">
            <Line id="../Golgi_pop1/0: Vm" quantity="Golgi_pop1/0/Golgi_10comp_3channels_1CaPool/v" scale="1mV" color="#cb0d91" timeScale="1ms"/>
            <Line id="../Golgi_pop1/1: Vm" quantity="Golgi_pop1/1/Golgi_10comp_3channels_1CaPool/v" scale="1mV" color="#83f5ab" timeScale="1ms"/>
            <Line id="../Golgi_pop1/2: Vm" quantity="Golgi_pop1/2/Golgi_10comp_3channels_1CaPool/v" scale="1mV" color="#de2220" timeScale="1ms"/>
            <Line id="../Golgi_pop1/3: Vm" quantity="Golgi_pop1/3/Golgi_10comp_3channels_1CaPool/v" scale="1mV" color="#d36ccf" timeScale="1ms"/>
            <Line id="../Golgi_pop1/4: Vm" quantity="Golgi_pop1/4/Golgi_10comp_3channels_1CaPool/v" scale="1mV" color="#b66d26" timeScale="1ms"/>
            <Line id="../Golgi_pop1/5: Vm" quantity="Golgi_pop1/5/Golgi_10comp_3channels_1CaPool/v" scale="1mV" color="#e4de95" timeScale="1ms"/>
            <Line id="../Golgi_pop1/6: Vm" quantity="Golgi_pop1/6/Golgi_10comp_3channels_1CaPool/v" scale="1mV" color="#dd51eb" timeScale="1ms"/>
            <Line id="../Golgi_pop1/7: Vm" quantity="Golgi_pop1/7/Golgi_10comp_3channels_1CaPool/v" scale="1mV" color="#bd867b" timeScale="1ms"/>
            <Line id="../Golgi_pop1/8: Vm" quantity="Golgi_pop1/8/Golgi_10comp_3channels_1CaPool/v" scale="1mV" color="#6b6b0d" timeScale="1ms"/>
            <Line id="../Golgi_pop1/9: Vm" quantity="Golgi_pop1/9/Golgi_10comp_3channels_1CaPool/v" scale="1mV" color="#eb7dca" timeScale="1ms"/>
        </Display>

        <OutputFile id="Volts0_file0_0" fileName="simulations/test_10comp_cell_exp2/sim4/Golgi_pop0_cell0.dat">
            <OutputColumn id="v0" quantity="Golgi_pop0/0/Golgi_10comp_3channels_1CaPool/v"/>
        </OutputFile>

        <OutputFile id="Volts0_file0_1" fileName="simulations/test_10comp_cell_exp2/sim4/Golgi_pop0_cell1.dat">
            <OutputColumn id="v1" quantity="Golgi_pop0/1/Golgi_10comp_3channels_1CaPool/v"/>
        </OutputFile>

        <OutputFile id="Volts0_file0_2" fileName="simulations/test_10comp_cell_exp2/sim4/Golgi_pop0_cell2.dat">
            <OutputColumn id="v2" quantity="Golgi_pop0/2/Golgi_10comp_3channels_1CaPool/v"/>
        </OutputFile>

        <OutputFile id="Volts0_file0_3" fileName="simulations/test_10comp_cell_exp2/sim4/Golgi_pop0_cell3.dat">
            <OutputColumn id="v3" quantity="Golgi_pop0/3/Golgi_10comp_3channels_1CaPool/v"/>
        </OutputFile>

        <OutputFile id="Volts0_file0_4" fileName="simulations/test_10comp_cell_exp2/sim4/Golgi_pop0_cell4.dat">
            <OutputColumn id="v4" quantity="Golgi_pop0/4/Golgi_10comp_3channels_1CaPool/v"/>
        </OutputFile>

        <OutputFile id="Volts0_file0_5" fileName="simulations/test_10comp_cell_exp2/sim4/Golgi_pop0_cell5.dat">
            <OutputColumn id="v5" quantity="Golgi_pop0/5/Golgi_10comp_3channels_1CaPool/v"/>
        </OutputFile>

        <OutputFile id="Volts0_file0_6" fileName="simulations/test_10comp_cell_exp2/sim4/Golgi_pop0_cell6.dat">
            <OutputColumn id="v6" quantity="Golgi_pop0/6/Golgi_10comp_3channels_1CaPool/v"/>
        </OutputFile>

        <OutputFile id="Volts0_file0_7" fileName="simulations/test_10comp_cell_exp2/sim4/Golgi_pop0_cell7.dat">
            <OutputColumn id="v7" quantity="Golgi_pop0/7/Golgi_10comp_3channels_1CaPool/v"/>
        </OutputFile>

        <OutputFile id="Volts0_file0_8" fileName="simulations/test_10comp_cell_exp2/sim4/Golgi_pop0_cell8.dat">
            <OutputColumn id="v8" quantity="Golgi_pop0/8/Golgi_10comp_3channels_1CaPool/v"/>
        </OutputFile>

        <OutputFile id="Volts0_file0_9" fileName="simulations/test_10comp_cell_exp2/sim4/Golgi_pop0_cell9.dat">
            <OutputColumn id="v9" quantity="Golgi_pop0/9/Golgi_10comp_3channels_1CaPool/v"/>
        </OutputFile>

        <OutputFile id="Volts1_file0_0" fileName="simulations/test_10comp_cell_exp2/sim4/Golgi_pop1_cell0.dat">
            <OutputColumn id="v0" quantity="Golgi_pop1/0/Golgi_10comp_3channels_1CaPool/v"/>
        </OutputFile>

        <OutputFile id="Volts1_file0_1" fileName="simulations/test_10comp_cell_exp2/sim4/Golgi_pop1_cell1.dat">
            <OutputColumn id="v1" quantity="Golgi_pop1/1/Golgi_10comp_3channels_1CaPool/v"/>
        </OutputFile>

        <OutputFile id="Volts1_file0_2" fileName="simulations/test_10comp_cell_exp2/sim4/Golgi_pop1_cell2.dat">
            <OutputColumn id="v2" quantity="Golgi_pop1/2/Golgi_10comp_3channels_1CaPool/v"/>
        </OutputFile>

        <OutputFile id="Volts1_file0_3" fileName="simulations/test_10comp_cell_exp2/sim4/Golgi_pop1_cell3.dat">
            <OutputColumn id="v3" quantity="Golgi_pop1/3/Golgi_10comp_3channels_1CaPool/v"/>
        </OutputFile>

        <OutputFile id="Volts1_file0_4" fileName="simulations/test_10comp_cell_exp2/sim4/Golgi_pop1_cell4.dat">
            <OutputColumn id="v4" quantity="Golgi_pop1/4/Golgi_10comp_3channels_1CaPool/v"/>
        </OutputFile>

        <OutputFile id="Volts1_file0_5" fileName="simulations/test_10comp_cell_exp2/sim4/Golgi_pop1_cell5.dat">
            <OutputColumn id="v5" quantity="Golgi_pop1/5/Golgi_10comp_3channels_1CaPool/v"/>
        </OutputFile>

        <OutputFile id="Volts1_file0_6" fileName="simulations/test_10comp_cell_exp2/sim4/Golgi_pop1_cell6.dat">
            <OutputColumn id="v6" quantity="Golgi_pop1/6/Golgi_10comp_3channels_1CaPool/v"/>
        </OutputFile>

        <OutputFile id="Volts1_file0_7" fileName="simulations/test_10comp_cell_exp2/sim4/Golgi_pop1_cell7.dat">
            <OutputColumn id="v7" quantity="Golgi_pop1/7/Golgi_10comp_3channels_1CaPool/v"/>
        </OutputFile>

        <OutputFile id="Volts1_file0_8" fileName="simulations/test_10comp_cell_exp2/sim4/Golgi_pop1_cell8.dat">
            <OutputColumn id="v8" quantity="Golgi_pop1/8/Golgi_10comp_3channels_1CaPool/v"/>
        </OutputFile>

        <OutputFile id="Volts1_file0_9" fileName="simulations/test_10comp_cell_exp2/sim4/Golgi_pop1_cell9.dat">
            <OutputColumn id="v9" quantity="Golgi_pop1/9/Golgi_10comp_3channels_1CaPool/v"/>
        </OutputFile>

    </Simulation>

</Lems>
