<neuroml xmlns="http://www.neuroml.org/schema/neuroml2"  xmlns:xs="http://www.w3.org/2001/XMLSchema" xmlns:xsi="http://www.w3.org/2001/XMLSchema-instance" xsi:schemaLocation="http://www.neuroml.org/schema/neuroml2 https://raw.github.com/NeuroML/NeuroML2/development/Schemas/NeuroML2/NeuroML_v2beta4.xsd" id="Golgi_test_V2010_exp1_10cells_trial0">
    <include href="../../../Golgi_5comp_3channels_1CaPool.cell.nml"></include>
    <gapJunction id="gap_junction00" conductance="0.346732nS"/>
    <gapJunction id="gap_junction01" conductance="0.445960nS"/>
    <gapJunction id="gap_junction02" conductance="0.870214nS"/>
    <gapJunction id="gap_junction03" conductance="1.505912nS"/>
    <gapJunction id="gap_junction04" conductance="0.506050nS"/>
    <gapJunction id="gap_junction05" conductance="0.849929nS"/>
    <gapJunction id="gap_junction06" conductance="0.854794nS"/>
    <gapJunction id="gap_junction07" conductance="1.657956nS"/>
    <gapJunction id="gap_junction08" conductance="0.987063nS"/>
    <gapJunction id="gap_junction09" conductance="0.654329nS"/>
    <gapJunction id="gap_junction010" conductance="0.425174nS"/>
    <gapJunction id="gap_junction011" conductance="1.222947nS"/>
    <gapJunction id="gap_junction012" conductance="1.130436nS"/>
    <gapJunction id="gap_junction013" conductance="0.400996nS"/>
    <gapJunction id="gap_junction014" conductance="0.181793nS"/>
    <gapJunction id="gap_junction015" conductance="0.444457nS"/>
    <gapJunction id="gap_junction016" conductance="0.921294nS"/>
    <gapJunction id="gap_junction017" conductance="0.734727nS"/>
    <gapJunction id="gap_junction018" conductance="0.721921nS"/>
    <gapJunction id="gap_junction019" conductance="0.358984nS"/>
    <gapJunction id="gap_junction020" conductance="1.579041nS"/>
    <gapJunction id="gap_junction021" conductance="0.970377nS"/>
    <gapJunction id="gap_junction022" conductance="0.691387nS"/>
    <gapJunction id="gap_junction023" conductance="0.489773nS"/>
    <gapJunction id="gap_junction024" conductance="1.144482nS"/>
    <gapJunction id="gap_junction025" conductance="1.344855nS"/>
    <gapJunction id="gap_junction026" conductance="0.535891nS"/>
    <gapJunction id="gap_junction027" conductance="0.854582nS"/>
    <gapJunction id="gap_junction028" conductance="0.280757nS"/>
    <gapJunction id="gap_junction029" conductance="1.080696nS"/>
    <gapJunction id="gap_junction030" conductance="0.947275nS"/>
    <gapJunction id="gap_junction031" conductance="0.385121nS"/>
    <gapJunction id="gap_junction032" conductance="0.731246nS"/>
    <gapJunction id="gap_junction033" conductance="0.578908nS"/>
    <gapJunction id="gap_junction034" conductance="0.316771nS"/>
    <gapJunction id="gap_junction035" conductance="0.505483nS"/>
    <pulseGenerator id="Pulse_PulsePop0_Golgi_pop0_0" delay="20.000000ms" duration="200.000000ms" amplitude="0.000040uA"/>
    <network id="Golgi_test_V2010_exp1_10cells_trial0_network" type="networkWithTemperature" temperature="23 degC">
        <notes>Parameter arrays for building this network are listed below:
Cell distribution parameters:
{'yDim': 80, 'popID': 'Golgi_pop0', 'zDim': 80, 'xDim': 80, 'distributionModel': 'explicit_cell_numbers', 'minimal_distance': 30, 'distanceModel': 'random_minimal_distance'}
Cell population parameters:
Cell population parameters for Golgi_pop0:
{'popID': 'Golgi_pop0', 'cellType': 'Golgi_5comp_3channels_1CaPool', 'size': 10}
Cell connectivity parameters:
{'testingConductanceScale': 1, 'electricalConnModel': 'Vervaeke_2010_based', 'postPoptargetGroup': {'segmentGroupList': ['dendrite_group'], 'segmentGroupProbabilities': {'dendrite_group': 1}}, 'units': 'nS', 'normalizeConductances': False, 'spatialScale': 1, 'prePopID': 'Golgi_pop0', 'postPopID': 'Golgi_pop0', 'prePoptargetGroup': {'segmentGroupList': ['dendrite_group'], 'segmentGroupProbabilities': {'dendrite_group': 1}}}
Input parameters for a list of populations:
Input group parameters for Golgi_pop0:
{'ampUnits': 'uA', 'testingModel': 'pulseGenerators', 'timeUnits': 'ms', 'inputLabel': 'PulsePop0', 'inputModel': 'testing', 'pulseParameters': [{'delay': 20, 'duration': 200, 'amplitude': 4e-05}], 'cellFractionToTarget': 0.5}
</notes>
        <population id="Golgi_pop0" type="populationList" component="Golgi_5comp_3channels_1CaPool" size="10">
            <instance id="0">
                <location y="55.865330847429568" x="29.579511835827319" z="74.788886031585577"/>
            </instance>
            <instance id="1">
                <location y="4.37425664081565" x="64.510192749039405" z="5.606817601132263"/>
            </instance>
            <instance id="2">
                <location y="4.30270692193818" x="30.701316768285942" z="10.173281492645794"/>
            </instance>
            <instance id="3">
                <location y="57.642619108595319" x="25.618981688117806" z="18.621100583364196"/>
            </instance>
            <instance id="4">
                <location y="48.042008738194262" x="5.049072185884889" z="47.088177979130855"/>
            </instance>
            <instance id="5">
                <location y="46.307016344281408" x="76.523734901750927" z="13.855142667063634"/>
            </instance>
            <instance id="6">
                <location y="9.687317051178388" x="53.594788526332778" z="51.044364208531157"/>
            </instance>
            <instance id="7">
                <location y="6.02780954178666" x="2.992224771905265" z="67.169062779017082"/>
            </instance>
            <instance id="8">
                <location y="77.586319589169108" x="2.1594627194452" z="75.823902383397467"/>
            </instance>
            <instance id="9">
                <location y="67.779820428073663" x="76.861919367832044" z="57.425990997733798"/>
            </instance>
        </population>
        <electricalProjection id="proj0" postsynapticPopulation="Golgi_pop0" presynapticPopulation="Golgi_pop0">
            <electricalConnectionInstance id="0" synapse="gap_junction00" preFractionAlong="0.054678" preSegment="5" postFractionAlong="0.127166" postSegment="1" postCell="../Golgi_pop0/1/Golgi_5comp_3channels_1CaPool" preCell="../Golgi_pop0/0/Golgi_5comp_3channels_1CaPool"/>
            <electricalConnectionInstance id="1" synapse="gap_junction01" preFractionAlong="0.600525" preSegment="1" postFractionAlong="0.173189" postSegment="2" postCell="../Golgi_pop0/2/Golgi_5comp_3channels_1CaPool" preCell="../Golgi_pop0/0/Golgi_5comp_3channels_1CaPool"/>
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        </electricalProjection>
        <inputList id="PulsePop0_Golgi_pop0_0" component="Pulse_PulsePop0_Golgi_pop0_0" population="Golgi_pop0">
            <input destination="synapses" id="3" target="../Golgi_pop0/3/Golgi_5comp_3channels_1CaPool"/>
            <input destination="synapses" id="6" target="../Golgi_pop0/6/Golgi_5comp_3channels_1CaPool"/>
            <input destination="synapses" id="7" target="../Golgi_pop0/7/Golgi_5comp_3channels_1CaPool"/>
            <input destination="synapses" id="5" target="../Golgi_pop0/5/Golgi_5comp_3channels_1CaPool"/>
            <input destination="synapses" id="0" target="../Golgi_pop0/0/Golgi_5comp_3channels_1CaPool"/>
        </inputList>
    </network>
</neuroml>
