<neuroml xmlns="http://www.neuroml.org/schema/neuroml2"  xmlns:xs="http://www.w3.org/2001/XMLSchema" xmlns:xsi="http://www.w3.org/2001/XMLSchema-instance" xsi:schemaLocation="http://www.neuroml.org/schema/neuroml2 https://raw.github.com/NeuroML/NeuroML2/development/Schemas/NeuroML2/NeuroML_v2beta4.xsd" id="Golgi_test_V2010_exp2_trial1">
    <include href="/../../../Golgi_5comp_3channels_1CaPool.cell.nml"></include>
    <gapJunction id="gap_junction00" conductance="0.540134nS"/>
    <gapJunction id="gap_junction01" conductance="0.753107nS"/>
    <gapJunction id="gap_junction02" conductance="0.581529nS"/>
    <gapJunction id="gap_junction03" conductance="0.592923nS"/>
    <gapJunction id="gap_junction04" conductance="0.650518nS"/>
    <gapJunction id="gap_junction05" conductance="0.575093nS"/>
    <gapJunction id="gap_junction06" conductance="0.715595nS"/>
    <gapJunction id="gap_junction07" conductance="0.575197nS"/>
    <gapJunction id="gap_junction08" conductance="0.596319nS"/>
    <gapJunction id="gap_junction09" conductance="0.600155nS"/>
    <gapJunction id="gap_junction010" conductance="0.626803nS"/>
    <gapJunction id="gap_junction011" conductance="0.658520nS"/>
    <gapJunction id="gap_junction012" conductance="0.670754nS"/>
    <gapJunction id="gap_junction013" conductance="0.753895nS"/>
    <gapJunction id="gap_junction014" conductance="0.631052nS"/>
    <gapJunction id="gap_junction015" conductance="0.727646nS"/>
    <gapJunction id="gap_junction016" conductance="0.511584nS"/>
    <gapJunction id="gap_junction017" conductance="0.771162nS"/>
    <gapJunction id="gap_junction018" conductance="0.660080nS"/>
    <gapJunction id="gap_junction019" conductance="0.677327nS"/>
    <gapJunction id="gap_junction020" conductance="0.722517nS"/>
    <gapJunction id="gap_junction021" conductance="0.775864nS"/>
    <gapJunction id="gap_junction022" conductance="0.765382nS"/>
    <gapJunction id="gap_junction023" conductance="0.689314nS"/>
    <gapJunction id="gap_junction024" conductance="0.588881nS"/>
    <gapJunction id="gap_junction025" conductance="0.760993nS"/>
    <gapJunction id="gap_junction026" conductance="0.770051nS"/>
    <gapJunction id="gap_junction027" conductance="0.679608nS"/>
    <gapJunction id="gap_junction028" conductance="0.704551nS"/>
    <gapJunction id="gap_junction029" conductance="0.857115nS"/>
    <gapJunction id="gap_junction030" conductance="0.572928nS"/>
    <gapJunction id="gap_junction031" conductance="0.741730nS"/>
    <gapJunction id="gap_junction032" conductance="0.800989nS"/>
    <gapJunction id="gap_junction033" conductance="0.816720nS"/>
    <gapJunction id="gap_junction034" conductance="0.807974nS"/>
    <gapJunction id="gap_junction035" conductance="0.597416nS"/>
    <gapJunction id="gap_junction036" conductance="0.658416nS"/>
    <gapJunction id="gap_junction037" conductance="0.815179nS"/>
    <gapJunction id="gap_junction038" conductance="0.642217nS"/>
    <gapJunction id="gap_junction039" conductance="0.696347nS"/>
    <gapJunction id="gap_junction040" conductance="0.576917nS"/>
    <gapJunction id="gap_junction041" conductance="0.699359nS"/>
    <gapJunction id="gap_junction042" conductance="0.645187nS"/>
    <gapJunction id="gap_junction043" conductance="0.608536nS"/>
    <gapJunction id="gap_junction044" conductance="0.680206nS"/>
    <gapJunction id="gap_junction045" conductance="0.650745nS"/>
    <gapJunction id="gap_junction046" conductance="0.548471nS"/>
    <gapJunction id="gap_junction047" conductance="0.610895nS"/>
    <gapJunction id="gap_junction048" conductance="0.552471nS"/>
    <gapJunction id="gap_junction049" conductance="0.705573nS"/>
    <pulseGenerator id="Input_Golgi_pop0_0" delay="20.000000ms" duration="200.000000ms" amplitude="0.000040uA"/>
    <pulseGenerator id="Input_Golgi_pop1_0" delay="0.000000ms" duration="100.000000ms" amplitude="0.000040uA"/>
    <network id="Golgi_test_V2010_exp2_trial1_network" type="networkWithTemperature" temperature="23 degC">
        <notes>Parameter arrays for building this network are listed below:
Cell distribution parameters:
{'distanceModel': 'random_no_overlap', 'popID': 'Golgi_pop0', 'zDim': 100, 'xDim': 100, 'distributionModel': 'explicit_cell_numbers', 'yDim': 100}
{'distanceModel': 'random_no_overlap', 'popID': 'Golgi_pop1', 'zDim': 100, 'xDim': 100, 'distributionModel': 'explicit_cell_numbers', 'yDim': 100}
Cell population parameters:
Cell population parameters for Golgi_pop0:
{'popID': 'Golgi_pop0', 'cellType': 'Golgi_5comp_3channels_1CaPool', 'size': 10}
Cell population parameters for Golgi_pop1:
{'popID': 'Golgi_pop1', 'cellType': 'Golgi_5comp_3channels_1CaPool', 'size': 10}
Cell connectivity parameters:
{'testingConductanceScale': 1, 'maximalConnDistance': 200, 'electricalConnModel': 'Vervaeke_2010_based', 'postPoptargetGroup': {'segmentGroupList': ['dendrite_group'], 'segmentGroupProbabilities': [1]}, 'units': 'nS', 'normalizeConductances': True, 'spatialScale': 20, 'prePopID': 'Golgi_pop0', 'postPopID': 'Golgi_pop1', 'prePoptargetGroup': {'segmentGroupList': ['dendrite_group'], 'segmentGroupProbabilities': [1]}}
Input parameters for a list of populations:
Input group parameters for Golgi_pop0:
{'ampUnits': 'uA', 'testingModel': 'pulseGenerators', 'timeUnits': 'ms', 'inputModel': 'testing', 'pulseParameters': [{'delay': 20, 'duration': 200, 'amplitude': 4e-05}], 'cellFractionToTarget': 0.5}
Input group parameters for Golgi_pop1:
{'ampUnits': 'uA', 'testingModel': 'pulseGenerators', 'timeUnits': 'ms', 'inputModel': 'testing', 'pulseParameters': [{'delay': 0, 'duration': 100, 'amplitude': 4e-05}], 'cellFractionToTarget': 0.5}
</notes>
        <population id="Golgi_pop0" type="populationList" component="Golgi_5comp_3channels_1CaPool" size="10">
            <instance id="0">
                <location y="94.55762122880958" x="82.269831972896796" z="40.474995827671513"/>
            </instance>
            <instance id="1">
                <location y="89.957793910959722" x="3.955438855384186" z="36.005777339623677"/>
            </instance>
            <instance id="2">
                <location y="25.416532892526877" x="33.872200640043438" z="80.520313583730044"/>
            </instance>
            <instance id="3">
                <location y="60.093965727204854" x="6.653987208482892" z="6.605057039438156"/>
            </instance>
            <instance id="4">
                <location y="38.425037160132248" x="22.621447191588029" z="58.347682171323477"/>
            </instance>
            <instance id="5">
                <location y="86.767404171256047" x="44.220064012783368" z="39.487100672283269"/>
            </instance>
            <instance id="6">
                <location y="40.590421533099317" x="58.52411047360043" z="81.823016344942133"/>
            </instance>
            <instance id="7">
                <location y="51.439662687407704" x="36.259251344987" z="90.77821686476878"/>
            </instance>
            <instance id="8">
                <location y="89.121436335186104" x="62.048912752924032" z="70.501864931579647"/>
            </instance>
            <instance id="9">
                <location y="23.215387709197721" x="75.864294580283726" z="62.217926967374005"/>
            </instance>
        </population>
        <population id="Golgi_pop1" type="populationList" component="Golgi_5comp_3channels_1CaPool" size="10">
            <instance id="0">
                <location y="6.874011611981167" x="7.950478916041281" z="67.195261639413573"/>
            </instance>
            <instance id="1">
                <location y="44.051386800101092" x="87.370754571419752" z="46.633235689026996"/>
            </instance>
            <instance id="2">
                <location y="1.498554262316942" x="39.683698708386714" z="40.83890896994096"/>
            </instance>
            <instance id="3">
                <location y="15.529085025463329" x="36.091968596265822" z="4.608010909348392"/>
            </instance>
            <instance id="4">
                <location y="30.680527952097826" x="45.899481729131395" z="10.232211191918983"/>
            </instance>
            <instance id="5">
                <location y="17.745556893856296" x="12.654511117972699" z="26.003107540862747"/>
            </instance>
            <instance id="6">
                <location y="69.847986330772045" x="35.514001773671268" z="70.565845009122853"/>
            </instance>
            <instance id="7">
                <location y="7.029914937249204" x="25.047922825406342" z="36.956684265115726"/>
            </instance>
            <instance id="8">
                <location y="35.356066254790072" x="8.594977415967431" z="18.096489444111686"/>
            </instance>
            <instance id="9">
                <location y="2.858129708106194" x="95.22168069928351" z="5.203990272150739"/>
            </instance>
        </population>
        <electricalProjection id="proj0" postsynapticPopulation="Golgi_pop1" presynapticPopulation="Golgi_pop0">
            <electricalConnectionInstance id="0" synapse="gap_junction00" preFractionAlong="0.899578" preSegment="1" postFractionAlong="0.805203" postSegment="1" postCell="../Golgi_pop1/0/Golgi_5comp_3channels_1CaPool" preCell="../Golgi_pop0/0/Golgi_5comp_3channels_1CaPool"/>
            <electricalConnectionInstance id="1" synapse="gap_junction01" preFractionAlong="0.384250" preSegment="1" postFractionAlong="0.394871" postSegment="5" postCell="../Golgi_pop1/1/Golgi_5comp_3channels_1CaPool" preCell="../Golgi_pop0/0/Golgi_5comp_3channels_1CaPool"/>
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        </electricalProjection>
        <inputList id="Input_list_Golgi_pop0_0" component="Input_Golgi_pop0_0" population="Golgi_pop0">
            <input destination="synapses" id="8" target="../Golgi_pop0/8/Golgi_5comp_3channels_1CaPool"/>
            <input destination="synapses" id="9" target="../Golgi_pop0/9/Golgi_5comp_3channels_1CaPool"/>
            <input destination="synapses" id="3" target="../Golgi_pop0/3/Golgi_5comp_3channels_1CaPool"/>
            <input destination="synapses" id="0" target="../Golgi_pop0/0/Golgi_5comp_3channels_1CaPool"/>
            <input destination="synapses" id="5" target="../Golgi_pop0/5/Golgi_5comp_3channels_1CaPool"/>
        </inputList>
        <inputList id="Input_list_Golgi_pop1_0" component="Input_Golgi_pop1_0" population="Golgi_pop1">
            <input destination="synapses" id="8" target="../Golgi_pop1/8/Golgi_5comp_3channels_1CaPool"/>
            <input destination="synapses" id="9" target="../Golgi_pop1/9/Golgi_5comp_3channels_1CaPool"/>
            <input destination="synapses" id="3" target="../Golgi_pop1/3/Golgi_5comp_3channels_1CaPool"/>
            <input destination="synapses" id="0" target="../Golgi_pop1/0/Golgi_5comp_3channels_1CaPool"/>
            <input destination="synapses" id="5" target="../Golgi_pop1/5/Golgi_5comp_3channels_1CaPool"/>
        </inputList>
    </network>
</neuroml>
