<Lems>

    <!--

        This LEMS file has been automatically generated using PyNeuroML v0.1.7 (libNeuroML v0.2.11)

     -->

    <!-- Specify which component to run -->
    <Target component="Golgi_test_density_2_trial0"/>

    <!-- Include core NeuroML2 ComponentType definitions -->
    <Include file="Cells.xml"/>
    <Include file="Networks.xml"/>
    <Include file="Simulation.xml"/>

    <Include file="Golgi_test_density_2_trial0.net.nml"/>
    <Include file="../../../Golgi_10comp_13channels_2CaPools.cell.nml"/>
    <Include file="Golgi_Ca_HVA.channel.nml"/>
    <Include file="Golgi_Ca_LVA.channel.nml"/>
    <Include file="Golgi_CALC.nml"/>
    <Include file="Golgi_CALC_ca2.nml"/>
    <Include file="Golgi_hcn1f.channel.nml"/>
    <Include file="Golgi_hcn1s.channel.nml"/>
    <Include file="Golgi_hcn2f.channel.nml"/>
    <Include file="Golgi_hcn2s.channel.nml"/>
    <Include file="Golgi_KA.channel.nml"/>
    <Include file="Golgi_KC.channel.nml"/>
    <Include file="Golgi_Kslow.channel.nml"/>
    <Include file="Golgi_KAHP.channel.nml"/>
    <Include file="Golgi_KV.channel.nml"/>
    <Include file="LeakCond.channel.nml"/>
    <Include file="Golgi_NaP.channel.nml"/>
    <Include file="Golgi_NaR.channel.nml"/>
    <Include file="Golgi_NaT.channel.nml"/>

    <Simulation id="Golgi_test_density_2_trial0" length="450ms" step="0.005ms" target="Golgi_test_density_2_trial0_network">

        <Display id="display_voltagesGolgi_pop0" title="Voltages Golgi_pop0" timeScale="1ms" xmin="-45.0" xmax="495.0" ymin="-75" ymax="50">
            <Line id="../Golgi_pop0/149: Vm" quantity="Golgi_pop0/149/Golgi_10comp_13channels_2CaPools/v" scale="1mV" color="#c86bc0" timeScale="1ms"/>
            <Line id="../Golgi_pop0/193: Vm" quantity="Golgi_pop0/193/Golgi_10comp_13channels_2CaPools/v" scale="1mV" color="#b98562" timeScale="1ms"/>
            <Line id="../Golgi_pop0/94: Vm" quantity="Golgi_pop0/94/Golgi_10comp_13channels_2CaPools/v" scale="1mV" color="#fece14" timeScale="1ms"/>
            <Line id="../Golgi_pop0/12: Vm" quantity="Golgi_pop0/12/Golgi_10comp_13channels_2CaPools/v" scale="1mV" color="#f7149b" timeScale="1ms"/>
            <Line id="../Golgi_pop0/195: Vm" quantity="Golgi_pop0/195/Golgi_10comp_13channels_2CaPools/v" scale="1mV" color="#fec419" timeScale="1ms"/>
            <Line id="../Golgi_pop0/10: Vm" quantity="Golgi_pop0/10/Golgi_10comp_13channels_2CaPools/v" scale="1mV" color="#497588" timeScale="1ms"/>
            <Line id="../Golgi_pop0/133: Vm" quantity="Golgi_pop0/133/Golgi_10comp_13channels_2CaPools/v" scale="1mV" color="#c4e9cd" timeScale="1ms"/>
            <Line id="../Golgi_pop0/112: Vm" quantity="Golgi_pop0/112/Golgi_10comp_13channels_2CaPools/v" scale="1mV" color="#36bfea" timeScale="1ms"/>
            <Line id="../Golgi_pop0/251: Vm" quantity="Golgi_pop0/251/Golgi_10comp_13channels_2CaPools/v" scale="1mV" color="#cca7a0" timeScale="1ms"/>
            <Line id="../Golgi_pop0/16: Vm" quantity="Golgi_pop0/16/Golgi_10comp_13channels_2CaPools/v" scale="1mV" color="#c5160f" timeScale="1ms"/>
            <Line id="../Golgi_pop0/81: Vm" quantity="Golgi_pop0/81/Golgi_10comp_13channels_2CaPools/v" scale="1mV" color="#79bc89" timeScale="1ms"/>
            <Line id="../Golgi_pop0/172: Vm" quantity="Golgi_pop0/172/Golgi_10comp_13channels_2CaPools/v" scale="1mV" color="#5c45fa" timeScale="1ms"/>
            <Line id="../Golgi_pop0/125: Vm" quantity="Golgi_pop0/125/Golgi_10comp_13channels_2CaPools/v" scale="1mV" color="#42e38d" timeScale="1ms"/>
            <Line id="../Golgi_pop0/160: Vm" quantity="Golgi_pop0/160/Golgi_10comp_13channels_2CaPools/v" scale="1mV" color="#531af8" timeScale="1ms"/>
            <Line id="../Golgi_pop0/159: Vm" quantity="Golgi_pop0/159/Golgi_10comp_13channels_2CaPools/v" scale="1mV" color="#8bf3ea" timeScale="1ms"/>
            <Line id="../Golgi_pop0/74: Vm" quantity="Golgi_pop0/74/Golgi_10comp_13channels_2CaPools/v" scale="1mV" color="#d5857c" timeScale="1ms"/>
            <Line id="../Golgi_pop0/105: Vm" quantity="Golgi_pop0/105/Golgi_10comp_13channels_2CaPools/v" scale="1mV" color="#8bbfaa" timeScale="1ms"/>
            <Line id="../Golgi_pop0/29: Vm" quantity="Golgi_pop0/29/Golgi_10comp_13channels_2CaPools/v" scale="1mV" color="#a0dfd7" timeScale="1ms"/>
            <Line id="../Golgi_pop0/36: Vm" quantity="Golgi_pop0/36/Golgi_10comp_13channels_2CaPools/v" scale="1mV" color="#da02aa" timeScale="1ms"/>
            <Line id="../Golgi_pop0/223: Vm" quantity="Golgi_pop0/223/Golgi_10comp_13channels_2CaPools/v" scale="1mV" color="#575388" timeScale="1ms"/>
        </Display>

        <OutputFile id="Volts0_file0_0" fileName="/home/rokas/Golgi_network_2016/PyExamples/simulations/test_density_2/sim0/0_cell0.dat">
            <OutputColumn id="v0" quantity="Golgi_pop0/0/Golgi_10comp_13channels_2CaPools/v"/>
        </OutputFile>

        <OutputFile id="Volts0_file0_1" fileName="/home/rokas/Golgi_network_2016/PyExamples/simulations/test_density_2/sim0/0_cell1.dat">
            <OutputColumn id="v1" quantity="Golgi_pop0/1/Golgi_10comp_13channels_2CaPools/v"/>
        </OutputFile>

        <OutputFile id="Volts0_file0_2" fileName="/home/rokas/Golgi_network_2016/PyExamples/simulations/test_density_2/sim0/0_cell2.dat">
            <OutputColumn id="v2" quantity="Golgi_pop0/2/Golgi_10comp_13channels_2CaPools/v"/>
        </OutputFile>

        <OutputFile id="Volts0_file0_3" fileName="/home/rokas/Golgi_network_2016/PyExamples/simulations/test_density_2/sim0/0_cell3.dat">
            <OutputColumn id="v3" quantity="Golgi_pop0/3/Golgi_10comp_13channels_2CaPools/v"/>
        </OutputFile>

        <OutputFile id="Volts0_file0_4" fileName="/home/rokas/Golgi_network_2016/PyExamples/simulations/test_density_2/sim0/0_cell4.dat">
            <OutputColumn id="v4" quantity="Golgi_pop0/4/Golgi_10comp_13channels_2CaPools/v"/>
        </OutputFile>

        <OutputFile id="Volts0_file0_5" fileName="/home/rokas/Golgi_network_2016/PyExamples/simulations/test_density_2/sim0/0_cell5.dat">
            <OutputColumn id="v5" quantity="Golgi_pop0/5/Golgi_10comp_13channels_2CaPools/v"/>
        </OutputFile>

        <OutputFile id="Volts0_file0_6" fileName="/home/rokas/Golgi_network_2016/PyExamples/simulations/test_density_2/sim0/0_cell6.dat">
            <OutputColumn id="v6" quantity="Golgi_pop0/6/Golgi_10comp_13channels_2CaPools/v"/>
        </OutputFile>

        <OutputFile id="Volts0_file0_7" fileName="/home/rokas/Golgi_network_2016/PyExamples/simulations/test_density_2/sim0/0_cell7.dat">
            <OutputColumn id="v7" quantity="Golgi_pop0/7/Golgi_10comp_13channels_2CaPools/v"/>
        </OutputFile>

        <OutputFile id="Volts0_file0_8" fileName="/home/rokas/Golgi_network_2016/PyExamples/simulations/test_density_2/sim0/0_cell8.dat">
            <OutputColumn id="v8" quantity="Golgi_pop0/8/Golgi_10comp_13channels_2CaPools/v"/>
        </OutputFile>

        <OutputFile id="Volts0_file0_9" fileName="/home/rokas/Golgi_network_2016/PyExamples/simulations/test_density_2/sim0/0_cell9.dat">
            <OutputColumn id="v9" quantity="Golgi_pop0/9/Golgi_10comp_13channels_2CaPools/v"/>
        </OutputFile>

        <OutputFile id="Volts0_file0_10" fileName="/home/rokas/Golgi_network_2016/PyExamples/simulations/test_density_2/sim0/0_cell10.dat">
            <OutputColumn id="v10" quantity="Golgi_pop0/10/Golgi_10comp_13channels_2CaPools/v"/>
        </OutputFile>

        <OutputFile id="Volts0_file0_11" fileName="/home/rokas/Golgi_network_2016/PyExamples/simulations/test_density_2/sim0/0_cell11.dat">
            <OutputColumn id="v11" quantity="Golgi_pop0/11/Golgi_10comp_13channels_2CaPools/v"/>
        </OutputFile>

        <OutputFile id="Volts0_file0_12" fileName="/home/rokas/Golgi_network_2016/PyExamples/simulations/test_density_2/sim0/0_cell12.dat">
            <OutputColumn id="v12" quantity="Golgi_pop0/12/Golgi_10comp_13channels_2CaPools/v"/>
        </OutputFile>

        <OutputFile id="Volts0_file0_13" fileName="/home/rokas/Golgi_network_2016/PyExamples/simulations/test_density_2/sim0/0_cell13.dat">
            <OutputColumn id="v13" quantity="Golgi_pop0/13/Golgi_10comp_13channels_2CaPools/v"/>
        </OutputFile>

        <OutputFile id="Volts0_file0_14" fileName="/home/rokas/Golgi_network_2016/PyExamples/simulations/test_density_2/sim0/0_cell14.dat">
            <OutputColumn id="v14" quantity="Golgi_pop0/14/Golgi_10comp_13channels_2CaPools/v"/>
        </OutputFile>

        <OutputFile id="Volts0_file0_15" fileName="/home/rokas/Golgi_network_2016/PyExamples/simulations/test_density_2/sim0/0_cell15.dat">
            <OutputColumn id="v15" quantity="Golgi_pop0/15/Golgi_10comp_13channels_2CaPools/v"/>
        </OutputFile>

        <OutputFile id="Volts0_file0_16" fileName="/home/rokas/Golgi_network_2016/PyExamples/simulations/test_density_2/sim0/0_cell16.dat">
            <OutputColumn id="v16" quantity="Golgi_pop0/16/Golgi_10comp_13channels_2CaPools/v"/>
        </OutputFile>

        <OutputFile id="Volts0_file0_17" fileName="/home/rokas/Golgi_network_2016/PyExamples/simulations/test_density_2/sim0/0_cell17.dat">
            <OutputColumn id="v17" quantity="Golgi_pop0/17/Golgi_10comp_13channels_2CaPools/v"/>
        </OutputFile>

        <OutputFile id="Volts0_file0_18" fileName="/home/rokas/Golgi_network_2016/PyExamples/simulations/test_density_2/sim0/0_cell18.dat">
            <OutputColumn id="v18" quantity="Golgi_pop0/18/Golgi_10comp_13channels_2CaPools/v"/>
        </OutputFile>

        <OutputFile id="Volts0_file0_19" fileName="/home/rokas/Golgi_network_2016/PyExamples/simulations/test_density_2/sim0/0_cell19.dat">
            <OutputColumn id="v19" quantity="Golgi_pop0/19/Golgi_10comp_13channels_2CaPools/v"/>
        </OutputFile>

        <OutputFile id="Volts0_file0_20" fileName="/home/rokas/Golgi_network_2016/PyExamples/simulations/test_density_2/sim0/0_cell20.dat">
            <OutputColumn id="v20" quantity="Golgi_pop0/20/Golgi_10comp_13channels_2CaPools/v"/>
        </OutputFile>

        <OutputFile id="Volts0_file0_21" fileName="/home/rokas/Golgi_network_2016/PyExamples/simulations/test_density_2/sim0/0_cell21.dat">
            <OutputColumn id="v21" quantity="Golgi_pop0/21/Golgi_10comp_13channels_2CaPools/v"/>
        </OutputFile>

        <OutputFile id="Volts0_file0_22" fileName="/home/rokas/Golgi_network_2016/PyExamples/simulations/test_density_2/sim0/0_cell22.dat">
            <OutputColumn id="v22" quantity="Golgi_pop0/22/Golgi_10comp_13channels_2CaPools/v"/>
        </OutputFile>

        <OutputFile id="Volts0_file0_23" fileName="/home/rokas/Golgi_network_2016/PyExamples/simulations/test_density_2/sim0/0_cell23.dat">
            <OutputColumn id="v23" quantity="Golgi_pop0/23/Golgi_10comp_13channels_2CaPools/v"/>
        </OutputFile>

        <OutputFile id="Volts0_file0_24" fileName="/home/rokas/Golgi_network_2016/PyExamples/simulations/test_density_2/sim0/0_cell24.dat">
            <OutputColumn id="v24" quantity="Golgi_pop0/24/Golgi_10comp_13channels_2CaPools/v"/>
        </OutputFile>

        <OutputFile id="Volts0_file0_25" fileName="/home/rokas/Golgi_network_2016/PyExamples/simulations/test_density_2/sim0/0_cell25.dat">
            <OutputColumn id="v25" quantity="Golgi_pop0/25/Golgi_10comp_13channels_2CaPools/v"/>
        </OutputFile>

        <OutputFile id="Volts0_file0_26" fileName="/home/rokas/Golgi_network_2016/PyExamples/simulations/test_density_2/sim0/0_cell26.dat">
            <OutputColumn id="v26" quantity="Golgi_pop0/26/Golgi_10comp_13channels_2CaPools/v"/>
        </OutputFile>

        <OutputFile id="Volts0_file0_27" fileName="/home/rokas/Golgi_network_2016/PyExamples/simulations/test_density_2/sim0/0_cell27.dat">
            <OutputColumn id="v27" quantity="Golgi_pop0/27/Golgi_10comp_13channels_2CaPools/v"/>
        </OutputFile>

        <OutputFile id="Volts0_file0_28" fileName="/home/rokas/Golgi_network_2016/PyExamples/simulations/test_density_2/sim0/0_cell28.dat">
            <OutputColumn id="v28" quantity="Golgi_pop0/28/Golgi_10comp_13channels_2CaPools/v"/>
        </OutputFile>

        <OutputFile id="Volts0_file0_29" fileName="/home/rokas/Golgi_network_2016/PyExamples/simulations/test_density_2/sim0/0_cell29.dat">
            <OutputColumn id="v29" quantity="Golgi_pop0/29/Golgi_10comp_13channels_2CaPools/v"/>
        </OutputFile>

        <OutputFile id="Volts0_file0_30" fileName="/home/rokas/Golgi_network_2016/PyExamples/simulations/test_density_2/sim0/0_cell30.dat">
            <OutputColumn id="v30" quantity="Golgi_pop0/30/Golgi_10comp_13channels_2CaPools/v"/>
        </OutputFile>

        <OutputFile id="Volts0_file0_31" fileName="/home/rokas/Golgi_network_2016/PyExamples/simulations/test_density_2/sim0/0_cell31.dat">
            <OutputColumn id="v31" quantity="Golgi_pop0/31/Golgi_10comp_13channels_2CaPools/v"/>
        </OutputFile>

        <OutputFile id="Volts0_file0_32" fileName="/home/rokas/Golgi_network_2016/PyExamples/simulations/test_density_2/sim0/0_cell32.dat">
            <OutputColumn id="v32" quantity="Golgi_pop0/32/Golgi_10comp_13channels_2CaPools/v"/>
        </OutputFile>

        <OutputFile id="Volts0_file0_33" fileName="/home/rokas/Golgi_network_2016/PyExamples/simulations/test_density_2/sim0/0_cell33.dat">
            <OutputColumn id="v33" quantity="Golgi_pop0/33/Golgi_10comp_13channels_2CaPools/v"/>
        </OutputFile>

        <OutputFile id="Volts0_file0_34" fileName="/home/rokas/Golgi_network_2016/PyExamples/simulations/test_density_2/sim0/0_cell34.dat">
            <OutputColumn id="v34" quantity="Golgi_pop0/34/Golgi_10comp_13channels_2CaPools/v"/>
        </OutputFile>

        <OutputFile id="Volts0_file0_35" fileName="/home/rokas/Golgi_network_2016/PyExamples/simulations/test_density_2/sim0/0_cell35.dat">
            <OutputColumn id="v35" quantity="Golgi_pop0/35/Golgi_10comp_13channels_2CaPools/v"/>
        </OutputFile>

        <OutputFile id="Volts0_file0_36" fileName="/home/rokas/Golgi_network_2016/PyExamples/simulations/test_density_2/sim0/0_cell36.dat">
            <OutputColumn id="v36" quantity="Golgi_pop0/36/Golgi_10comp_13channels_2CaPools/v"/>
        </OutputFile>

        <OutputFile id="Volts0_file0_37" fileName="/home/rokas/Golgi_network_2016/PyExamples/simulations/test_density_2/sim0/0_cell37.dat">
            <OutputColumn id="v37" quantity="Golgi_pop0/37/Golgi_10comp_13channels_2CaPools/v"/>
        </OutputFile>

        <OutputFile id="Volts0_file0_38" fileName="/home/rokas/Golgi_network_2016/PyExamples/simulations/test_density_2/sim0/0_cell38.dat">
            <OutputColumn id="v38" quantity="Golgi_pop0/38/Golgi_10comp_13channels_2CaPools/v"/>
        </OutputFile>

        <OutputFile id="Volts0_file0_39" fileName="/home/rokas/Golgi_network_2016/PyExamples/simulations/test_density_2/sim0/0_cell39.dat">
            <OutputColumn id="v39" quantity="Golgi_pop0/39/Golgi_10comp_13channels_2CaPools/v"/>
        </OutputFile>

        <OutputFile id="Volts0_file0_40" fileName="/home/rokas/Golgi_network_2016/PyExamples/simulations/test_density_2/sim0/0_cell40.dat">
            <OutputColumn id="v40" quantity="Golgi_pop0/40/Golgi_10comp_13channels_2CaPools/v"/>
        </OutputFile>

        <OutputFile id="Volts0_file0_41" fileName="/home/rokas/Golgi_network_2016/PyExamples/simulations/test_density_2/sim0/0_cell41.dat">
            <OutputColumn id="v41" quantity="Golgi_pop0/41/Golgi_10comp_13channels_2CaPools/v"/>
        </OutputFile>

        <OutputFile id="Volts0_file0_42" fileName="/home/rokas/Golgi_network_2016/PyExamples/simulations/test_density_2/sim0/0_cell42.dat">
            <OutputColumn id="v42" quantity="Golgi_pop0/42/Golgi_10comp_13channels_2CaPools/v"/>
        </OutputFile>

        <OutputFile id="Volts0_file0_43" fileName="/home/rokas/Golgi_network_2016/PyExamples/simulations/test_density_2/sim0/0_cell43.dat">
            <OutputColumn id="v43" quantity="Golgi_pop0/43/Golgi_10comp_13channels_2CaPools/v"/>
        </OutputFile>

        <OutputFile id="Volts0_file0_44" fileName="/home/rokas/Golgi_network_2016/PyExamples/simulations/test_density_2/sim0/0_cell44.dat">
            <OutputColumn id="v44" quantity="Golgi_pop0/44/Golgi_10comp_13channels_2CaPools/v"/>
        </OutputFile>

        <OutputFile id="Volts0_file0_45" fileName="/home/rokas/Golgi_network_2016/PyExamples/simulations/test_density_2/sim0/0_cell45.dat">
            <OutputColumn id="v45" quantity="Golgi_pop0/45/Golgi_10comp_13channels_2CaPools/v"/>
        </OutputFile>

        <OutputFile id="Volts0_file0_46" fileName="/home/rokas/Golgi_network_2016/PyExamples/simulations/test_density_2/sim0/0_cell46.dat">
            <OutputColumn id="v46" quantity="Golgi_pop0/46/Golgi_10comp_13channels_2CaPools/v"/>
        </OutputFile>

        <OutputFile id="Volts0_file0_47" fileName="/home/rokas/Golgi_network_2016/PyExamples/simulations/test_density_2/sim0/0_cell47.dat">
            <OutputColumn id="v47" quantity="Golgi_pop0/47/Golgi_10comp_13channels_2CaPools/v"/>
        </OutputFile>

        <OutputFile id="Volts0_file0_48" fileName="/home/rokas/Golgi_network_2016/PyExamples/simulations/test_density_2/sim0/0_cell48.dat">
            <OutputColumn id="v48" quantity="Golgi_pop0/48/Golgi_10comp_13channels_2CaPools/v"/>
        </OutputFile>

        <OutputFile id="Volts0_file0_49" fileName="/home/rokas/Golgi_network_2016/PyExamples/simulations/test_density_2/sim0/0_cell49.dat">
            <OutputColumn id="v49" quantity="Golgi_pop0/49/Golgi_10comp_13channels_2CaPools/v"/>
        </OutputFile>

        <OutputFile id="Volts0_file0_50" fileName="/home/rokas/Golgi_network_2016/PyExamples/simulations/test_density_2/sim0/0_cell50.dat">
            <OutputColumn id="v50" quantity="Golgi_pop0/50/Golgi_10comp_13channels_2CaPools/v"/>
        </OutputFile>

        <OutputFile id="Volts0_file0_51" fileName="/home/rokas/Golgi_network_2016/PyExamples/simulations/test_density_2/sim0/0_cell51.dat">
            <OutputColumn id="v51" quantity="Golgi_pop0/51/Golgi_10comp_13channels_2CaPools/v"/>
        </OutputFile>

        <OutputFile id="Volts0_file0_52" fileName="/home/rokas/Golgi_network_2016/PyExamples/simulations/test_density_2/sim0/0_cell52.dat">
            <OutputColumn id="v52" quantity="Golgi_pop0/52/Golgi_10comp_13channels_2CaPools/v"/>
        </OutputFile>

        <OutputFile id="Volts0_file0_53" fileName="/home/rokas/Golgi_network_2016/PyExamples/simulations/test_density_2/sim0/0_cell53.dat">
            <OutputColumn id="v53" quantity="Golgi_pop0/53/Golgi_10comp_13channels_2CaPools/v"/>
        </OutputFile>

        <OutputFile id="Volts0_file0_54" fileName="/home/rokas/Golgi_network_2016/PyExamples/simulations/test_density_2/sim0/0_cell54.dat">
            <OutputColumn id="v54" quantity="Golgi_pop0/54/Golgi_10comp_13channels_2CaPools/v"/>
        </OutputFile>

        <OutputFile id="Volts0_file0_55" fileName="/home/rokas/Golgi_network_2016/PyExamples/simulations/test_density_2/sim0/0_cell55.dat">
            <OutputColumn id="v55" quantity="Golgi_pop0/55/Golgi_10comp_13channels_2CaPools/v"/>
        </OutputFile>

        <OutputFile id="Volts0_file0_56" fileName="/home/rokas/Golgi_network_2016/PyExamples/simulations/test_density_2/sim0/0_cell56.dat">
            <OutputColumn id="v56" quantity="Golgi_pop0/56/Golgi_10comp_13channels_2CaPools/v"/>
        </OutputFile>

        <OutputFile id="Volts0_file0_57" fileName="/home/rokas/Golgi_network_2016/PyExamples/simulations/test_density_2/sim0/0_cell57.dat">
            <OutputColumn id="v57" quantity="Golgi_pop0/57/Golgi_10comp_13channels_2CaPools/v"/>
        </OutputFile>

        <OutputFile id="Volts0_file0_58" fileName="/home/rokas/Golgi_network_2016/PyExamples/simulations/test_density_2/sim0/0_cell58.dat">
            <OutputColumn id="v58" quantity="Golgi_pop0/58/Golgi_10comp_13channels_2CaPools/v"/>
        </OutputFile>

        <OutputFile id="Volts0_file0_59" fileName="/home/rokas/Golgi_network_2016/PyExamples/simulations/test_density_2/sim0/0_cell59.dat">
            <OutputColumn id="v59" quantity="Golgi_pop0/59/Golgi_10comp_13channels_2CaPools/v"/>
        </OutputFile>

        <OutputFile id="Volts0_file0_60" fileName="/home/rokas/Golgi_network_2016/PyExamples/simulations/test_density_2/sim0/0_cell60.dat">
            <OutputColumn id="v60" quantity="Golgi_pop0/60/Golgi_10comp_13channels_2CaPools/v"/>
        </OutputFile>

        <OutputFile id="Volts0_file0_61" fileName="/home/rokas/Golgi_network_2016/PyExamples/simulations/test_density_2/sim0/0_cell61.dat">
            <OutputColumn id="v61" quantity="Golgi_pop0/61/Golgi_10comp_13channels_2CaPools/v"/>
        </OutputFile>

        <OutputFile id="Volts0_file0_62" fileName="/home/rokas/Golgi_network_2016/PyExamples/simulations/test_density_2/sim0/0_cell62.dat">
            <OutputColumn id="v62" quantity="Golgi_pop0/62/Golgi_10comp_13channels_2CaPools/v"/>
        </OutputFile>

        <OutputFile id="Volts0_file0_63" fileName="/home/rokas/Golgi_network_2016/PyExamples/simulations/test_density_2/sim0/0_cell63.dat">
            <OutputColumn id="v63" quantity="Golgi_pop0/63/Golgi_10comp_13channels_2CaPools/v"/>
        </OutputFile>

        <OutputFile id="Volts0_file0_64" fileName="/home/rokas/Golgi_network_2016/PyExamples/simulations/test_density_2/sim0/0_cell64.dat">
            <OutputColumn id="v64" quantity="Golgi_pop0/64/Golgi_10comp_13channels_2CaPools/v"/>
        </OutputFile>

        <OutputFile id="Volts0_file0_65" fileName="/home/rokas/Golgi_network_2016/PyExamples/simulations/test_density_2/sim0/0_cell65.dat">
            <OutputColumn id="v65" quantity="Golgi_pop0/65/Golgi_10comp_13channels_2CaPools/v"/>
        </OutputFile>

        <OutputFile id="Volts0_file0_66" fileName="/home/rokas/Golgi_network_2016/PyExamples/simulations/test_density_2/sim0/0_cell66.dat">
            <OutputColumn id="v66" quantity="Golgi_pop0/66/Golgi_10comp_13channels_2CaPools/v"/>
        </OutputFile>

        <OutputFile id="Volts0_file0_67" fileName="/home/rokas/Golgi_network_2016/PyExamples/simulations/test_density_2/sim0/0_cell67.dat">
            <OutputColumn id="v67" quantity="Golgi_pop0/67/Golgi_10comp_13channels_2CaPools/v"/>
        </OutputFile>

        <OutputFile id="Volts0_file0_68" fileName="/home/rokas/Golgi_network_2016/PyExamples/simulations/test_density_2/sim0/0_cell68.dat">
            <OutputColumn id="v68" quantity="Golgi_pop0/68/Golgi_10comp_13channels_2CaPools/v"/>
        </OutputFile>

        <OutputFile id="Volts0_file0_69" fileName="/home/rokas/Golgi_network_2016/PyExamples/simulations/test_density_2/sim0/0_cell69.dat">
            <OutputColumn id="v69" quantity="Golgi_pop0/69/Golgi_10comp_13channels_2CaPools/v"/>
        </OutputFile>

        <OutputFile id="Volts0_file0_70" fileName="/home/rokas/Golgi_network_2016/PyExamples/simulations/test_density_2/sim0/0_cell70.dat">
            <OutputColumn id="v70" quantity="Golgi_pop0/70/Golgi_10comp_13channels_2CaPools/v"/>
        </OutputFile>

        <OutputFile id="Volts0_file0_71" fileName="/home/rokas/Golgi_network_2016/PyExamples/simulations/test_density_2/sim0/0_cell71.dat">
            <OutputColumn id="v71" quantity="Golgi_pop0/71/Golgi_10comp_13channels_2CaPools/v"/>
        </OutputFile>

        <OutputFile id="Volts0_file0_72" fileName="/home/rokas/Golgi_network_2016/PyExamples/simulations/test_density_2/sim0/0_cell72.dat">
            <OutputColumn id="v72" quantity="Golgi_pop0/72/Golgi_10comp_13channels_2CaPools/v"/>
        </OutputFile>

        <OutputFile id="Volts0_file0_73" fileName="/home/rokas/Golgi_network_2016/PyExamples/simulations/test_density_2/sim0/0_cell73.dat">
            <OutputColumn id="v73" quantity="Golgi_pop0/73/Golgi_10comp_13channels_2CaPools/v"/>
        </OutputFile>

        <OutputFile id="Volts0_file0_74" fileName="/home/rokas/Golgi_network_2016/PyExamples/simulations/test_density_2/sim0/0_cell74.dat">
            <OutputColumn id="v74" quantity="Golgi_pop0/74/Golgi_10comp_13channels_2CaPools/v"/>
        </OutputFile>

        <OutputFile id="Volts0_file0_75" fileName="/home/rokas/Golgi_network_2016/PyExamples/simulations/test_density_2/sim0/0_cell75.dat">
            <OutputColumn id="v75" quantity="Golgi_pop0/75/Golgi_10comp_13channels_2CaPools/v"/>
        </OutputFile>

        <OutputFile id="Volts0_file0_76" fileName="/home/rokas/Golgi_network_2016/PyExamples/simulations/test_density_2/sim0/0_cell76.dat">
            <OutputColumn id="v76" quantity="Golgi_pop0/76/Golgi_10comp_13channels_2CaPools/v"/>
        </OutputFile>

        <OutputFile id="Volts0_file0_77" fileName="/home/rokas/Golgi_network_2016/PyExamples/simulations/test_density_2/sim0/0_cell77.dat">
            <OutputColumn id="v77" quantity="Golgi_pop0/77/Golgi_10comp_13channels_2CaPools/v"/>
        </OutputFile>

        <OutputFile id="Volts0_file0_78" fileName="/home/rokas/Golgi_network_2016/PyExamples/simulations/test_density_2/sim0/0_cell78.dat">
            <OutputColumn id="v78" quantity="Golgi_pop0/78/Golgi_10comp_13channels_2CaPools/v"/>
        </OutputFile>

        <OutputFile id="Volts0_file0_79" fileName="/home/rokas/Golgi_network_2016/PyExamples/simulations/test_density_2/sim0/0_cell79.dat">
            <OutputColumn id="v79" quantity="Golgi_pop0/79/Golgi_10comp_13channels_2CaPools/v"/>
        </OutputFile>

        <OutputFile id="Volts0_file0_80" fileName="/home/rokas/Golgi_network_2016/PyExamples/simulations/test_density_2/sim0/0_cell80.dat">
            <OutputColumn id="v80" quantity="Golgi_pop0/80/Golgi_10comp_13channels_2CaPools/v"/>
        </OutputFile>

        <OutputFile id="Volts0_file0_81" fileName="/home/rokas/Golgi_network_2016/PyExamples/simulations/test_density_2/sim0/0_cell81.dat">
            <OutputColumn id="v81" quantity="Golgi_pop0/81/Golgi_10comp_13channels_2CaPools/v"/>
        </OutputFile>

        <OutputFile id="Volts0_file0_82" fileName="/home/rokas/Golgi_network_2016/PyExamples/simulations/test_density_2/sim0/0_cell82.dat">
            <OutputColumn id="v82" quantity="Golgi_pop0/82/Golgi_10comp_13channels_2CaPools/v"/>
        </OutputFile>

        <OutputFile id="Volts0_file0_83" fileName="/home/rokas/Golgi_network_2016/PyExamples/simulations/test_density_2/sim0/0_cell83.dat">
            <OutputColumn id="v83" quantity="Golgi_pop0/83/Golgi_10comp_13channels_2CaPools/v"/>
        </OutputFile>

        <OutputFile id="Volts0_file0_84" fileName="/home/rokas/Golgi_network_2016/PyExamples/simulations/test_density_2/sim0/0_cell84.dat">
            <OutputColumn id="v84" quantity="Golgi_pop0/84/Golgi_10comp_13channels_2CaPools/v"/>
        </OutputFile>

        <OutputFile id="Volts0_file0_85" fileName="/home/rokas/Golgi_network_2016/PyExamples/simulations/test_density_2/sim0/0_cell85.dat">
            <OutputColumn id="v85" quantity="Golgi_pop0/85/Golgi_10comp_13channels_2CaPools/v"/>
        </OutputFile>

        <OutputFile id="Volts0_file0_86" fileName="/home/rokas/Golgi_network_2016/PyExamples/simulations/test_density_2/sim0/0_cell86.dat">
            <OutputColumn id="v86" quantity="Golgi_pop0/86/Golgi_10comp_13channels_2CaPools/v"/>
        </OutputFile>

        <OutputFile id="Volts0_file0_87" fileName="/home/rokas/Golgi_network_2016/PyExamples/simulations/test_density_2/sim0/0_cell87.dat">
            <OutputColumn id="v87" quantity="Golgi_pop0/87/Golgi_10comp_13channels_2CaPools/v"/>
        </OutputFile>

        <OutputFile id="Volts0_file0_88" fileName="/home/rokas/Golgi_network_2016/PyExamples/simulations/test_density_2/sim0/0_cell88.dat">
            <OutputColumn id="v88" quantity="Golgi_pop0/88/Golgi_10comp_13channels_2CaPools/v"/>
        </OutputFile>

        <OutputFile id="Volts0_file0_89" fileName="/home/rokas/Golgi_network_2016/PyExamples/simulations/test_density_2/sim0/0_cell89.dat">
            <OutputColumn id="v89" quantity="Golgi_pop0/89/Golgi_10comp_13channels_2CaPools/v"/>
        </OutputFile>

        <OutputFile id="Volts0_file0_90" fileName="/home/rokas/Golgi_network_2016/PyExamples/simulations/test_density_2/sim0/0_cell90.dat">
            <OutputColumn id="v90" quantity="Golgi_pop0/90/Golgi_10comp_13channels_2CaPools/v"/>
        </OutputFile>

        <OutputFile id="Volts0_file0_91" fileName="/home/rokas/Golgi_network_2016/PyExamples/simulations/test_density_2/sim0/0_cell91.dat">
            <OutputColumn id="v91" quantity="Golgi_pop0/91/Golgi_10comp_13channels_2CaPools/v"/>
        </OutputFile>

        <OutputFile id="Volts0_file0_92" fileName="/home/rokas/Golgi_network_2016/PyExamples/simulations/test_density_2/sim0/0_cell92.dat">
            <OutputColumn id="v92" quantity="Golgi_pop0/92/Golgi_10comp_13channels_2CaPools/v"/>
        </OutputFile>

        <OutputFile id="Volts0_file0_93" fileName="/home/rokas/Golgi_network_2016/PyExamples/simulations/test_density_2/sim0/0_cell93.dat">
            <OutputColumn id="v93" quantity="Golgi_pop0/93/Golgi_10comp_13channels_2CaPools/v"/>
        </OutputFile>

        <OutputFile id="Volts0_file0_94" fileName="/home/rokas/Golgi_network_2016/PyExamples/simulations/test_density_2/sim0/0_cell94.dat">
            <OutputColumn id="v94" quantity="Golgi_pop0/94/Golgi_10comp_13channels_2CaPools/v"/>
        </OutputFile>

        <OutputFile id="Volts0_file0_95" fileName="/home/rokas/Golgi_network_2016/PyExamples/simulations/test_density_2/sim0/0_cell95.dat">
            <OutputColumn id="v95" quantity="Golgi_pop0/95/Golgi_10comp_13channels_2CaPools/v"/>
        </OutputFile>

        <OutputFile id="Volts0_file0_96" fileName="/home/rokas/Golgi_network_2016/PyExamples/simulations/test_density_2/sim0/0_cell96.dat">
            <OutputColumn id="v96" quantity="Golgi_pop0/96/Golgi_10comp_13channels_2CaPools/v"/>
        </OutputFile>

        <OutputFile id="Volts0_file0_97" fileName="/home/rokas/Golgi_network_2016/PyExamples/simulations/test_density_2/sim0/0_cell97.dat">
            <OutputColumn id="v97" quantity="Golgi_pop0/97/Golgi_10comp_13channels_2CaPools/v"/>
        </OutputFile>

        <OutputFile id="Volts0_file0_98" fileName="/home/rokas/Golgi_network_2016/PyExamples/simulations/test_density_2/sim0/0_cell98.dat">
            <OutputColumn id="v98" quantity="Golgi_pop0/98/Golgi_10comp_13channels_2CaPools/v"/>
        </OutputFile>

        <OutputFile id="Volts0_file0_99" fileName="/home/rokas/Golgi_network_2016/PyExamples/simulations/test_density_2/sim0/0_cell99.dat">
            <OutputColumn id="v99" quantity="Golgi_pop0/99/Golgi_10comp_13channels_2CaPools/v"/>
        </OutputFile>

        <OutputFile id="Volts0_file0_100" fileName="/home/rokas/Golgi_network_2016/PyExamples/simulations/test_density_2/sim0/0_cell100.dat">
            <OutputColumn id="v100" quantity="Golgi_pop0/100/Golgi_10comp_13channels_2CaPools/v"/>
        </OutputFile>

        <OutputFile id="Volts0_file0_101" fileName="/home/rokas/Golgi_network_2016/PyExamples/simulations/test_density_2/sim0/0_cell101.dat">
            <OutputColumn id="v101" quantity="Golgi_pop0/101/Golgi_10comp_13channels_2CaPools/v"/>
        </OutputFile>

        <OutputFile id="Volts0_file0_102" fileName="/home/rokas/Golgi_network_2016/PyExamples/simulations/test_density_2/sim0/0_cell102.dat">
            <OutputColumn id="v102" quantity="Golgi_pop0/102/Golgi_10comp_13channels_2CaPools/v"/>
        </OutputFile>

        <OutputFile id="Volts0_file0_103" fileName="/home/rokas/Golgi_network_2016/PyExamples/simulations/test_density_2/sim0/0_cell103.dat">
            <OutputColumn id="v103" quantity="Golgi_pop0/103/Golgi_10comp_13channels_2CaPools/v"/>
        </OutputFile>

        <OutputFile id="Volts0_file0_104" fileName="/home/rokas/Golgi_network_2016/PyExamples/simulations/test_density_2/sim0/0_cell104.dat">
            <OutputColumn id="v104" quantity="Golgi_pop0/104/Golgi_10comp_13channels_2CaPools/v"/>
        </OutputFile>

        <OutputFile id="Volts0_file0_105" fileName="/home/rokas/Golgi_network_2016/PyExamples/simulations/test_density_2/sim0/0_cell105.dat">
            <OutputColumn id="v105" quantity="Golgi_pop0/105/Golgi_10comp_13channels_2CaPools/v"/>
        </OutputFile>

        <OutputFile id="Volts0_file0_106" fileName="/home/rokas/Golgi_network_2016/PyExamples/simulations/test_density_2/sim0/0_cell106.dat">
            <OutputColumn id="v106" quantity="Golgi_pop0/106/Golgi_10comp_13channels_2CaPools/v"/>
        </OutputFile>

        <OutputFile id="Volts0_file0_107" fileName="/home/rokas/Golgi_network_2016/PyExamples/simulations/test_density_2/sim0/0_cell107.dat">
            <OutputColumn id="v107" quantity="Golgi_pop0/107/Golgi_10comp_13channels_2CaPools/v"/>
        </OutputFile>

        <OutputFile id="Volts0_file0_108" fileName="/home/rokas/Golgi_network_2016/PyExamples/simulations/test_density_2/sim0/0_cell108.dat">
            <OutputColumn id="v108" quantity="Golgi_pop0/108/Golgi_10comp_13channels_2CaPools/v"/>
        </OutputFile>

        <OutputFile id="Volts0_file0_109" fileName="/home/rokas/Golgi_network_2016/PyExamples/simulations/test_density_2/sim0/0_cell109.dat">
            <OutputColumn id="v109" quantity="Golgi_pop0/109/Golgi_10comp_13channels_2CaPools/v"/>
        </OutputFile>

        <OutputFile id="Volts0_file0_110" fileName="/home/rokas/Golgi_network_2016/PyExamples/simulations/test_density_2/sim0/0_cell110.dat">
            <OutputColumn id="v110" quantity="Golgi_pop0/110/Golgi_10comp_13channels_2CaPools/v"/>
        </OutputFile>

        <OutputFile id="Volts0_file0_111" fileName="/home/rokas/Golgi_network_2016/PyExamples/simulations/test_density_2/sim0/0_cell111.dat">
            <OutputColumn id="v111" quantity="Golgi_pop0/111/Golgi_10comp_13channels_2CaPools/v"/>
        </OutputFile>

        <OutputFile id="Volts0_file0_112" fileName="/home/rokas/Golgi_network_2016/PyExamples/simulations/test_density_2/sim0/0_cell112.dat">
            <OutputColumn id="v112" quantity="Golgi_pop0/112/Golgi_10comp_13channels_2CaPools/v"/>
        </OutputFile>

        <OutputFile id="Volts0_file0_113" fileName="/home/rokas/Golgi_network_2016/PyExamples/simulations/test_density_2/sim0/0_cell113.dat">
            <OutputColumn id="v113" quantity="Golgi_pop0/113/Golgi_10comp_13channels_2CaPools/v"/>
        </OutputFile>

        <OutputFile id="Volts0_file0_114" fileName="/home/rokas/Golgi_network_2016/PyExamples/simulations/test_density_2/sim0/0_cell114.dat">
            <OutputColumn id="v114" quantity="Golgi_pop0/114/Golgi_10comp_13channels_2CaPools/v"/>
        </OutputFile>

        <OutputFile id="Volts0_file0_115" fileName="/home/rokas/Golgi_network_2016/PyExamples/simulations/test_density_2/sim0/0_cell115.dat">
            <OutputColumn id="v115" quantity="Golgi_pop0/115/Golgi_10comp_13channels_2CaPools/v"/>
        </OutputFile>

        <OutputFile id="Volts0_file0_116" fileName="/home/rokas/Golgi_network_2016/PyExamples/simulations/test_density_2/sim0/0_cell116.dat">
            <OutputColumn id="v116" quantity="Golgi_pop0/116/Golgi_10comp_13channels_2CaPools/v"/>
        </OutputFile>

        <OutputFile id="Volts0_file0_117" fileName="/home/rokas/Golgi_network_2016/PyExamples/simulations/test_density_2/sim0/0_cell117.dat">
            <OutputColumn id="v117" quantity="Golgi_pop0/117/Golgi_10comp_13channels_2CaPools/v"/>
        </OutputFile>

        <OutputFile id="Volts0_file0_118" fileName="/home/rokas/Golgi_network_2016/PyExamples/simulations/test_density_2/sim0/0_cell118.dat">
            <OutputColumn id="v118" quantity="Golgi_pop0/118/Golgi_10comp_13channels_2CaPools/v"/>
        </OutputFile>

        <OutputFile id="Volts0_file0_119" fileName="/home/rokas/Golgi_network_2016/PyExamples/simulations/test_density_2/sim0/0_cell119.dat">
            <OutputColumn id="v119" quantity="Golgi_pop0/119/Golgi_10comp_13channels_2CaPools/v"/>
        </OutputFile>

        <OutputFile id="Volts0_file0_120" fileName="/home/rokas/Golgi_network_2016/PyExamples/simulations/test_density_2/sim0/0_cell120.dat">
            <OutputColumn id="v120" quantity="Golgi_pop0/120/Golgi_10comp_13channels_2CaPools/v"/>
        </OutputFile>

        <OutputFile id="Volts0_file0_121" fileName="/home/rokas/Golgi_network_2016/PyExamples/simulations/test_density_2/sim0/0_cell121.dat">
            <OutputColumn id="v121" quantity="Golgi_pop0/121/Golgi_10comp_13channels_2CaPools/v"/>
        </OutputFile>

        <OutputFile id="Volts0_file0_122" fileName="/home/rokas/Golgi_network_2016/PyExamples/simulations/test_density_2/sim0/0_cell122.dat">
            <OutputColumn id="v122" quantity="Golgi_pop0/122/Golgi_10comp_13channels_2CaPools/v"/>
        </OutputFile>

        <OutputFile id="Volts0_file0_123" fileName="/home/rokas/Golgi_network_2016/PyExamples/simulations/test_density_2/sim0/0_cell123.dat">
            <OutputColumn id="v123" quantity="Golgi_pop0/123/Golgi_10comp_13channels_2CaPools/v"/>
        </OutputFile>

        <OutputFile id="Volts0_file0_124" fileName="/home/rokas/Golgi_network_2016/PyExamples/simulations/test_density_2/sim0/0_cell124.dat">
            <OutputColumn id="v124" quantity="Golgi_pop0/124/Golgi_10comp_13channels_2CaPools/v"/>
        </OutputFile>

        <OutputFile id="Volts0_file0_125" fileName="/home/rokas/Golgi_network_2016/PyExamples/simulations/test_density_2/sim0/0_cell125.dat">
            <OutputColumn id="v125" quantity="Golgi_pop0/125/Golgi_10comp_13channels_2CaPools/v"/>
        </OutputFile>

        <OutputFile id="Volts0_file0_126" fileName="/home/rokas/Golgi_network_2016/PyExamples/simulations/test_density_2/sim0/0_cell126.dat">
            <OutputColumn id="v126" quantity="Golgi_pop0/126/Golgi_10comp_13channels_2CaPools/v"/>
        </OutputFile>

        <OutputFile id="Volts0_file0_127" fileName="/home/rokas/Golgi_network_2016/PyExamples/simulations/test_density_2/sim0/0_cell127.dat">
            <OutputColumn id="v127" quantity="Golgi_pop0/127/Golgi_10comp_13channels_2CaPools/v"/>
        </OutputFile>

        <OutputFile id="Volts0_file0_128" fileName="/home/rokas/Golgi_network_2016/PyExamples/simulations/test_density_2/sim0/0_cell128.dat">
            <OutputColumn id="v128" quantity="Golgi_pop0/128/Golgi_10comp_13channels_2CaPools/v"/>
        </OutputFile>

        <OutputFile id="Volts0_file0_129" fileName="/home/rokas/Golgi_network_2016/PyExamples/simulations/test_density_2/sim0/0_cell129.dat">
            <OutputColumn id="v129" quantity="Golgi_pop0/129/Golgi_10comp_13channels_2CaPools/v"/>
        </OutputFile>

        <OutputFile id="Volts0_file0_130" fileName="/home/rokas/Golgi_network_2016/PyExamples/simulations/test_density_2/sim0/0_cell130.dat">
            <OutputColumn id="v130" quantity="Golgi_pop0/130/Golgi_10comp_13channels_2CaPools/v"/>
        </OutputFile>

        <OutputFile id="Volts0_file0_131" fileName="/home/rokas/Golgi_network_2016/PyExamples/simulations/test_density_2/sim0/0_cell131.dat">
            <OutputColumn id="v131" quantity="Golgi_pop0/131/Golgi_10comp_13channels_2CaPools/v"/>
        </OutputFile>

        <OutputFile id="Volts0_file0_132" fileName="/home/rokas/Golgi_network_2016/PyExamples/simulations/test_density_2/sim0/0_cell132.dat">
            <OutputColumn id="v132" quantity="Golgi_pop0/132/Golgi_10comp_13channels_2CaPools/v"/>
        </OutputFile>

        <OutputFile id="Volts0_file0_133" fileName="/home/rokas/Golgi_network_2016/PyExamples/simulations/test_density_2/sim0/0_cell133.dat">
            <OutputColumn id="v133" quantity="Golgi_pop0/133/Golgi_10comp_13channels_2CaPools/v"/>
        </OutputFile>

        <OutputFile id="Volts0_file0_134" fileName="/home/rokas/Golgi_network_2016/PyExamples/simulations/test_density_2/sim0/0_cell134.dat">
            <OutputColumn id="v134" quantity="Golgi_pop0/134/Golgi_10comp_13channels_2CaPools/v"/>
        </OutputFile>

        <OutputFile id="Volts0_file0_135" fileName="/home/rokas/Golgi_network_2016/PyExamples/simulations/test_density_2/sim0/0_cell135.dat">
            <OutputColumn id="v135" quantity="Golgi_pop0/135/Golgi_10comp_13channels_2CaPools/v"/>
        </OutputFile>

        <OutputFile id="Volts0_file0_136" fileName="/home/rokas/Golgi_network_2016/PyExamples/simulations/test_density_2/sim0/0_cell136.dat">
            <OutputColumn id="v136" quantity="Golgi_pop0/136/Golgi_10comp_13channels_2CaPools/v"/>
        </OutputFile>

        <OutputFile id="Volts0_file0_137" fileName="/home/rokas/Golgi_network_2016/PyExamples/simulations/test_density_2/sim0/0_cell137.dat">
            <OutputColumn id="v137" quantity="Golgi_pop0/137/Golgi_10comp_13channels_2CaPools/v"/>
        </OutputFile>

        <OutputFile id="Volts0_file0_138" fileName="/home/rokas/Golgi_network_2016/PyExamples/simulations/test_density_2/sim0/0_cell138.dat">
            <OutputColumn id="v138" quantity="Golgi_pop0/138/Golgi_10comp_13channels_2CaPools/v"/>
        </OutputFile>

        <OutputFile id="Volts0_file0_139" fileName="/home/rokas/Golgi_network_2016/PyExamples/simulations/test_density_2/sim0/0_cell139.dat">
            <OutputColumn id="v139" quantity="Golgi_pop0/139/Golgi_10comp_13channels_2CaPools/v"/>
        </OutputFile>

        <OutputFile id="Volts0_file0_140" fileName="/home/rokas/Golgi_network_2016/PyExamples/simulations/test_density_2/sim0/0_cell140.dat">
            <OutputColumn id="v140" quantity="Golgi_pop0/140/Golgi_10comp_13channels_2CaPools/v"/>
        </OutputFile>

        <OutputFile id="Volts0_file0_141" fileName="/home/rokas/Golgi_network_2016/PyExamples/simulations/test_density_2/sim0/0_cell141.dat">
            <OutputColumn id="v141" quantity="Golgi_pop0/141/Golgi_10comp_13channels_2CaPools/v"/>
        </OutputFile>

        <OutputFile id="Volts0_file0_142" fileName="/home/rokas/Golgi_network_2016/PyExamples/simulations/test_density_2/sim0/0_cell142.dat">
            <OutputColumn id="v142" quantity="Golgi_pop0/142/Golgi_10comp_13channels_2CaPools/v"/>
        </OutputFile>

        <OutputFile id="Volts0_file0_143" fileName="/home/rokas/Golgi_network_2016/PyExamples/simulations/test_density_2/sim0/0_cell143.dat">
            <OutputColumn id="v143" quantity="Golgi_pop0/143/Golgi_10comp_13channels_2CaPools/v"/>
        </OutputFile>

        <OutputFile id="Volts0_file0_144" fileName="/home/rokas/Golgi_network_2016/PyExamples/simulations/test_density_2/sim0/0_cell144.dat">
            <OutputColumn id="v144" quantity="Golgi_pop0/144/Golgi_10comp_13channels_2CaPools/v"/>
        </OutputFile>

        <OutputFile id="Volts0_file0_145" fileName="/home/rokas/Golgi_network_2016/PyExamples/simulations/test_density_2/sim0/0_cell145.dat">
            <OutputColumn id="v145" quantity="Golgi_pop0/145/Golgi_10comp_13channels_2CaPools/v"/>
        </OutputFile>

        <OutputFile id="Volts0_file0_146" fileName="/home/rokas/Golgi_network_2016/PyExamples/simulations/test_density_2/sim0/0_cell146.dat">
            <OutputColumn id="v146" quantity="Golgi_pop0/146/Golgi_10comp_13channels_2CaPools/v"/>
        </OutputFile>

        <OutputFile id="Volts0_file0_147" fileName="/home/rokas/Golgi_network_2016/PyExamples/simulations/test_density_2/sim0/0_cell147.dat">
            <OutputColumn id="v147" quantity="Golgi_pop0/147/Golgi_10comp_13channels_2CaPools/v"/>
        </OutputFile>

        <OutputFile id="Volts0_file0_148" fileName="/home/rokas/Golgi_network_2016/PyExamples/simulations/test_density_2/sim0/0_cell148.dat">
            <OutputColumn id="v148" quantity="Golgi_pop0/148/Golgi_10comp_13channels_2CaPools/v"/>
        </OutputFile>

        <OutputFile id="Volts0_file0_149" fileName="/home/rokas/Golgi_network_2016/PyExamples/simulations/test_density_2/sim0/0_cell149.dat">
            <OutputColumn id="v149" quantity="Golgi_pop0/149/Golgi_10comp_13channels_2CaPools/v"/>
        </OutputFile>

        <OutputFile id="Volts0_file0_150" fileName="/home/rokas/Golgi_network_2016/PyExamples/simulations/test_density_2/sim0/0_cell150.dat">
            <OutputColumn id="v150" quantity="Golgi_pop0/150/Golgi_10comp_13channels_2CaPools/v"/>
        </OutputFile>

        <OutputFile id="Volts0_file0_151" fileName="/home/rokas/Golgi_network_2016/PyExamples/simulations/test_density_2/sim0/0_cell151.dat">
            <OutputColumn id="v151" quantity="Golgi_pop0/151/Golgi_10comp_13channels_2CaPools/v"/>
        </OutputFile>

        <OutputFile id="Volts0_file0_152" fileName="/home/rokas/Golgi_network_2016/PyExamples/simulations/test_density_2/sim0/0_cell152.dat">
            <OutputColumn id="v152" quantity="Golgi_pop0/152/Golgi_10comp_13channels_2CaPools/v"/>
        </OutputFile>

        <OutputFile id="Volts0_file0_153" fileName="/home/rokas/Golgi_network_2016/PyExamples/simulations/test_density_2/sim0/0_cell153.dat">
            <OutputColumn id="v153" quantity="Golgi_pop0/153/Golgi_10comp_13channels_2CaPools/v"/>
        </OutputFile>

        <OutputFile id="Volts0_file0_154" fileName="/home/rokas/Golgi_network_2016/PyExamples/simulations/test_density_2/sim0/0_cell154.dat">
            <OutputColumn id="v154" quantity="Golgi_pop0/154/Golgi_10comp_13channels_2CaPools/v"/>
        </OutputFile>

        <OutputFile id="Volts0_file0_155" fileName="/home/rokas/Golgi_network_2016/PyExamples/simulations/test_density_2/sim0/0_cell155.dat">
            <OutputColumn id="v155" quantity="Golgi_pop0/155/Golgi_10comp_13channels_2CaPools/v"/>
        </OutputFile>

        <OutputFile id="Volts0_file0_156" fileName="/home/rokas/Golgi_network_2016/PyExamples/simulations/test_density_2/sim0/0_cell156.dat">
            <OutputColumn id="v156" quantity="Golgi_pop0/156/Golgi_10comp_13channels_2CaPools/v"/>
        </OutputFile>

        <OutputFile id="Volts0_file0_157" fileName="/home/rokas/Golgi_network_2016/PyExamples/simulations/test_density_2/sim0/0_cell157.dat">
            <OutputColumn id="v157" quantity="Golgi_pop0/157/Golgi_10comp_13channels_2CaPools/v"/>
        </OutputFile>

        <OutputFile id="Volts0_file0_158" fileName="/home/rokas/Golgi_network_2016/PyExamples/simulations/test_density_2/sim0/0_cell158.dat">
            <OutputColumn id="v158" quantity="Golgi_pop0/158/Golgi_10comp_13channels_2CaPools/v"/>
        </OutputFile>

        <OutputFile id="Volts0_file0_159" fileName="/home/rokas/Golgi_network_2016/PyExamples/simulations/test_density_2/sim0/0_cell159.dat">
            <OutputColumn id="v159" quantity="Golgi_pop0/159/Golgi_10comp_13channels_2CaPools/v"/>
        </OutputFile>

        <OutputFile id="Volts0_file0_160" fileName="/home/rokas/Golgi_network_2016/PyExamples/simulations/test_density_2/sim0/0_cell160.dat">
            <OutputColumn id="v160" quantity="Golgi_pop0/160/Golgi_10comp_13channels_2CaPools/v"/>
        </OutputFile>

        <OutputFile id="Volts0_file0_161" fileName="/home/rokas/Golgi_network_2016/PyExamples/simulations/test_density_2/sim0/0_cell161.dat">
            <OutputColumn id="v161" quantity="Golgi_pop0/161/Golgi_10comp_13channels_2CaPools/v"/>
        </OutputFile>

        <OutputFile id="Volts0_file0_162" fileName="/home/rokas/Golgi_network_2016/PyExamples/simulations/test_density_2/sim0/0_cell162.dat">
            <OutputColumn id="v162" quantity="Golgi_pop0/162/Golgi_10comp_13channels_2CaPools/v"/>
        </OutputFile>

        <OutputFile id="Volts0_file0_163" fileName="/home/rokas/Golgi_network_2016/PyExamples/simulations/test_density_2/sim0/0_cell163.dat">
            <OutputColumn id="v163" quantity="Golgi_pop0/163/Golgi_10comp_13channels_2CaPools/v"/>
        </OutputFile>

        <OutputFile id="Volts0_file0_164" fileName="/home/rokas/Golgi_network_2016/PyExamples/simulations/test_density_2/sim0/0_cell164.dat">
            <OutputColumn id="v164" quantity="Golgi_pop0/164/Golgi_10comp_13channels_2CaPools/v"/>
        </OutputFile>

        <OutputFile id="Volts0_file0_165" fileName="/home/rokas/Golgi_network_2016/PyExamples/simulations/test_density_2/sim0/0_cell165.dat">
            <OutputColumn id="v165" quantity="Golgi_pop0/165/Golgi_10comp_13channels_2CaPools/v"/>
        </OutputFile>

        <OutputFile id="Volts0_file0_166" fileName="/home/rokas/Golgi_network_2016/PyExamples/simulations/test_density_2/sim0/0_cell166.dat">
            <OutputColumn id="v166" quantity="Golgi_pop0/166/Golgi_10comp_13channels_2CaPools/v"/>
        </OutputFile>

        <OutputFile id="Volts0_file0_167" fileName="/home/rokas/Golgi_network_2016/PyExamples/simulations/test_density_2/sim0/0_cell167.dat">
            <OutputColumn id="v167" quantity="Golgi_pop0/167/Golgi_10comp_13channels_2CaPools/v"/>
        </OutputFile>

        <OutputFile id="Volts0_file0_168" fileName="/home/rokas/Golgi_network_2016/PyExamples/simulations/test_density_2/sim0/0_cell168.dat">
            <OutputColumn id="v168" quantity="Golgi_pop0/168/Golgi_10comp_13channels_2CaPools/v"/>
        </OutputFile>

        <OutputFile id="Volts0_file0_169" fileName="/home/rokas/Golgi_network_2016/PyExamples/simulations/test_density_2/sim0/0_cell169.dat">
            <OutputColumn id="v169" quantity="Golgi_pop0/169/Golgi_10comp_13channels_2CaPools/v"/>
        </OutputFile>

        <OutputFile id="Volts0_file0_170" fileName="/home/rokas/Golgi_network_2016/PyExamples/simulations/test_density_2/sim0/0_cell170.dat">
            <OutputColumn id="v170" quantity="Golgi_pop0/170/Golgi_10comp_13channels_2CaPools/v"/>
        </OutputFile>

        <OutputFile id="Volts0_file0_171" fileName="/home/rokas/Golgi_network_2016/PyExamples/simulations/test_density_2/sim0/0_cell171.dat">
            <OutputColumn id="v171" quantity="Golgi_pop0/171/Golgi_10comp_13channels_2CaPools/v"/>
        </OutputFile>

        <OutputFile id="Volts0_file0_172" fileName="/home/rokas/Golgi_network_2016/PyExamples/simulations/test_density_2/sim0/0_cell172.dat">
            <OutputColumn id="v172" quantity="Golgi_pop0/172/Golgi_10comp_13channels_2CaPools/v"/>
        </OutputFile>

        <OutputFile id="Volts0_file0_173" fileName="/home/rokas/Golgi_network_2016/PyExamples/simulations/test_density_2/sim0/0_cell173.dat">
            <OutputColumn id="v173" quantity="Golgi_pop0/173/Golgi_10comp_13channels_2CaPools/v"/>
        </OutputFile>

        <OutputFile id="Volts0_file0_174" fileName="/home/rokas/Golgi_network_2016/PyExamples/simulations/test_density_2/sim0/0_cell174.dat">
            <OutputColumn id="v174" quantity="Golgi_pop0/174/Golgi_10comp_13channels_2CaPools/v"/>
        </OutputFile>

        <OutputFile id="Volts0_file0_175" fileName="/home/rokas/Golgi_network_2016/PyExamples/simulations/test_density_2/sim0/0_cell175.dat">
            <OutputColumn id="v175" quantity="Golgi_pop0/175/Golgi_10comp_13channels_2CaPools/v"/>
        </OutputFile>

        <OutputFile id="Volts0_file0_176" fileName="/home/rokas/Golgi_network_2016/PyExamples/simulations/test_density_2/sim0/0_cell176.dat">
            <OutputColumn id="v176" quantity="Golgi_pop0/176/Golgi_10comp_13channels_2CaPools/v"/>
        </OutputFile>

        <OutputFile id="Volts0_file0_177" fileName="/home/rokas/Golgi_network_2016/PyExamples/simulations/test_density_2/sim0/0_cell177.dat">
            <OutputColumn id="v177" quantity="Golgi_pop0/177/Golgi_10comp_13channels_2CaPools/v"/>
        </OutputFile>

        <OutputFile id="Volts0_file0_178" fileName="/home/rokas/Golgi_network_2016/PyExamples/simulations/test_density_2/sim0/0_cell178.dat">
            <OutputColumn id="v178" quantity="Golgi_pop0/178/Golgi_10comp_13channels_2CaPools/v"/>
        </OutputFile>

        <OutputFile id="Volts0_file0_179" fileName="/home/rokas/Golgi_network_2016/PyExamples/simulations/test_density_2/sim0/0_cell179.dat">
            <OutputColumn id="v179" quantity="Golgi_pop0/179/Golgi_10comp_13channels_2CaPools/v"/>
        </OutputFile>

        <OutputFile id="Volts0_file0_180" fileName="/home/rokas/Golgi_network_2016/PyExamples/simulations/test_density_2/sim0/0_cell180.dat">
            <OutputColumn id="v180" quantity="Golgi_pop0/180/Golgi_10comp_13channels_2CaPools/v"/>
        </OutputFile>

        <OutputFile id="Volts0_file0_181" fileName="/home/rokas/Golgi_network_2016/PyExamples/simulations/test_density_2/sim0/0_cell181.dat">
            <OutputColumn id="v181" quantity="Golgi_pop0/181/Golgi_10comp_13channels_2CaPools/v"/>
        </OutputFile>

        <OutputFile id="Volts0_file0_182" fileName="/home/rokas/Golgi_network_2016/PyExamples/simulations/test_density_2/sim0/0_cell182.dat">
            <OutputColumn id="v182" quantity="Golgi_pop0/182/Golgi_10comp_13channels_2CaPools/v"/>
        </OutputFile>

        <OutputFile id="Volts0_file0_183" fileName="/home/rokas/Golgi_network_2016/PyExamples/simulations/test_density_2/sim0/0_cell183.dat">
            <OutputColumn id="v183" quantity="Golgi_pop0/183/Golgi_10comp_13channels_2CaPools/v"/>
        </OutputFile>

        <OutputFile id="Volts0_file0_184" fileName="/home/rokas/Golgi_network_2016/PyExamples/simulations/test_density_2/sim0/0_cell184.dat">
            <OutputColumn id="v184" quantity="Golgi_pop0/184/Golgi_10comp_13channels_2CaPools/v"/>
        </OutputFile>

        <OutputFile id="Volts0_file0_185" fileName="/home/rokas/Golgi_network_2016/PyExamples/simulations/test_density_2/sim0/0_cell185.dat">
            <OutputColumn id="v185" quantity="Golgi_pop0/185/Golgi_10comp_13channels_2CaPools/v"/>
        </OutputFile>

        <OutputFile id="Volts0_file0_186" fileName="/home/rokas/Golgi_network_2016/PyExamples/simulations/test_density_2/sim0/0_cell186.dat">
            <OutputColumn id="v186" quantity="Golgi_pop0/186/Golgi_10comp_13channels_2CaPools/v"/>
        </OutputFile>

        <OutputFile id="Volts0_file0_187" fileName="/home/rokas/Golgi_network_2016/PyExamples/simulations/test_density_2/sim0/0_cell187.dat">
            <OutputColumn id="v187" quantity="Golgi_pop0/187/Golgi_10comp_13channels_2CaPools/v"/>
        </OutputFile>

        <OutputFile id="Volts0_file0_188" fileName="/home/rokas/Golgi_network_2016/PyExamples/simulations/test_density_2/sim0/0_cell188.dat">
            <OutputColumn id="v188" quantity="Golgi_pop0/188/Golgi_10comp_13channels_2CaPools/v"/>
        </OutputFile>

        <OutputFile id="Volts0_file0_189" fileName="/home/rokas/Golgi_network_2016/PyExamples/simulations/test_density_2/sim0/0_cell189.dat">
            <OutputColumn id="v189" quantity="Golgi_pop0/189/Golgi_10comp_13channels_2CaPools/v"/>
        </OutputFile>

        <OutputFile id="Volts0_file0_190" fileName="/home/rokas/Golgi_network_2016/PyExamples/simulations/test_density_2/sim0/0_cell190.dat">
            <OutputColumn id="v190" quantity="Golgi_pop0/190/Golgi_10comp_13channels_2CaPools/v"/>
        </OutputFile>

        <OutputFile id="Volts0_file0_191" fileName="/home/rokas/Golgi_network_2016/PyExamples/simulations/test_density_2/sim0/0_cell191.dat">
            <OutputColumn id="v191" quantity="Golgi_pop0/191/Golgi_10comp_13channels_2CaPools/v"/>
        </OutputFile>

        <OutputFile id="Volts0_file0_192" fileName="/home/rokas/Golgi_network_2016/PyExamples/simulations/test_density_2/sim0/0_cell192.dat">
            <OutputColumn id="v192" quantity="Golgi_pop0/192/Golgi_10comp_13channels_2CaPools/v"/>
        </OutputFile>

        <OutputFile id="Volts0_file0_193" fileName="/home/rokas/Golgi_network_2016/PyExamples/simulations/test_density_2/sim0/0_cell193.dat">
            <OutputColumn id="v193" quantity="Golgi_pop0/193/Golgi_10comp_13channels_2CaPools/v"/>
        </OutputFile>

        <OutputFile id="Volts0_file0_194" fileName="/home/rokas/Golgi_network_2016/PyExamples/simulations/test_density_2/sim0/0_cell194.dat">
            <OutputColumn id="v194" quantity="Golgi_pop0/194/Golgi_10comp_13channels_2CaPools/v"/>
        </OutputFile>

        <OutputFile id="Volts0_file0_195" fileName="/home/rokas/Golgi_network_2016/PyExamples/simulations/test_density_2/sim0/0_cell195.dat">
            <OutputColumn id="v195" quantity="Golgi_pop0/195/Golgi_10comp_13channels_2CaPools/v"/>
        </OutputFile>

        <OutputFile id="Volts0_file0_196" fileName="/home/rokas/Golgi_network_2016/PyExamples/simulations/test_density_2/sim0/0_cell196.dat">
            <OutputColumn id="v196" quantity="Golgi_pop0/196/Golgi_10comp_13channels_2CaPools/v"/>
        </OutputFile>

        <OutputFile id="Volts0_file0_197" fileName="/home/rokas/Golgi_network_2016/PyExamples/simulations/test_density_2/sim0/0_cell197.dat">
            <OutputColumn id="v197" quantity="Golgi_pop0/197/Golgi_10comp_13channels_2CaPools/v"/>
        </OutputFile>

        <OutputFile id="Volts0_file0_198" fileName="/home/rokas/Golgi_network_2016/PyExamples/simulations/test_density_2/sim0/0_cell198.dat">
            <OutputColumn id="v198" quantity="Golgi_pop0/198/Golgi_10comp_13channels_2CaPools/v"/>
        </OutputFile>

        <OutputFile id="Volts0_file0_199" fileName="/home/rokas/Golgi_network_2016/PyExamples/simulations/test_density_2/sim0/0_cell199.dat">
            <OutputColumn id="v199" quantity="Golgi_pop0/199/Golgi_10comp_13channels_2CaPools/v"/>
        </OutputFile>

        <OutputFile id="Volts0_file0_200" fileName="/home/rokas/Golgi_network_2016/PyExamples/simulations/test_density_2/sim0/0_cell200.dat">
            <OutputColumn id="v200" quantity="Golgi_pop0/200/Golgi_10comp_13channels_2CaPools/v"/>
        </OutputFile>

        <OutputFile id="Volts0_file0_201" fileName="/home/rokas/Golgi_network_2016/PyExamples/simulations/test_density_2/sim0/0_cell201.dat">
            <OutputColumn id="v201" quantity="Golgi_pop0/201/Golgi_10comp_13channels_2CaPools/v"/>
        </OutputFile>

        <OutputFile id="Volts0_file0_202" fileName="/home/rokas/Golgi_network_2016/PyExamples/simulations/test_density_2/sim0/0_cell202.dat">
            <OutputColumn id="v202" quantity="Golgi_pop0/202/Golgi_10comp_13channels_2CaPools/v"/>
        </OutputFile>

        <OutputFile id="Volts0_file0_203" fileName="/home/rokas/Golgi_network_2016/PyExamples/simulations/test_density_2/sim0/0_cell203.dat">
            <OutputColumn id="v203" quantity="Golgi_pop0/203/Golgi_10comp_13channels_2CaPools/v"/>
        </OutputFile>

        <OutputFile id="Volts0_file0_204" fileName="/home/rokas/Golgi_network_2016/PyExamples/simulations/test_density_2/sim0/0_cell204.dat">
            <OutputColumn id="v204" quantity="Golgi_pop0/204/Golgi_10comp_13channels_2CaPools/v"/>
        </OutputFile>

        <OutputFile id="Volts0_file0_205" fileName="/home/rokas/Golgi_network_2016/PyExamples/simulations/test_density_2/sim0/0_cell205.dat">
            <OutputColumn id="v205" quantity="Golgi_pop0/205/Golgi_10comp_13channels_2CaPools/v"/>
        </OutputFile>

        <OutputFile id="Volts0_file0_206" fileName="/home/rokas/Golgi_network_2016/PyExamples/simulations/test_density_2/sim0/0_cell206.dat">
            <OutputColumn id="v206" quantity="Golgi_pop0/206/Golgi_10comp_13channels_2CaPools/v"/>
        </OutputFile>

        <OutputFile id="Volts0_file0_207" fileName="/home/rokas/Golgi_network_2016/PyExamples/simulations/test_density_2/sim0/0_cell207.dat">
            <OutputColumn id="v207" quantity="Golgi_pop0/207/Golgi_10comp_13channels_2CaPools/v"/>
        </OutputFile>

        <OutputFile id="Volts0_file0_208" fileName="/home/rokas/Golgi_network_2016/PyExamples/simulations/test_density_2/sim0/0_cell208.dat">
            <OutputColumn id="v208" quantity="Golgi_pop0/208/Golgi_10comp_13channels_2CaPools/v"/>
        </OutputFile>

        <OutputFile id="Volts0_file0_209" fileName="/home/rokas/Golgi_network_2016/PyExamples/simulations/test_density_2/sim0/0_cell209.dat">
            <OutputColumn id="v209" quantity="Golgi_pop0/209/Golgi_10comp_13channels_2CaPools/v"/>
        </OutputFile>

        <OutputFile id="Volts0_file0_210" fileName="/home/rokas/Golgi_network_2016/PyExamples/simulations/test_density_2/sim0/0_cell210.dat">
            <OutputColumn id="v210" quantity="Golgi_pop0/210/Golgi_10comp_13channels_2CaPools/v"/>
        </OutputFile>

        <OutputFile id="Volts0_file0_211" fileName="/home/rokas/Golgi_network_2016/PyExamples/simulations/test_density_2/sim0/0_cell211.dat">
            <OutputColumn id="v211" quantity="Golgi_pop0/211/Golgi_10comp_13channels_2CaPools/v"/>
        </OutputFile>

        <OutputFile id="Volts0_file0_212" fileName="/home/rokas/Golgi_network_2016/PyExamples/simulations/test_density_2/sim0/0_cell212.dat">
            <OutputColumn id="v212" quantity="Golgi_pop0/212/Golgi_10comp_13channels_2CaPools/v"/>
        </OutputFile>

        <OutputFile id="Volts0_file0_213" fileName="/home/rokas/Golgi_network_2016/PyExamples/simulations/test_density_2/sim0/0_cell213.dat">
            <OutputColumn id="v213" quantity="Golgi_pop0/213/Golgi_10comp_13channels_2CaPools/v"/>
        </OutputFile>

        <OutputFile id="Volts0_file0_214" fileName="/home/rokas/Golgi_network_2016/PyExamples/simulations/test_density_2/sim0/0_cell214.dat">
            <OutputColumn id="v214" quantity="Golgi_pop0/214/Golgi_10comp_13channels_2CaPools/v"/>
        </OutputFile>

        <OutputFile id="Volts0_file0_215" fileName="/home/rokas/Golgi_network_2016/PyExamples/simulations/test_density_2/sim0/0_cell215.dat">
            <OutputColumn id="v215" quantity="Golgi_pop0/215/Golgi_10comp_13channels_2CaPools/v"/>
        </OutputFile>

        <OutputFile id="Volts0_file0_216" fileName="/home/rokas/Golgi_network_2016/PyExamples/simulations/test_density_2/sim0/0_cell216.dat">
            <OutputColumn id="v216" quantity="Golgi_pop0/216/Golgi_10comp_13channels_2CaPools/v"/>
        </OutputFile>

        <OutputFile id="Volts0_file0_217" fileName="/home/rokas/Golgi_network_2016/PyExamples/simulations/test_density_2/sim0/0_cell217.dat">
            <OutputColumn id="v217" quantity="Golgi_pop0/217/Golgi_10comp_13channels_2CaPools/v"/>
        </OutputFile>

        <OutputFile id="Volts0_file0_218" fileName="/home/rokas/Golgi_network_2016/PyExamples/simulations/test_density_2/sim0/0_cell218.dat">
            <OutputColumn id="v218" quantity="Golgi_pop0/218/Golgi_10comp_13channels_2CaPools/v"/>
        </OutputFile>

        <OutputFile id="Volts0_file0_219" fileName="/home/rokas/Golgi_network_2016/PyExamples/simulations/test_density_2/sim0/0_cell219.dat">
            <OutputColumn id="v219" quantity="Golgi_pop0/219/Golgi_10comp_13channels_2CaPools/v"/>
        </OutputFile>

        <OutputFile id="Volts0_file0_220" fileName="/home/rokas/Golgi_network_2016/PyExamples/simulations/test_density_2/sim0/0_cell220.dat">
            <OutputColumn id="v220" quantity="Golgi_pop0/220/Golgi_10comp_13channels_2CaPools/v"/>
        </OutputFile>

        <OutputFile id="Volts0_file0_221" fileName="/home/rokas/Golgi_network_2016/PyExamples/simulations/test_density_2/sim0/0_cell221.dat">
            <OutputColumn id="v221" quantity="Golgi_pop0/221/Golgi_10comp_13channels_2CaPools/v"/>
        </OutputFile>

        <OutputFile id="Volts0_file0_222" fileName="/home/rokas/Golgi_network_2016/PyExamples/simulations/test_density_2/sim0/0_cell222.dat">
            <OutputColumn id="v222" quantity="Golgi_pop0/222/Golgi_10comp_13channels_2CaPools/v"/>
        </OutputFile>

        <OutputFile id="Volts0_file0_223" fileName="/home/rokas/Golgi_network_2016/PyExamples/simulations/test_density_2/sim0/0_cell223.dat">
            <OutputColumn id="v223" quantity="Golgi_pop0/223/Golgi_10comp_13channels_2CaPools/v"/>
        </OutputFile>

        <OutputFile id="Volts0_file0_224" fileName="/home/rokas/Golgi_network_2016/PyExamples/simulations/test_density_2/sim0/0_cell224.dat">
            <OutputColumn id="v224" quantity="Golgi_pop0/224/Golgi_10comp_13channels_2CaPools/v"/>
        </OutputFile>

        <OutputFile id="Volts0_file0_225" fileName="/home/rokas/Golgi_network_2016/PyExamples/simulations/test_density_2/sim0/0_cell225.dat">
            <OutputColumn id="v225" quantity="Golgi_pop0/225/Golgi_10comp_13channels_2CaPools/v"/>
        </OutputFile>

        <OutputFile id="Volts0_file0_226" fileName="/home/rokas/Golgi_network_2016/PyExamples/simulations/test_density_2/sim0/0_cell226.dat">
            <OutputColumn id="v226" quantity="Golgi_pop0/226/Golgi_10comp_13channels_2CaPools/v"/>
        </OutputFile>

        <OutputFile id="Volts0_file0_227" fileName="/home/rokas/Golgi_network_2016/PyExamples/simulations/test_density_2/sim0/0_cell227.dat">
            <OutputColumn id="v227" quantity="Golgi_pop0/227/Golgi_10comp_13channels_2CaPools/v"/>
        </OutputFile>

        <OutputFile id="Volts0_file0_228" fileName="/home/rokas/Golgi_network_2016/PyExamples/simulations/test_density_2/sim0/0_cell228.dat">
            <OutputColumn id="v228" quantity="Golgi_pop0/228/Golgi_10comp_13channels_2CaPools/v"/>
        </OutputFile>

        <OutputFile id="Volts0_file0_229" fileName="/home/rokas/Golgi_network_2016/PyExamples/simulations/test_density_2/sim0/0_cell229.dat">
            <OutputColumn id="v229" quantity="Golgi_pop0/229/Golgi_10comp_13channels_2CaPools/v"/>
        </OutputFile>

        <OutputFile id="Volts0_file0_230" fileName="/home/rokas/Golgi_network_2016/PyExamples/simulations/test_density_2/sim0/0_cell230.dat">
            <OutputColumn id="v230" quantity="Golgi_pop0/230/Golgi_10comp_13channels_2CaPools/v"/>
        </OutputFile>

        <OutputFile id="Volts0_file0_231" fileName="/home/rokas/Golgi_network_2016/PyExamples/simulations/test_density_2/sim0/0_cell231.dat">
            <OutputColumn id="v231" quantity="Golgi_pop0/231/Golgi_10comp_13channels_2CaPools/v"/>
        </OutputFile>

        <OutputFile id="Volts0_file0_232" fileName="/home/rokas/Golgi_network_2016/PyExamples/simulations/test_density_2/sim0/0_cell232.dat">
            <OutputColumn id="v232" quantity="Golgi_pop0/232/Golgi_10comp_13channels_2CaPools/v"/>
        </OutputFile>

        <OutputFile id="Volts0_file0_233" fileName="/home/rokas/Golgi_network_2016/PyExamples/simulations/test_density_2/sim0/0_cell233.dat">
            <OutputColumn id="v233" quantity="Golgi_pop0/233/Golgi_10comp_13channels_2CaPools/v"/>
        </OutputFile>

        <OutputFile id="Volts0_file0_234" fileName="/home/rokas/Golgi_network_2016/PyExamples/simulations/test_density_2/sim0/0_cell234.dat">
            <OutputColumn id="v234" quantity="Golgi_pop0/234/Golgi_10comp_13channels_2CaPools/v"/>
        </OutputFile>

        <OutputFile id="Volts0_file0_235" fileName="/home/rokas/Golgi_network_2016/PyExamples/simulations/test_density_2/sim0/0_cell235.dat">
            <OutputColumn id="v235" quantity="Golgi_pop0/235/Golgi_10comp_13channels_2CaPools/v"/>
        </OutputFile>

        <OutputFile id="Volts0_file0_236" fileName="/home/rokas/Golgi_network_2016/PyExamples/simulations/test_density_2/sim0/0_cell236.dat">
            <OutputColumn id="v236" quantity="Golgi_pop0/236/Golgi_10comp_13channels_2CaPools/v"/>
        </OutputFile>

        <OutputFile id="Volts0_file0_237" fileName="/home/rokas/Golgi_network_2016/PyExamples/simulations/test_density_2/sim0/0_cell237.dat">
            <OutputColumn id="v237" quantity="Golgi_pop0/237/Golgi_10comp_13channels_2CaPools/v"/>
        </OutputFile>

        <OutputFile id="Volts0_file0_238" fileName="/home/rokas/Golgi_network_2016/PyExamples/simulations/test_density_2/sim0/0_cell238.dat">
            <OutputColumn id="v238" quantity="Golgi_pop0/238/Golgi_10comp_13channels_2CaPools/v"/>
        </OutputFile>

        <OutputFile id="Volts0_file0_239" fileName="/home/rokas/Golgi_network_2016/PyExamples/simulations/test_density_2/sim0/0_cell239.dat">
            <OutputColumn id="v239" quantity="Golgi_pop0/239/Golgi_10comp_13channels_2CaPools/v"/>
        </OutputFile>

        <OutputFile id="Volts0_file0_240" fileName="/home/rokas/Golgi_network_2016/PyExamples/simulations/test_density_2/sim0/0_cell240.dat">
            <OutputColumn id="v240" quantity="Golgi_pop0/240/Golgi_10comp_13channels_2CaPools/v"/>
        </OutputFile>

        <OutputFile id="Volts0_file0_241" fileName="/home/rokas/Golgi_network_2016/PyExamples/simulations/test_density_2/sim0/0_cell241.dat">
            <OutputColumn id="v241" quantity="Golgi_pop0/241/Golgi_10comp_13channels_2CaPools/v"/>
        </OutputFile>

        <OutputFile id="Volts0_file0_242" fileName="/home/rokas/Golgi_network_2016/PyExamples/simulations/test_density_2/sim0/0_cell242.dat">
            <OutputColumn id="v242" quantity="Golgi_pop0/242/Golgi_10comp_13channels_2CaPools/v"/>
        </OutputFile>

        <OutputFile id="Volts0_file0_243" fileName="/home/rokas/Golgi_network_2016/PyExamples/simulations/test_density_2/sim0/0_cell243.dat">
            <OutputColumn id="v243" quantity="Golgi_pop0/243/Golgi_10comp_13channels_2CaPools/v"/>
        </OutputFile>

        <OutputFile id="Volts0_file0_244" fileName="/home/rokas/Golgi_network_2016/PyExamples/simulations/test_density_2/sim0/0_cell244.dat">
            <OutputColumn id="v244" quantity="Golgi_pop0/244/Golgi_10comp_13channels_2CaPools/v"/>
        </OutputFile>

        <OutputFile id="Volts0_file0_245" fileName="/home/rokas/Golgi_network_2016/PyExamples/simulations/test_density_2/sim0/0_cell245.dat">
            <OutputColumn id="v245" quantity="Golgi_pop0/245/Golgi_10comp_13channels_2CaPools/v"/>
        </OutputFile>

        <OutputFile id="Volts0_file0_246" fileName="/home/rokas/Golgi_network_2016/PyExamples/simulations/test_density_2/sim0/0_cell246.dat">
            <OutputColumn id="v246" quantity="Golgi_pop0/246/Golgi_10comp_13channels_2CaPools/v"/>
        </OutputFile>

        <OutputFile id="Volts0_file0_247" fileName="/home/rokas/Golgi_network_2016/PyExamples/simulations/test_density_2/sim0/0_cell247.dat">
            <OutputColumn id="v247" quantity="Golgi_pop0/247/Golgi_10comp_13channels_2CaPools/v"/>
        </OutputFile>

        <OutputFile id="Volts0_file0_248" fileName="/home/rokas/Golgi_network_2016/PyExamples/simulations/test_density_2/sim0/0_cell248.dat">
            <OutputColumn id="v248" quantity="Golgi_pop0/248/Golgi_10comp_13channels_2CaPools/v"/>
        </OutputFile>

        <OutputFile id="Volts0_file0_249" fileName="/home/rokas/Golgi_network_2016/PyExamples/simulations/test_density_2/sim0/0_cell249.dat">
            <OutputColumn id="v249" quantity="Golgi_pop0/249/Golgi_10comp_13channels_2CaPools/v"/>
        </OutputFile>

        <OutputFile id="Volts0_file0_250" fileName="/home/rokas/Golgi_network_2016/PyExamples/simulations/test_density_2/sim0/0_cell250.dat">
            <OutputColumn id="v250" quantity="Golgi_pop0/250/Golgi_10comp_13channels_2CaPools/v"/>
        </OutputFile>

        <OutputFile id="Volts0_file0_251" fileName="/home/rokas/Golgi_network_2016/PyExamples/simulations/test_density_2/sim0/0_cell251.dat">
            <OutputColumn id="v251" quantity="Golgi_pop0/251/Golgi_10comp_13channels_2CaPools/v"/>
        </OutputFile>

        <OutputFile id="Volts0_file0_252" fileName="/home/rokas/Golgi_network_2016/PyExamples/simulations/test_density_2/sim0/0_cell252.dat">
            <OutputColumn id="v252" quantity="Golgi_pop0/252/Golgi_10comp_13channels_2CaPools/v"/>
        </OutputFile>

        <OutputFile id="Volts0_file0_253" fileName="/home/rokas/Golgi_network_2016/PyExamples/simulations/test_density_2/sim0/0_cell253.dat">
            <OutputColumn id="v253" quantity="Golgi_pop0/253/Golgi_10comp_13channels_2CaPools/v"/>
        </OutputFile>

        <OutputFile id="Volts0_file0_254" fileName="/home/rokas/Golgi_network_2016/PyExamples/simulations/test_density_2/sim0/0_cell254.dat">
            <OutputColumn id="v254" quantity="Golgi_pop0/254/Golgi_10comp_13channels_2CaPools/v"/>
        </OutputFile>

    </Simulation>

</Lems>
