<neuroml xmlns="http://www.neuroml.org/schema/neuroml2"  xmlns:xs="http://www.w3.org/2001/XMLSchema" xmlns:xsi="http://www.w3.org/2001/XMLSchema-instance" xsi:schemaLocation="http://www.neuroml.org/schema/neuroml2 https://raw.github.com/NeuroML/NeuroML2/development/Schemas/NeuroML2/NeuroML_v2beta4.xsd" id="Golgi_test_full_morph_all_channels_exp1_trial0">
    <include href="/../../../Golgi_040408_C1.cell.nml"></include>
    <gapJunction id="gap_junction00" conductance="7.034707nS"/>
    <pulseGenerator id="Input_Golgi_pop0_0" delay="20.000000ms" duration="200.000000ms" amplitude="0.000500uA"/>
    <pulseGenerator id="Input_Golgi_pop0_1" delay="220.000000ms" duration="200.000000ms" amplitude="-0.000500uA"/>
    <network id="Golgi_test_full_morph_all_channels_exp1_trial0_network" type="networkWithTemperature" temperature="23 degC">
        <notes>Parameter arrays for building this network are listed below:
Cell distribution parameters:
{'distanceModel': 'random_no_overlap', 'popID': 'Golgi_pop0', 'zDim': 40, 'xDim': 40, 'distributionModel': 'explicit_cell_numbers', 'yDim': 40}
Cell population parameters:
Cell population parameters for Golgi_pop0:
{'NeuroML2CellType': 'cell2CaPools', 'popID': 'Golgi_pop0', 'cellType': 'Golgi_040408_C1', 'size': 2}
Cell connectivity parameters:
{'testingConductanceScale': 2, 'maximalConnDistance': 200, 'electricalConnModel': 'Vervaeke_2010_based', 'postPoptargetGroup': {'segmentGroupList': ['apical'], 'segmentGroupProbabilities': [1]}, 'units': 'nS', 'normalizeConductances': False, 'spatialScale': 1, 'prePopID': 'Golgi_pop0', 'postPopID': 'Golgi_pop0', 'prePoptargetGroup': {'segmentGroupList': ['apical'], 'segmentGroupProbabilities': [1]}}
Input parameters for a list of populations:
Input group parameters for Golgi_pop0:
{'ampUnits': 'uA', 'testingModel': 'pulseGenerators', 'timeUnits': 'ms', 'inputModel': 'testing', 'pulseParameters': [{'delay': 20, 'duration': 200, 'amplitude': 0.0005}, {'delay': 220, 'duration': 200, 'amplitude': -0.0005}], 'cellFractionToTarget': 0.5}
</notes>
        <population id="Golgi_pop0" type="populationList" component="Golgi_040408_C1" size="2">
            <instance id="0">
                <location y="28.679600033796223" x="3.399191004130757" z="21.218776029863964"/>
            </instance>
            <instance id="1">
                <location y="38.44641033314079" x="8.635758298501104" z="7.291308259082707"/>
            </instance>
        </population>
        <electricalProjection id="proj0" postsynapticPopulation="Golgi_pop0" presynapticPopulation="Golgi_pop0">
            <electricalConnectionInstance id="0" synapse="gap_junction00" preFractionAlong="0.961160" preSegment="3263" postFractionAlong="0.543052" postSegment="3920" postCell="../Golgi_pop0/1/Golgi_040408_C1" preCell="../Golgi_pop0/0/Golgi_040408_C1"/>
        </electricalProjection>
        <inputList id="Input_list_Golgi_pop0_0" component="Input_Golgi_pop0_0" population="Golgi_pop0">
            <input destination="synapses" id="0" target="../Golgi_pop0/0/Golgi_040408_C1"/>
        </inputList>
        <inputList id="Input_list_Golgi_pop0_1" component="Input_Golgi_pop0_1" population="Golgi_pop0">
            <input destination="synapses" id="0" target="../Golgi_pop0/0/Golgi_040408_C1"/>
        </inputList>
    </network>
</neuroml>
