<Lems>

    <!--

        This LEMS file has been automatically generated using PyNeuroML v0.1.7 (libNeuroML v0.2.11)

     -->

    <!-- Specify which component to run -->
    <Target component="Golgi_test_full_morph_all_channels_exp1_trial0"/>

    <!-- Include core NeuroML2 ComponentType definitions -->
    <Include file="Cells.xml"/>
    <Include file="Networks.xml"/>
    <Include file="Simulation.xml"/>

    <Include file="Golgi_test_full_morph_all_channels_exp1_trial0.net.nml"/>
    <Include file="/../../../Golgi_040408_C1.cell.nml"/>
    <Include file="Golgi_Ca_HVA.channel.nml"/>
    <Include file="Golgi_Ca_LVA.channel.nml"/>
    <Include file="Golgi_CALC.nml"/>
    <Include file="Golgi_CALC_ca2.nml"/>
    <Include file="Golgi_hcn1f.channel.nml"/>
    <Include file="Golgi_hcn1s.channel.nml"/>
    <Include file="Golgi_hcn2f.channel.nml"/>
    <Include file="Golgi_hcn2s.channel.nml"/>
    <Include file="Golgi_KA.channel.nml"/>
    <Include file="Golgi_KC.channel.nml"/>
    <Include file="Golgi_Kslow.channel.nml"/>
    <Include file="Golgi_KAHP.channel.nml"/>
    <Include file="Golgi_KV.channel.nml"/>
    <Include file="LeakCond.channel.nml"/>
    <Include file="Golgi_NaP.channel.nml"/>
    <Include file="Golgi_NaR.channel.nml"/>
    <Include file="Golgi_NaT.channel.nml"/>

    <Simulation id="Golgi_test_full_morph_all_channels_exp1_trial0" length="450ms" step="0.001ms" target="Golgi_test_full_morph_all_channels_exp1_trial0_network">

        <Display id="display_voltagesGolgi_pop0" title="Voltages Golgi_pop0" timeScale="1ms" xmin="-45.0" xmax="495.0" ymin="-75" ymax="50">
            <Line id="../Golgi_pop0/0: Vm" quantity="Golgi_pop0/0/Golgi_040408_C1/v" scale="1mV" color="#6b83e2" timeScale="1ms"/>
            <Line id="../Golgi_pop0/1: Vm" quantity="Golgi_pop0/1/Golgi_040408_C1/v" scale="1mV" color="#a3de8f" timeScale="1ms"/>
            <Line id="../Golgi_pop0/2: Vm" quantity="Golgi_pop0/2/Golgi_040408_C1/v" scale="1mV" color="#48da60" timeScale="1ms"/>
            <Line id="../Golgi_pop0/3: Vm" quantity="Golgi_pop0/3/Golgi_040408_C1/v" scale="1mV" color="#bfefe9" timeScale="1ms"/>
            <Line id="../Golgi_pop0/4: Vm" quantity="Golgi_pop0/4/Golgi_040408_C1/v" scale="1mV" color="#e4484a" timeScale="1ms"/>
            <Line id="../Golgi_pop0/5: Vm" quantity="Golgi_pop0/5/Golgi_040408_C1/v" scale="1mV" color="#d60969" timeScale="1ms"/>
            <Line id="../Golgi_pop0/6: Vm" quantity="Golgi_pop0/6/Golgi_040408_C1/v" scale="1mV" color="#0543a1" timeScale="1ms"/>
            <Line id="../Golgi_pop0/7: Vm" quantity="Golgi_pop0/7/Golgi_040408_C1/v" scale="1mV" color="#890877" timeScale="1ms"/>
            <Line id="../Golgi_pop0/8: Vm" quantity="Golgi_pop0/8/Golgi_040408_C1/v" scale="1mV" color="#63296a" timeScale="1ms"/>
            <Line id="../Golgi_pop0/9: Vm" quantity="Golgi_pop0/9/Golgi_040408_C1/v" scale="1mV" color="#754e0f" timeScale="1ms"/>
        </Display>

        <Display id="display_voltagesGolgi_pop1" title="Voltages Golgi_pop1" timeScale="1ms" xmin="-45.0" xmax="495.0" ymin="-75" ymax="50">
            <Line id="../Golgi_pop1/0: Vm" quantity="Golgi_pop1/0/Golgi_040408_C1/v" scale="1mV" color="#cd385d" timeScale="1ms"/>
            <Line id="../Golgi_pop1/1: Vm" quantity="Golgi_pop1/1/Golgi_040408_C1/v" scale="1mV" color="#00175a" timeScale="1ms"/>
            <Line id="../Golgi_pop1/2: Vm" quantity="Golgi_pop1/2/Golgi_040408_C1/v" scale="1mV" color="#72359d" timeScale="1ms"/>
            <Line id="../Golgi_pop1/3: Vm" quantity="Golgi_pop1/3/Golgi_040408_C1/v" scale="1mV" color="#6cff49" timeScale="1ms"/>
            <Line id="../Golgi_pop1/4: Vm" quantity="Golgi_pop1/4/Golgi_040408_C1/v" scale="1mV" color="#0d4e5f" timeScale="1ms"/>
            <Line id="../Golgi_pop1/5: Vm" quantity="Golgi_pop1/5/Golgi_040408_C1/v" scale="1mV" color="#18360d" timeScale="1ms"/>
            <Line id="../Golgi_pop1/6: Vm" quantity="Golgi_pop1/6/Golgi_040408_C1/v" scale="1mV" color="#90ebd4" timeScale="1ms"/>
            <Line id="../Golgi_pop1/7: Vm" quantity="Golgi_pop1/7/Golgi_040408_C1/v" scale="1mV" color="#47a3e1" timeScale="1ms"/>
            <Line id="../Golgi_pop1/8: Vm" quantity="Golgi_pop1/8/Golgi_040408_C1/v" scale="1mV" color="#df5ada" timeScale="1ms"/>
            <Line id="../Golgi_pop1/9: Vm" quantity="Golgi_pop1/9/Golgi_040408_C1/v" scale="1mV" color="#c8dfda" timeScale="1ms"/>
        </Display>

        <OutputFile id="Volts0_file0_0" fileName="simulations/test_full_morph_all_channels_exp1/sim0/Golgi_pop0_cell0.dat">
            <OutputColumn id="v0" quantity="Golgi_pop0/0/Golgi_040408_C1/v"/>
        </OutputFile>

        <OutputFile id="Volts0_file0_1" fileName="simulations/test_full_morph_all_channels_exp1/sim0/Golgi_pop0_cell1.dat">
            <OutputColumn id="v1" quantity="Golgi_pop0/1/Golgi_040408_C1/v"/>
        </OutputFile>

        <OutputFile id="Volts0_file0_2" fileName="simulations/test_full_morph_all_channels_exp1/sim0/Golgi_pop0_cell2.dat">
            <OutputColumn id="v2" quantity="Golgi_pop0/2/Golgi_040408_C1/v"/>
        </OutputFile>

        <OutputFile id="Volts0_file0_3" fileName="simulations/test_full_morph_all_channels_exp1/sim0/Golgi_pop0_cell3.dat">
            <OutputColumn id="v3" quantity="Golgi_pop0/3/Golgi_040408_C1/v"/>
        </OutputFile>

        <OutputFile id="Volts0_file0_4" fileName="simulations/test_full_morph_all_channels_exp1/sim0/Golgi_pop0_cell4.dat">
            <OutputColumn id="v4" quantity="Golgi_pop0/4/Golgi_040408_C1/v"/>
        </OutputFile>

        <OutputFile id="Volts0_file0_5" fileName="simulations/test_full_morph_all_channels_exp1/sim0/Golgi_pop0_cell5.dat">
            <OutputColumn id="v5" quantity="Golgi_pop0/5/Golgi_040408_C1/v"/>
        </OutputFile>

        <OutputFile id="Volts0_file0_6" fileName="simulations/test_full_morph_all_channels_exp1/sim0/Golgi_pop0_cell6.dat">
            <OutputColumn id="v6" quantity="Golgi_pop0/6/Golgi_040408_C1/v"/>
        </OutputFile>

        <OutputFile id="Volts0_file0_7" fileName="simulations/test_full_morph_all_channels_exp1/sim0/Golgi_pop0_cell7.dat">
            <OutputColumn id="v7" quantity="Golgi_pop0/7/Golgi_040408_C1/v"/>
        </OutputFile>

        <OutputFile id="Volts0_file0_8" fileName="simulations/test_full_morph_all_channels_exp1/sim0/Golgi_pop0_cell8.dat">
            <OutputColumn id="v8" quantity="Golgi_pop0/8/Golgi_040408_C1/v"/>
        </OutputFile>

        <OutputFile id="Volts0_file0_9" fileName="simulations/test_full_morph_all_channels_exp1/sim0/Golgi_pop0_cell9.dat">
            <OutputColumn id="v9" quantity="Golgi_pop0/9/Golgi_040408_C1/v"/>
        </OutputFile>

        <OutputFile id="Volts1_file0_0" fileName="simulations/test_full_morph_all_channels_exp1/sim0/Golgi_pop1_cell0.dat">
            <OutputColumn id="v0" quantity="Golgi_pop1/0/Golgi_040408_C1/v"/>
        </OutputFile>

        <OutputFile id="Volts1_file0_1" fileName="simulations/test_full_morph_all_channels_exp1/sim0/Golgi_pop1_cell1.dat">
            <OutputColumn id="v1" quantity="Golgi_pop1/1/Golgi_040408_C1/v"/>
        </OutputFile>

        <OutputFile id="Volts1_file0_2" fileName="simulations/test_full_morph_all_channels_exp1/sim0/Golgi_pop1_cell2.dat">
            <OutputColumn id="v2" quantity="Golgi_pop1/2/Golgi_040408_C1/v"/>
        </OutputFile>

        <OutputFile id="Volts1_file0_3" fileName="simulations/test_full_morph_all_channels_exp1/sim0/Golgi_pop1_cell3.dat">
            <OutputColumn id="v3" quantity="Golgi_pop1/3/Golgi_040408_C1/v"/>
        </OutputFile>

        <OutputFile id="Volts1_file0_4" fileName="simulations/test_full_morph_all_channels_exp1/sim0/Golgi_pop1_cell4.dat">
            <OutputColumn id="v4" quantity="Golgi_pop1/4/Golgi_040408_C1/v"/>
        </OutputFile>

        <OutputFile id="Volts1_file0_5" fileName="simulations/test_full_morph_all_channels_exp1/sim0/Golgi_pop1_cell5.dat">
            <OutputColumn id="v5" quantity="Golgi_pop1/5/Golgi_040408_C1/v"/>
        </OutputFile>

        <OutputFile id="Volts1_file0_6" fileName="simulations/test_full_morph_all_channels_exp1/sim0/Golgi_pop1_cell6.dat">
            <OutputColumn id="v6" quantity="Golgi_pop1/6/Golgi_040408_C1/v"/>
        </OutputFile>

        <OutputFile id="Volts1_file0_7" fileName="simulations/test_full_morph_all_channels_exp1/sim0/Golgi_pop1_cell7.dat">
            <OutputColumn id="v7" quantity="Golgi_pop1/7/Golgi_040408_C1/v"/>
        </OutputFile>

        <OutputFile id="Volts1_file0_8" fileName="simulations/test_full_morph_all_channels_exp1/sim0/Golgi_pop1_cell8.dat">
            <OutputColumn id="v8" quantity="Golgi_pop1/8/Golgi_040408_C1/v"/>
        </OutputFile>

        <OutputFile id="Volts1_file0_9" fileName="simulations/test_full_morph_all_channels_exp1/sim0/Golgi_pop1_cell9.dat">
            <OutputColumn id="v9" quantity="Golgi_pop1/9/Golgi_040408_C1/v"/>
        </OutputFile>

    </Simulation>

</Lems>
