<neuroml xmlns="http://www.neuroml.org/schema/neuroml2"  xmlns:xs="http://www.w3.org/2001/XMLSchema" xmlns:xsi="http://www.w3.org/2001/XMLSchema-instance" xsi:schemaLocation="http://www.neuroml.org/schema/neuroml2 https://raw.github.com/NeuroML/NeuroML2/development/Schemas/NeuroML2/NeuroML_v2beta4.xsd" id="Golgi_test_v2_exp1_trial0">
    <include href="/../../../Golgi_10comp_3channels_1CaPool.cell.nml"></include>
    <gapJunction id="gap_junction00" conductance="1.697165nS"/>
    <gapJunction id="gap_junction01" conductance="0.498504nS"/>
    <gapJunction id="gap_junction02" conductance="0.746350nS"/>
    <gapJunction id="gap_junction03" conductance="1.595716nS"/>
    <gapJunction id="gap_junction04" conductance="0.954409nS"/>
    <gapJunction id="gap_junction05" conductance="0.438014nS"/>
    <gapJunction id="gap_junction06" conductance="0.728747nS"/>
    <gapJunction id="gap_junction07" conductance="1.151493nS"/>
    <gapJunction id="gap_junction08" conductance="1.069566nS"/>
    <gapJunction id="gap_junction09" conductance="0.210534nS"/>
    <gapJunction id="gap_junction010" conductance="0.302620nS"/>
    <gapJunction id="gap_junction011" conductance="0.209468nS"/>
    <gapJunction id="gap_junction012" conductance="0.243441nS"/>
    <gapJunction id="gap_junction013" conductance="1.129787nS"/>
    <gapJunction id="gap_junction014" conductance="0.728118nS"/>
    <gapJunction id="gap_junction015" conductance="2.765324nS"/>
    <gapJunction id="gap_junction016" conductance="0.307066nS"/>
    <gapJunction id="gap_junction017" conductance="0.928709nS"/>
    <gapJunction id="gap_junction018" conductance="0.793013nS"/>
    <gapJunction id="gap_junction019" conductance="0.553253nS"/>
    <gapJunction id="gap_junction020" conductance="0.712332nS"/>
    <gapJunction id="gap_junction021" conductance="0.593084nS"/>
    <gapJunction id="gap_junction022" conductance="0.596423nS"/>
    <gapJunction id="gap_junction023" conductance="1.700089nS"/>
    <gapJunction id="gap_junction024" conductance="0.587571nS"/>
    <gapJunction id="gap_junction025" conductance="1.444993nS"/>
    <gapJunction id="gap_junction026" conductance="1.208237nS"/>
    <gapJunction id="gap_junction027" conductance="1.205563nS"/>
    <gapJunction id="gap_junction028" conductance="1.155940nS"/>
    <gapJunction id="gap_junction029" conductance="0.802334nS"/>
    <gapJunction id="gap_junction030" conductance="0.652817nS"/>
    <gapJunction id="gap_junction031" conductance="1.849507nS"/>
    <gapJunction id="gap_junction032" conductance="0.736892nS"/>
    <gapJunction id="gap_junction033" conductance="1.048934nS"/>
    <gapJunction id="gap_junction034" conductance="2.156126nS"/>
    <gapJunction id="gap_junction035" conductance="0.948894nS"/>
    <gapJunction id="gap_junction036" conductance="0.963202nS"/>
    <gapJunction id="gap_junction037" conductance="0.620499nS"/>
    <gapJunction id="gap_junction038" conductance="1.285373nS"/>
    <gapJunction id="gap_junction039" conductance="0.369638nS"/>
    <gapJunction id="gap_junction040" conductance="1.154436nS"/>
    <gapJunction id="gap_junction041" conductance="0.633527nS"/>
    <gapJunction id="gap_junction042" conductance="0.879982nS"/>
    <gapJunction id="gap_junction043" conductance="1.209654nS"/>
    <gapJunction id="gap_junction044" conductance="1.456131nS"/>
    <gapJunction id="gap_junction045" conductance="0.416823nS"/>
    <gapJunction id="gap_junction046" conductance="1.640306nS"/>
    <gapJunction id="gap_junction047" conductance="0.159223nS"/>
    <gapJunction id="gap_junction048" conductance="0.686457nS"/>
    <gapJunction id="gap_junction049" conductance="0.349965nS"/>
    <gapJunction id="gap_junction050" conductance="0.399660nS"/>
    <gapJunction id="gap_junction051" conductance="0.829077nS"/>
    <gapJunction id="gap_junction052" conductance="0.521561nS"/>
    <gapJunction id="gap_junction053" conductance="0.538502nS"/>
    <gapJunction id="gap_junction054" conductance="0.426997nS"/>
    <gapJunction id="gap_junction055" conductance="0.426550nS"/>
    <gapJunction id="gap_junction056" conductance="0.372885nS"/>
    <gapJunction id="gap_junction057" conductance="0.457326nS"/>
    <gapJunction id="gap_junction058" conductance="0.446672nS"/>
    <gapJunction id="gap_junction059" conductance="0.796907nS"/>
    <gapJunction id="gap_junction060" conductance="0.550489nS"/>
    <gapJunction id="gap_junction061" conductance="2.219580nS"/>
    <gapJunction id="gap_junction062" conductance="0.515137nS"/>
    <gapJunction id="gap_junction063" conductance="0.385698nS"/>
    <gapJunction id="gap_junction064" conductance="0.364725nS"/>
    <gapJunction id="gap_junction065" conductance="1.148177nS"/>
    <gapJunction id="gap_junction066" conductance="0.299981nS"/>
    <gapJunction id="gap_junction067" conductance="0.501333nS"/>
    <gapJunction id="gap_junction068" conductance="0.294980nS"/>
    <gapJunction id="gap_junction069" conductance="0.397027nS"/>
    <gapJunction id="gap_junction070" conductance="0.438126nS"/>
    <pulseGenerator id="Input_Golgi_pop0_0" delay="0.000000ms" duration="100.000000ms" amplitude="0.000040uA"/>
    <pulseGenerator id="Input_Golgi_pop0_1" delay="220.000000ms" duration="200.000000ms" amplitude="-0.000005uA"/>
    <pulseGenerator id="Input_Golgi_pop1_0" delay="0.000000ms" duration="100.000000ms" amplitude="0.000040uA"/>
    <pulseGenerator id="Input_Golgi_pop1_1" delay="220.000000ms" duration="200.000000ms" amplitude="-0.000005uA"/>
    <network id="Golgi_test_v2_exp1_trial0_network" type="networkWithTemperature" temperature="23 degC">
        <notes>Parameter arrays for building this network are listed below:
Cell distribution parameters:
Model: random with no overlap of cell bodies
Model parameters:
{'zDim': 100, 'distributionModel': 'random_no_overlap', 'yDim': 100, 'xDim': 100}
Population parameters:
{'popID': 'Golgi_pop0', 'cellType': 'Golgi_10comp_3channels_1CaPool', 'size': 10}
{'popID': 'Golgi_pop1', 'cellType': 'Golgi_10comp_3channels_1CaPool', 'size': 10}
Connectivity parameters for a list of population pairs:
{'testingConductanceScale': 1, 'maximalConnDistance': 200, 'electricalConnModel': 'Vervaeke_2010_based', 'postPoptargetGroup': {'segmentGroupList': ['apical_dendrite_group', 'basal_dendrite_group'], 'segmentGroupProbabilities': [0.7, 0.3]}, 'units': 'nS', 'normalizeConductances': False, 'spatialScale': 1, 'prePopID': 'Golgi_pop0', 'postPopID': 'Golgi_pop1', 'prePoptargetGroup': {'segmentGroupList': ['apical_dendrite_group', 'basal_dendrite_group'], 'segmentGroupProbabilities': [0.7, 0.3]}}
Input parameters for a list of populations:
Input group parameters for Golgi_pop0:
{'ampUnits': 'uA', 'testingModel': 'pulseGenerators', 'timeUnits': 'ms', 'inputModel': 'testing', 'pulseParameters': [{'delay': 0, 'duration': 100, 'amplitude': 4e-05}, {'delay': 220, 'duration': 200, 'amplitude': -5e-06}], 'cellFractionToTarget': 0.5}
Input group parameters for Golgi_pop1:
{'ampUnits': 'uA', 'testingModel': 'pulseGenerators', 'timeUnits': 'ms', 'inputModel': 'testing', 'pulseParameters': [{'delay': 0, 'duration': 100, 'amplitude': 4e-05}, {'delay': 220, 'duration': 200, 'amplitude': -5e-06}], 'cellFractionToTarget': 0.5}
</notes>
        <population id="Golgi_pop0" type="populationList" component="Golgi_10comp_3channels_1CaPool" size="10">
            <instance id="0">
                <location y="45.062679278266693" x="1.999037851896013" z="70.231119635638777"/>
            </instance>
            <instance id="1">
                <location y="60.653196753444881" x="90.794877426451194" z="15.495981351215827"/>
            </instance>
            <instance id="2">
                <location y="83.197585534029926" x="55.577198077897073" z="32.46307624084249"/>
            </instance>
            <instance id="3">
                <location y="53.846569742634109" x="35.91587858031847" z="95.200443823468035"/>
            </instance>
            <instance id="4">
                <location y="79.663582201823104" x="53.197276911739799" z="82.476312872941236"/>
            </instance>
            <instance id="5">
                <location y="21.656345274880508" x="95.252699662135683" z="99.40451571681443"/>
            </instance>
            <instance id="6">
                <location y="83.850846902792384" x="96.982148432535354" z="21.053358405609345"/>
            </instance>
            <instance id="7">
                <location y="39.286908961525114" x="30.188625912643275" z="16.702269561744664"/>
            </instance>
            <instance id="8">
                <location y="9.98813939749461" x="28.844969605974736" z="71.183155444117403"/>
            </instance>
            <instance id="9">
                <location y="18.019321577517623" x="15.539935812070183" z="20.781286248413977"/>
            </instance>
        </population>
        <population id="Golgi_pop1" type="populationList" component="Golgi_10comp_3channels_1CaPool" size="10">
            <instance id="0">
                <location y="69.340329257311467" x="25.951238577753521" z="66.287102070188553"/>
            </instance>
            <instance id="1">
                <location y="40.475767286088526" x="94.900701164436157" z="57.082628492802066"/>
            </instance>
            <instance id="2">
                <location y="98.033695483884927" x="70.662450012709314" z="39.826759888716325"/>
            </instance>
            <instance id="3">
                <location y="15.888527374690165" x="27.015559813372793" z="97.79418906213742"/>
            </instance>
            <instance id="4">
                <location y="70.504163032654432" x="75.051220510120956" z="81.150447605141736"/>
            </instance>
            <instance id="5">
                <location y="97.438022880197593" x="31.736853969651278" z="85.434627484262862"/>
            </instance>
            <instance id="6">
                <location y="79.440585899458398" x="0.042229247944714" z="81.079854424931426"/>
            </instance>
            <instance id="7">
                <location y="97.901352977921519" x="5.571204514217842" z="69.453131719529807"/>
            </instance>
            <instance id="8">
                <location y="21.441223851514245" x="80.8981794369124" z="57.014988566583725"/>
            </instance>
            <instance id="9">
                <location y="38.127721660365729" x="62.432945720841516" z="86.755916979775591"/>
            </instance>
        </population>
        <electricalProjection id="proj0" postsynapticPopulation="Golgi_pop1" presynapticPopulation="Golgi_pop0">
            <electricalConnectionInstance id="0" synapse="gap_junction00" preFractionAlong="0.324631" preSegment="5" postFractionAlong="0.531973" postSegment="6" postCell="../Golgi_pop1/0/Golgi_10comp_3channels_1CaPool" preCell="../Golgi_pop0/0/Golgi_10comp_3channels_1CaPool"/>
            <electricalConnectionInstance id="1" synapse="gap_junction01" preFractionAlong="0.969941" preSegment="7" postFractionAlong="0.155399" postSegment="5" postCell="../Golgi_pop1/4/Golgi_10comp_3channels_1CaPool" preCell="../Golgi_pop0/0/Golgi_10comp_3channels_1CaPool"/>
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        </electricalProjection>
        <inputList id="Input_list_Golgi_pop0_0" component="Input_Golgi_pop0_0" population="Golgi_pop0">
            <input destination="synapses" id="0" target="../Golgi_pop0/0/Golgi_10comp_3channels_1CaPool"/>
            <input destination="synapses" id="4" target="../Golgi_pop0/4/Golgi_10comp_3channels_1CaPool"/>
            <input destination="synapses" id="5" target="../Golgi_pop0/5/Golgi_10comp_3channels_1CaPool"/>
            <input destination="synapses" id="6" target="../Golgi_pop0/6/Golgi_10comp_3channels_1CaPool"/>
            <input destination="synapses" id="3" target="../Golgi_pop0/3/Golgi_10comp_3channels_1CaPool"/>
        </inputList>
        <inputList id="Input_list_Golgi_pop0_1" component="Input_Golgi_pop0_1" population="Golgi_pop0">
            <input destination="synapses" id="0" target="../Golgi_pop0/0/Golgi_10comp_3channels_1CaPool"/>
            <input destination="synapses" id="4" target="../Golgi_pop0/4/Golgi_10comp_3channels_1CaPool"/>
            <input destination="synapses" id="5" target="../Golgi_pop0/5/Golgi_10comp_3channels_1CaPool"/>
            <input destination="synapses" id="6" target="../Golgi_pop0/6/Golgi_10comp_3channels_1CaPool"/>
            <input destination="synapses" id="3" target="../Golgi_pop0/3/Golgi_10comp_3channels_1CaPool"/>
        </inputList>
        <inputList id="Input_list_Golgi_pop1_0" component="Input_Golgi_pop1_0" population="Golgi_pop1">
            <input destination="synapses" id="0" target="../Golgi_pop1/0/Golgi_10comp_3channels_1CaPool"/>
            <input destination="synapses" id="4" target="../Golgi_pop1/4/Golgi_10comp_3channels_1CaPool"/>
            <input destination="synapses" id="5" target="../Golgi_pop1/5/Golgi_10comp_3channels_1CaPool"/>
            <input destination="synapses" id="6" target="../Golgi_pop1/6/Golgi_10comp_3channels_1CaPool"/>
            <input destination="synapses" id="3" target="../Golgi_pop1/3/Golgi_10comp_3channels_1CaPool"/>
        </inputList>
        <inputList id="Input_list_Golgi_pop1_1" component="Input_Golgi_pop1_1" population="Golgi_pop1">
            <input destination="synapses" id="0" target="../Golgi_pop1/0/Golgi_10comp_3channels_1CaPool"/>
            <input destination="synapses" id="4" target="../Golgi_pop1/4/Golgi_10comp_3channels_1CaPool"/>
            <input destination="synapses" id="5" target="../Golgi_pop1/5/Golgi_10comp_3channels_1CaPool"/>
            <input destination="synapses" id="6" target="../Golgi_pop1/6/Golgi_10comp_3channels_1CaPool"/>
            <input destination="synapses" id="3" target="../Golgi_pop1/3/Golgi_10comp_3channels_1CaPool"/>
        </inputList>
    </network>
</neuroml>
