<Lems>

    <!--

        This LEMS file has been automatically generated using PyNeuroML v0.1.7 (libNeuroML v0.2.11)

     -->

    <!-- Specify which component to run -->
    <Target component="Golgi_test_v2_exp1_trial4"/>

    <!-- Include core NeuroML2 ComponentType definitions -->
    <Include file="Cells.xml"/>
    <Include file="Networks.xml"/>
    <Include file="Simulation.xml"/>

    <Include file="Golgi_test_v2_exp1_trial4.net.nml"/>
    <Include file="/../../../Golgi_5comp_3channels_1CaPool.cell.nml"/>
    <Include file="Golgi_NaT.channel.nml"/>
    <Include file="Golgi_KV.channel.nml"/>
    <Include file="LeakCond.channel.nml"/>

    <Simulation id="Golgi_test_v2_exp1_trial4" length="450ms" step="0.005ms" target="Golgi_test_v2_exp1_trial4_network">

        <Display id="display_voltagesGolgi_pop0" title="Voltages Golgi_pop0" timeScale="1ms" xmin="-45.0" xmax="495.0" ymin="-75" ymax="50">
            <Line id="../Golgi_pop0/0: Vm" quantity="Golgi_pop0/0/Golgi_5comp_3channels_1CaPool/v" scale="1mV" color="#761296" timeScale="1ms"/>
            <Line id="../Golgi_pop0/1: Vm" quantity="Golgi_pop0/1/Golgi_5comp_3channels_1CaPool/v" scale="1mV" color="#c56fc9" timeScale="1ms"/>
            <Line id="../Golgi_pop0/2: Vm" quantity="Golgi_pop0/2/Golgi_5comp_3channels_1CaPool/v" scale="1mV" color="#e86c26" timeScale="1ms"/>
            <Line id="../Golgi_pop0/3: Vm" quantity="Golgi_pop0/3/Golgi_5comp_3channels_1CaPool/v" scale="1mV" color="#950c41" timeScale="1ms"/>
            <Line id="../Golgi_pop0/4: Vm" quantity="Golgi_pop0/4/Golgi_5comp_3channels_1CaPool/v" scale="1mV" color="#ae6491" timeScale="1ms"/>
            <Line id="../Golgi_pop0/5: Vm" quantity="Golgi_pop0/5/Golgi_5comp_3channels_1CaPool/v" scale="1mV" color="#895044" timeScale="1ms"/>
            <Line id="../Golgi_pop0/6: Vm" quantity="Golgi_pop0/6/Golgi_5comp_3channels_1CaPool/v" scale="1mV" color="#d8a6a4" timeScale="1ms"/>
            <Line id="../Golgi_pop0/7: Vm" quantity="Golgi_pop0/7/Golgi_5comp_3channels_1CaPool/v" scale="1mV" color="#397e46" timeScale="1ms"/>
            <Line id="../Golgi_pop0/8: Vm" quantity="Golgi_pop0/8/Golgi_5comp_3channels_1CaPool/v" scale="1mV" color="#af1f0f" timeScale="1ms"/>
            <Line id="../Golgi_pop0/9: Vm" quantity="Golgi_pop0/9/Golgi_5comp_3channels_1CaPool/v" scale="1mV" color="#99ee7e" timeScale="1ms"/>
        </Display>

        <Display id="display_voltagesGolgi_pop1" title="Voltages Golgi_pop1" timeScale="1ms" xmin="-45.0" xmax="495.0" ymin="-75" ymax="50">
            <Line id="../Golgi_pop1/0: Vm" quantity="Golgi_pop1/0/Golgi_5comp_3channels_1CaPool/v" scale="1mV" color="#7747af" timeScale="1ms"/>
            <Line id="../Golgi_pop1/1: Vm" quantity="Golgi_pop1/1/Golgi_5comp_3channels_1CaPool/v" scale="1mV" color="#6e4225" timeScale="1ms"/>
            <Line id="../Golgi_pop1/2: Vm" quantity="Golgi_pop1/2/Golgi_5comp_3channels_1CaPool/v" scale="1mV" color="#016130" timeScale="1ms"/>
            <Line id="../Golgi_pop1/3: Vm" quantity="Golgi_pop1/3/Golgi_5comp_3channels_1CaPool/v" scale="1mV" color="#8ff98c" timeScale="1ms"/>
            <Line id="../Golgi_pop1/4: Vm" quantity="Golgi_pop1/4/Golgi_5comp_3channels_1CaPool/v" scale="1mV" color="#6e4d60" timeScale="1ms"/>
            <Line id="../Golgi_pop1/5: Vm" quantity="Golgi_pop1/5/Golgi_5comp_3channels_1CaPool/v" scale="1mV" color="#9e8e0f" timeScale="1ms"/>
            <Line id="../Golgi_pop1/6: Vm" quantity="Golgi_pop1/6/Golgi_5comp_3channels_1CaPool/v" scale="1mV" color="#73d6a0" timeScale="1ms"/>
            <Line id="../Golgi_pop1/7: Vm" quantity="Golgi_pop1/7/Golgi_5comp_3channels_1CaPool/v" scale="1mV" color="#ec5df1" timeScale="1ms"/>
            <Line id="../Golgi_pop1/8: Vm" quantity="Golgi_pop1/8/Golgi_5comp_3channels_1CaPool/v" scale="1mV" color="#af1c46" timeScale="1ms"/>
            <Line id="../Golgi_pop1/9: Vm" quantity="Golgi_pop1/9/Golgi_5comp_3channels_1CaPool/v" scale="1mV" color="#a56cef" timeScale="1ms"/>
        </Display>

        <OutputFile id="Volts0_file0_0" fileName="simulations/test_v2_exp1/sim4/Golgi_pop0_cell0.dat">
            <OutputColumn id="v0" quantity="Golgi_pop0/0/Golgi_5comp_3channels_1CaPool/v"/>
        </OutputFile>

        <OutputFile id="Volts0_file0_1" fileName="simulations/test_v2_exp1/sim4/Golgi_pop0_cell1.dat">
            <OutputColumn id="v1" quantity="Golgi_pop0/1/Golgi_5comp_3channels_1CaPool/v"/>
        </OutputFile>

        <OutputFile id="Volts0_file0_2" fileName="simulations/test_v2_exp1/sim4/Golgi_pop0_cell2.dat">
            <OutputColumn id="v2" quantity="Golgi_pop0/2/Golgi_5comp_3channels_1CaPool/v"/>
        </OutputFile>

        <OutputFile id="Volts0_file0_3" fileName="simulations/test_v2_exp1/sim4/Golgi_pop0_cell3.dat">
            <OutputColumn id="v3" quantity="Golgi_pop0/3/Golgi_5comp_3channels_1CaPool/v"/>
        </OutputFile>

        <OutputFile id="Volts0_file0_4" fileName="simulations/test_v2_exp1/sim4/Golgi_pop0_cell4.dat">
            <OutputColumn id="v4" quantity="Golgi_pop0/4/Golgi_5comp_3channels_1CaPool/v"/>
        </OutputFile>

        <OutputFile id="Volts0_file0_5" fileName="simulations/test_v2_exp1/sim4/Golgi_pop0_cell5.dat">
            <OutputColumn id="v5" quantity="Golgi_pop0/5/Golgi_5comp_3channels_1CaPool/v"/>
        </OutputFile>

        <OutputFile id="Volts0_file0_6" fileName="simulations/test_v2_exp1/sim4/Golgi_pop0_cell6.dat">
            <OutputColumn id="v6" quantity="Golgi_pop0/6/Golgi_5comp_3channels_1CaPool/v"/>
        </OutputFile>

        <OutputFile id="Volts0_file0_7" fileName="simulations/test_v2_exp1/sim4/Golgi_pop0_cell7.dat">
            <OutputColumn id="v7" quantity="Golgi_pop0/7/Golgi_5comp_3channels_1CaPool/v"/>
        </OutputFile>

        <OutputFile id="Volts0_file0_8" fileName="simulations/test_v2_exp1/sim4/Golgi_pop0_cell8.dat">
            <OutputColumn id="v8" quantity="Golgi_pop0/8/Golgi_5comp_3channels_1CaPool/v"/>
        </OutputFile>

        <OutputFile id="Volts0_file0_9" fileName="simulations/test_v2_exp1/sim4/Golgi_pop0_cell9.dat">
            <OutputColumn id="v9" quantity="Golgi_pop0/9/Golgi_5comp_3channels_1CaPool/v"/>
        </OutputFile>

        <OutputFile id="Volts1_file0_0" fileName="simulations/test_v2_exp1/sim4/Golgi_pop1_cell0.dat">
            <OutputColumn id="v0" quantity="Golgi_pop1/0/Golgi_5comp_3channels_1CaPool/v"/>
        </OutputFile>

        <OutputFile id="Volts1_file0_1" fileName="simulations/test_v2_exp1/sim4/Golgi_pop1_cell1.dat">
            <OutputColumn id="v1" quantity="Golgi_pop1/1/Golgi_5comp_3channels_1CaPool/v"/>
        </OutputFile>

        <OutputFile id="Volts1_file0_2" fileName="simulations/test_v2_exp1/sim4/Golgi_pop1_cell2.dat">
            <OutputColumn id="v2" quantity="Golgi_pop1/2/Golgi_5comp_3channels_1CaPool/v"/>
        </OutputFile>

        <OutputFile id="Volts1_file0_3" fileName="simulations/test_v2_exp1/sim4/Golgi_pop1_cell3.dat">
            <OutputColumn id="v3" quantity="Golgi_pop1/3/Golgi_5comp_3channels_1CaPool/v"/>
        </OutputFile>

        <OutputFile id="Volts1_file0_4" fileName="simulations/test_v2_exp1/sim4/Golgi_pop1_cell4.dat">
            <OutputColumn id="v4" quantity="Golgi_pop1/4/Golgi_5comp_3channels_1CaPool/v"/>
        </OutputFile>

        <OutputFile id="Volts1_file0_5" fileName="simulations/test_v2_exp1/sim4/Golgi_pop1_cell5.dat">
            <OutputColumn id="v5" quantity="Golgi_pop1/5/Golgi_5comp_3channels_1CaPool/v"/>
        </OutputFile>

        <OutputFile id="Volts1_file0_6" fileName="simulations/test_v2_exp1/sim4/Golgi_pop1_cell6.dat">
            <OutputColumn id="v6" quantity="Golgi_pop1/6/Golgi_5comp_3channels_1CaPool/v"/>
        </OutputFile>

        <OutputFile id="Volts1_file0_7" fileName="simulations/test_v2_exp1/sim4/Golgi_pop1_cell7.dat">
            <OutputColumn id="v7" quantity="Golgi_pop1/7/Golgi_5comp_3channels_1CaPool/v"/>
        </OutputFile>

        <OutputFile id="Volts1_file0_8" fileName="simulations/test_v2_exp1/sim4/Golgi_pop1_cell8.dat">
            <OutputColumn id="v8" quantity="Golgi_pop1/8/Golgi_5comp_3channels_1CaPool/v"/>
        </OutputFile>

        <OutputFile id="Volts1_file0_9" fileName="simulations/test_v2_exp1/sim4/Golgi_pop1_cell9.dat">
            <OutputColumn id="v9" quantity="Golgi_pop1/9/Golgi_5comp_3channels_1CaPool/v"/>
        </OutputFile>

    </Simulation>

</Lems>
