<Lems>

    <!--

        This LEMS file has been automatically generated using PyNeuroML v0.1.7 (libNeuroML v0.2.11)

     -->

    <!-- Specify which component to run -->
    <Target component="Golgi_test_v2_exp2_trial4"/>

    <!-- Include core NeuroML2 ComponentType definitions -->
    <Include file="Cells.xml"/>
    <Include file="Networks.xml"/>
    <Include file="Simulation.xml"/>

    <Include file="../../../../home/rokas/Golgi_network_2016/NeuroML2/NML2_LEMS_Net_Examples/test_v2_exp2/sim4/Golgi_test_v2_exp2_trial4.net.nml"/>
    <Include file="/../../../Very_Simple_Golgi_test_morph.cell.nml"/>
    <Include file="Golgi_NaT.channel.nml"/>
    <Include file="Golgi_KV.channel.nml"/>
    <Include file="LeakCond.channel.nml"/>

    <Simulation id="Golgi_test_v2_exp2_trial4" length="450ms" step="0.005ms" target="Golgi_test_v2_exp2_trial4_network">

        <Display id="display_voltagesGolgi_pop0" title="Voltages Golgi_pop0" timeScale="1ms" xmin="-45.0" xmax="495.0" ymin="-75" ymax="50">
            <Line id="../Golgi_pop0/0: Vm" quantity="Golgi_pop0/0/Very_Simple_Golgi_test_morph/v" scale="1mV" color="#91d873" timeScale="1ms"/>
            <Line id="../Golgi_pop0/1: Vm" quantity="Golgi_pop0/1/Very_Simple_Golgi_test_morph/v" scale="1mV" color="#0a544b" timeScale="1ms"/>
            <Line id="../Golgi_pop0/2: Vm" quantity="Golgi_pop0/2/Very_Simple_Golgi_test_morph/v" scale="1mV" color="#ab614b" timeScale="1ms"/>
            <Line id="../Golgi_pop0/3: Vm" quantity="Golgi_pop0/3/Very_Simple_Golgi_test_morph/v" scale="1mV" color="#4e26b2" timeScale="1ms"/>
            <Line id="../Golgi_pop0/4: Vm" quantity="Golgi_pop0/4/Very_Simple_Golgi_test_morph/v" scale="1mV" color="#6d390c" timeScale="1ms"/>
            <Line id="../Golgi_pop0/5: Vm" quantity="Golgi_pop0/5/Very_Simple_Golgi_test_morph/v" scale="1mV" color="#1067d1" timeScale="1ms"/>
            <Line id="../Golgi_pop0/6: Vm" quantity="Golgi_pop0/6/Very_Simple_Golgi_test_morph/v" scale="1mV" color="#300820" timeScale="1ms"/>
            <Line id="../Golgi_pop0/7: Vm" quantity="Golgi_pop0/7/Very_Simple_Golgi_test_morph/v" scale="1mV" color="#dcb9c9" timeScale="1ms"/>
            <Line id="../Golgi_pop0/8: Vm" quantity="Golgi_pop0/8/Very_Simple_Golgi_test_morph/v" scale="1mV" color="#65063d" timeScale="1ms"/>
            <Line id="../Golgi_pop0/9: Vm" quantity="Golgi_pop0/9/Very_Simple_Golgi_test_morph/v" scale="1mV" color="#c83102" timeScale="1ms"/>
        </Display>

        <Display id="display_voltagesGolgi_pop1" title="Voltages Golgi_pop1" timeScale="1ms" xmin="-45.0" xmax="495.0" ymin="-75" ymax="50">
            <Line id="../Golgi_pop1/0: Vm" quantity="Golgi_pop1/0/Very_Simple_Golgi_test_morph/v" scale="1mV" color="#2d480f" timeScale="1ms"/>
            <Line id="../Golgi_pop1/1: Vm" quantity="Golgi_pop1/1/Very_Simple_Golgi_test_morph/v" scale="1mV" color="#6915ec" timeScale="1ms"/>
            <Line id="../Golgi_pop1/2: Vm" quantity="Golgi_pop1/2/Very_Simple_Golgi_test_morph/v" scale="1mV" color="#b0d97a" timeScale="1ms"/>
            <Line id="../Golgi_pop1/3: Vm" quantity="Golgi_pop1/3/Very_Simple_Golgi_test_morph/v" scale="1mV" color="#2a45a3" timeScale="1ms"/>
            <Line id="../Golgi_pop1/4: Vm" quantity="Golgi_pop1/4/Very_Simple_Golgi_test_morph/v" scale="1mV" color="#2df2b5" timeScale="1ms"/>
            <Line id="../Golgi_pop1/5: Vm" quantity="Golgi_pop1/5/Very_Simple_Golgi_test_morph/v" scale="1mV" color="#5e690a" timeScale="1ms"/>
            <Line id="../Golgi_pop1/6: Vm" quantity="Golgi_pop1/6/Very_Simple_Golgi_test_morph/v" scale="1mV" color="#5a976c" timeScale="1ms"/>
            <Line id="../Golgi_pop1/7: Vm" quantity="Golgi_pop1/7/Very_Simple_Golgi_test_morph/v" scale="1mV" color="#e3d12b" timeScale="1ms"/>
            <Line id="../Golgi_pop1/8: Vm" quantity="Golgi_pop1/8/Very_Simple_Golgi_test_morph/v" scale="1mV" color="#84bead" timeScale="1ms"/>
            <Line id="../Golgi_pop1/9: Vm" quantity="Golgi_pop1/9/Very_Simple_Golgi_test_morph/v" scale="1mV" color="#249939" timeScale="1ms"/>
        </Display>

        <OutputFile id="Volts0_file0_0" fileName="simulations/test_v2_exp2/sim4/Golgi_pop0_cell0.dat">
            <OutputColumn id="v0" quantity="Golgi_pop0/0/Very_Simple_Golgi_test_morph/v"/>
        </OutputFile>

        <OutputFile id="Volts0_file0_1" fileName="simulations/test_v2_exp2/sim4/Golgi_pop0_cell1.dat">
            <OutputColumn id="v1" quantity="Golgi_pop0/1/Very_Simple_Golgi_test_morph/v"/>
        </OutputFile>

        <OutputFile id="Volts0_file0_2" fileName="simulations/test_v2_exp2/sim4/Golgi_pop0_cell2.dat">
            <OutputColumn id="v2" quantity="Golgi_pop0/2/Very_Simple_Golgi_test_morph/v"/>
        </OutputFile>

        <OutputFile id="Volts0_file0_3" fileName="simulations/test_v2_exp2/sim4/Golgi_pop0_cell3.dat">
            <OutputColumn id="v3" quantity="Golgi_pop0/3/Very_Simple_Golgi_test_morph/v"/>
        </OutputFile>

        <OutputFile id="Volts0_file0_4" fileName="simulations/test_v2_exp2/sim4/Golgi_pop0_cell4.dat">
            <OutputColumn id="v4" quantity="Golgi_pop0/4/Very_Simple_Golgi_test_morph/v"/>
        </OutputFile>

        <OutputFile id="Volts0_file0_5" fileName="simulations/test_v2_exp2/sim4/Golgi_pop0_cell5.dat">
            <OutputColumn id="v5" quantity="Golgi_pop0/5/Very_Simple_Golgi_test_morph/v"/>
        </OutputFile>

        <OutputFile id="Volts0_file0_6" fileName="simulations/test_v2_exp2/sim4/Golgi_pop0_cell6.dat">
            <OutputColumn id="v6" quantity="Golgi_pop0/6/Very_Simple_Golgi_test_morph/v"/>
        </OutputFile>

        <OutputFile id="Volts0_file0_7" fileName="simulations/test_v2_exp2/sim4/Golgi_pop0_cell7.dat">
            <OutputColumn id="v7" quantity="Golgi_pop0/7/Very_Simple_Golgi_test_morph/v"/>
        </OutputFile>

        <OutputFile id="Volts0_file0_8" fileName="simulations/test_v2_exp2/sim4/Golgi_pop0_cell8.dat">
            <OutputColumn id="v8" quantity="Golgi_pop0/8/Very_Simple_Golgi_test_morph/v"/>
        </OutputFile>

        <OutputFile id="Volts0_file0_9" fileName="simulations/test_v2_exp2/sim4/Golgi_pop0_cell9.dat">
            <OutputColumn id="v9" quantity="Golgi_pop0/9/Very_Simple_Golgi_test_morph/v"/>
        </OutputFile>

        <OutputFile id="Volts1_file0_0" fileName="simulations/test_v2_exp2/sim4/Golgi_pop1_cell0.dat">
            <OutputColumn id="v0" quantity="Golgi_pop1/0/Very_Simple_Golgi_test_morph/v"/>
        </OutputFile>

        <OutputFile id="Volts1_file0_1" fileName="simulations/test_v2_exp2/sim4/Golgi_pop1_cell1.dat">
            <OutputColumn id="v1" quantity="Golgi_pop1/1/Very_Simple_Golgi_test_morph/v"/>
        </OutputFile>

        <OutputFile id="Volts1_file0_2" fileName="simulations/test_v2_exp2/sim4/Golgi_pop1_cell2.dat">
            <OutputColumn id="v2" quantity="Golgi_pop1/2/Very_Simple_Golgi_test_morph/v"/>
        </OutputFile>

        <OutputFile id="Volts1_file0_3" fileName="simulations/test_v2_exp2/sim4/Golgi_pop1_cell3.dat">
            <OutputColumn id="v3" quantity="Golgi_pop1/3/Very_Simple_Golgi_test_morph/v"/>
        </OutputFile>

        <OutputFile id="Volts1_file0_4" fileName="simulations/test_v2_exp2/sim4/Golgi_pop1_cell4.dat">
            <OutputColumn id="v4" quantity="Golgi_pop1/4/Very_Simple_Golgi_test_morph/v"/>
        </OutputFile>

        <OutputFile id="Volts1_file0_5" fileName="simulations/test_v2_exp2/sim4/Golgi_pop1_cell5.dat">
            <OutputColumn id="v5" quantity="Golgi_pop1/5/Very_Simple_Golgi_test_morph/v"/>
        </OutputFile>

        <OutputFile id="Volts1_file0_6" fileName="simulations/test_v2_exp2/sim4/Golgi_pop1_cell6.dat">
            <OutputColumn id="v6" quantity="Golgi_pop1/6/Very_Simple_Golgi_test_morph/v"/>
        </OutputFile>

        <OutputFile id="Volts1_file0_7" fileName="simulations/test_v2_exp2/sim4/Golgi_pop1_cell7.dat">
            <OutputColumn id="v7" quantity="Golgi_pop1/7/Very_Simple_Golgi_test_morph/v"/>
        </OutputFile>

        <OutputFile id="Volts1_file0_8" fileName="simulations/test_v2_exp2/sim4/Golgi_pop1_cell8.dat">
            <OutputColumn id="v8" quantity="Golgi_pop1/8/Very_Simple_Golgi_test_morph/v"/>
        </OutputFile>

        <OutputFile id="Volts1_file0_9" fileName="simulations/test_v2_exp2/sim4/Golgi_pop1_cell9.dat">
            <OutputColumn id="v9" quantity="Golgi_pop1/9/Very_Simple_Golgi_test_morph/v"/>
        </OutputFile>

    </Simulation>

</Lems>
