<neuroml xmlns="http://www.neuroml.org/schema/neuroml2"  xmlns:xs="http://www.w3.org/2001/XMLSchema" xmlns:xsi="http://www.w3.org/2001/XMLSchema-instance" xsi:schemaLocation="http://www.neuroml.org/schema/neuroml2 https://raw.github.com/NeuroML/NeuroML2/development/Schemas/NeuroML2/NeuroML_v2beta4.xsd" id="Simple_Golgi_Net">
    <expTwoSynapse id="syn0" erev="0mV" gbase="1nS" tauDecay="10ms" tauRise="0.5ms"/>
    <cell id="TestSoma">
        <notes>A single segment/compartment cell</notes>
        <morphology id="morphology_Simple_CML_test">
            <segment id="0" name="Soma">
                <proximal y="0.000000e+00" x="0.000000e+00" z="0.000000e+00" diameter="2.700000e+01"/>
                <distal y="2.700000e+01" x="0.000000e+00" z="0.000000e+00" diameter="2.700000e+01"/>
            </segment>
            <segmentGroup neuroLexId="sao864921383" id="Soma">
                <member segment="0"/>
            </segmentGroup>
            <segmentGroup id="all">
                <include segmentGroup="Soma"/>
            </segmentGroup>
            <segmentGroup neuroLexId="GO:0043025" id="soma_group">
                <include segmentGroup="Soma"/>
            </segmentGroup>
        </morphology>
    </cell>
    <poissonFiringSynapse id="poissonFiringSyn" synapse="syn0" averageRate="150 Hz" spikeTarget="./syn0"/>
    <network id="Simple_Golgi_Net_network">
        <population id="Pop0" component="TestSoma" size="10"/>
        <population id="Pop1" component="TestSoma" size="10"/>
        <projection id="Proj0" postsynapticPopulation="Pop1" presynapticPopulation="Pop0" synapse="syn0">
            <connection id="0" preCellId="../Pop0[0]" postCellId="../Pop1[0]"/>
            <connection id="1" preCellId="../Pop0[0]" postCellId="../Pop1[1]"/>
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        </projection>
        <explicitInput input="poissonFiringSyn" destination="synapses" target="Pop0[0]"/>
        <explicitInput input="poissonFiringSyn" destination="synapses" target="Pop0[1]"/>
        <explicitInput input="poissonFiringSyn" destination="synapses" target="Pop0[2]"/>
        <explicitInput input="poissonFiringSyn" destination="synapses" target="Pop0[3]"/>
        <explicitInput input="poissonFiringSyn" destination="synapses" target="Pop0[4]"/>
        <explicitInput input="poissonFiringSyn" destination="synapses" target="Pop0[5]"/>
        <explicitInput input="poissonFiringSyn" destination="synapses" target="Pop0[6]"/>
        <explicitInput input="poissonFiringSyn" destination="synapses" target="Pop0[7]"/>
        <explicitInput input="poissonFiringSyn" destination="synapses" target="Pop0[8]"/>
        <explicitInput input="poissonFiringSyn" destination="synapses" target="Pop0[9]"/>
    </network>
</neuroml>
